# Половникова Ксения 124 гр
# Вариант 7-7
# Задание 2.1 Рассчет равновесного состава единичной реакции
# C3H8 + 3H2O= 3CO + 7H2
# Исходные данные:
#
# ZN(C3H8) = 0,14
# ZN(H2O) = 0,85
# ZN(CO) = 0
# ZN(H2) = 0,01
# VNS = 22500
# ZDT = 70
# 1. Диапазон изменения температуры 300-700 °С
# 2. Диапазон изменения давления 1-10 (атм)
# 3. ZDT = 70
# 4. Kp = 10^-(9988/T + 13.64)
# 5. Расход смеси 22500 м3/ч
# 6. Доля компенсации теплового эффекта 75%
# 7. Потери в окружающую среду 6% от величины теплового потока на входе в реактор
# 8. Принять температуру на выходе из реактора отличающейся от равновесной на 17 С
# 9. Термодинамические характеристики веществ:
# Энтальпия образования веществ при 298К, кДж/моль
# ΔΗ(C3H8) = -103,85; ΔΗ(H2O
# ) = -241,83; ΔΗ(CO)= -110,53; ΔΗ(H2) = 0,00;
# Молярная изобарная теплоёмкость, Дж/(моль*К)
# Ср(С3Н8) = 73,60; Ср(H2O) = 33,60; Ср(CO) = 29,14; Ср(Н2) = 28,84;
# Решение
ZNA := 0.14
ZNC := 0
ZND := 0.01
ZNB := 0.85
# Температурная зависимость константы равновесия
KP(T) := 10^(-9988/T + 13.64)
# Коэффициент изменения объёма
# C3H8 + 3H2O= 3CO + 7H2
W(X) := 1 + 6*ZNA*X
ZEA(X) := ZNA*(1 - X)/W(X)
ZEB(X) := (ZNB - 3*ZNA*X)/W(X)
ZEC(X) := (ZNC + 3*ZNA*X)/W(X)
ZED(X) := (ZND + 7*ZNA*X)/W(X)
# Расчет максимальной концентрации продукта D
ZDMAX := ZED(1) = 0.538043
# Расчет требуемой концентрации продукта D
ZDT := 0.7*ZDMAX = 0.37663
# Расчет требуемой степени превращения
XT := root(ZED(X) - ZDT, X, 0, 1) = 0.552492
CpA := 73.60
CpB := 33.60
CpC := 29.14
CpD := 28.84  # Дж/(моль*К)
CpN := CpA*ZNA + CpB*ZNB + CpC*ZNC + CpD*ZND = 39.1524
CpK(X) := CpA*ZEA(X) + CpB*ZEB(X) + CpC*ZEC(X) + CpD*ZED(X)
CpK(XT) = 32.812
# Уравнение целевой функции равновесия для решения трансцендетного алгебраического уравнения позволяет рассчитать XEA ключевого компонента в диапазоне изменения от XMIN до 1.
EQ(X, T, P) := KP(T)*ZEA(X)*ZEB(X)^3*P^-6 - ZEC(X)^3*ZED(X)^7
XMIN := -3/1*ZNC/ZNA = 0
# Расчет равновесной степени превращения
XEA(T, P) := root(EQ(X, T, P), X, XMIN, 1)
(973 - 573)/100 = 4
i := 0 .. 10
T[i] := 573 + 40*i
j := 0 .. 9
P[j] := 1 + 1*j
XEA[i, j] := XEA(T[i], P[j])
ZEB[i, j] := ZEB(XEA[i, j])
ZEA[i, j] := ZEA(XEA[i, j])
ZEC[i, j] := ZEC(XEA[i, j])
ZED[i, j] := ZED(XEA[i, j])
XEA[i, 0] = [0.448187; 0.580247; 0.714115; 0.836089; 0.927329; 0.976073; 0.992913; 0.99809; 0.999427; 0.99981; 0.999931]
KP(T) = [0.000161784; 0.00222005; 0.0221025; 0.168772; 1.0323; 5.23496; 22.6275; 85.2587; 285.253; 860.495; 2370.5]
T - 273 = [300; 340; 380; 420; 460; 500; 540; 580; 620; 660; 700]
# Реакция эндотермическая
# Равновесие смещается в сторону продуктов
XEA[i, 9] = [0.103552; 0.137333; 0.176096; 0.218691; 0.264077; 0.314701; 0.366714; 0.419952; 0.474584; 0.529534; 0.583866]
ZED[i, 9] = [0.10256; 0.129632; 0.159047; 0.189505; 0.219995; 0.251835; 0.282392; 0.311625; 0.339679; 0.366099; 0.390613]
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ZED[i, 0] = [0.326357; 0.389027; 0.443685; 0.4872; 0.516473; 0.531101; 0.536003; 0.537495; 0.537879; 0.537989; 0.538024]
ZEA[i, 0] = [0.0561243; 0.0395086; 0.0250172; 0.0134802; 0.00571906; 0.00184067; 0.000540954; 0.00014549; 4.36335e-5; 1.44785e-5; 5.25733e-6]
ZEA[i, 9] = [0.11546; 0.108282; 0.100483; 0.092408; 0.0843241; 0.0758824; 0.0677808; 0.0600304; 0.0525923; 0.0455876; 0.0390882]
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ZEC[i, 9] = [0.0400115; 0.0517142; 0.0644298; 0.0775957; 0.0907759; 0.10454; 0.117749; 0.130385; 0.142513; 0.153933; 0.16453]
ZEC[i, 0] = [0.136754; 0.163845; 0.187472; 0.206282; 0.218936; 0.22526; 0.227379; 0.228024; 0.22819; 0.228237; 0.228252]
ZEB[i, 9] = [0.741969; 0.710372; 0.67604; 0.640492; 0.604905; 0.567743; 0.532079; 0.49796; 0.465216; 0.43438; 0.405768]
ZEB[i, 0] = [0.480765; 0.407619; 0.343826; 0.293038; 0.258872; 0.241799; 0.236077; 0.234336; 0.233888; 0.233759; 0.233719]
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# Расчет равновесной температуры
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TR(P, X) := root(EQ(X, T, P), T, 500, 1000)
# Равновесная температура (градС), обеспечивающая достижение ZDT при P=1атм
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TR(1, XT) - 273 = 331.748
TR(10, XT) - 273 = 676.792
# Расчет теплового баланса
# Энтальпии образования веществ при 298К, кДж/моль
ΔHA := -103.85
ΔHB := -241.83
ΔHC := -110.53
ΔHD := 0
# Энтальпия реакции, кДж
ΔH := 7*ΔHD + 3*ΔHC - 3*ΔHB - ΔHA = 497.75
# Удельный тепловой эффект кДж/моль компонента D
q := -ΔH/7 = -71.1071
VNS := 22500/3600 = 6.25  # м^3/с
# Тепловой поток на выходе из реактора | Дж/с
QK(P, X) := VNS*W(X)/22.4*1000*CpK(X)*(TR(P, X) - 17 - 273)
QK(1, XT) = 4218864
QK(10, XT) = 8843830
QR(X) := -ΔH/7*1000*VNS*1000/22.4*ZNA*X*7
QR(XT) = -10742302
QTO(X) := -QR(X)*0.75
QTO(XT) = 8056727
# Тепловой поток на входе в реактор | Дж/с
QN(P, X) := (QK(P, X) - QR(X) - QTO(X))/(1 - 0.06)
QN(1, XT) = 7345148
QN(10, XT) = 12265326
TN(P, X) := QN(P, X)*22.4/(VNS*1000*CpN)
# Температура на входе в реактор (градС)
TN(1, XT) = 672.373
TN(10, XT) = 1122.76
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P := root(TN(P, XT) - 930, P, 1, 7) = 4.75684
