"ЗАДАНИЕ 2.1 РАСЧЕТ РАВНОВЕСНОГО СОС ТАВА ЕДИНИЧНОЙ РЕАКЦИИ"
# 2Cl2+2H2O = 4HCl+O2
# исходные данные
# Акетов Александр
# 124 группа
# вариант 21-7
ZN(Cl2) := 0.15
ZN(H2O) := 0.6
ZN(HCl) := 0
ZN(O2) := 0
ZN(N2) := 0.25
# 1. Диапазон изменения температуры 773-1273 K
# 2. Диапазон изменения давления 1-5 (атм)
# 3. ZCT=70%
# 4.Kp=10^(-6105/T+7.1)
# 5.Расход смеси 12500м3/ч
# 6.Для компенсации теплового эффекта 75%
# 7. Потери в окружающую среду 5% от величины теплового потока на входе в реактор.
# 8.Принять температуру на выходе из реактора отличающейся от равновесной на 20 С
# 9. Термодинамические характеристики веществ:
# Энтальпия образования веществ при 298К, кДж/моль
# ΔΗ(Cl2) = 0  ; ΔΗ(H2O) =-241.83 ; ΔΗ(HCl) = -92.31 ; ΔH(O2) = 0
# Молярная изобарная теплоёмкость, Дж/(моль*К)
# Ср(Cl2) = 33.95 ; Ср(H2O) = 33.60 ; Ср(HCl) =29.14 ; Ср(O2) = 29.38 ; Cp(N2) = 29.12
# Решение
ZNA := 0.15
ZNB := 0.6
ZNC := 0
ZND := 0
ZNI := 0.25
# Температурная зависимость константы равновесия
KP(T) := 10^(-6105/T + 7.1)
# Коэффициент изменения объёма
W(X) := 1 + 1/2*ZNA*X
ZEA(X) := ZNA*(1 - X)/W(X)
ZEB(X) := (ZNB - ZNA*X)/W(X)
ZEC(X) := 2*ZNA*X/W(X)
ZED(X) := 1/2*ZNA*X/W(X)
ZEI(X) := ZNI/W(X)
# Расчет максимальной концентрации целевого продукта
ZCMAX := ZEC(1) = 0.27907
# Расчет требуемой концентрации целевого продукта
ZCT := 0.7*ZCMAX = 0.195349
# Расчет требуемой степени превращения
XT := root(ZEC(X) - ZCT, X, 0, 1) = 0.684597
CpA := 33.95
CpB := 33.6
CpC := 29.14
CpD := 29.38
CpI := 29.12  # Дж/(моль*К)
CpN := CpA*ZNA + CpB*ZNB + CpI*ZNI = 32.5325
CpK(X) := CpA*ZEA(X) + CpB*ZEB(X) + CpC*ZEC(X) + CpD*ZED(X) + CpI*ZEI(X)
CpK(XT) = 31.4731
# Уравнение целевой функции равновесия для решения трансцендетного алгебраического уравнения позволяет рассчитать XEA ключевого компонента в диапазоне изменения от XMIN до 1.
EQ(X, T, P) := KP(T)*ZEA(X)^2*ZEB(X)^2*P^-1 - ZEC(X)^4*ZED(X)
XMIN := 0
XEA(T, P) := root(EQ(X, T, P), X, XMIN, 1)
i := 0 .. 10
j := 0 .. 4
T[i] := 723 + i*50
P[j] := 1 + 1*j
XEA[i, j] := XEA(T[i], P[j])
ZEA[i, j] := ZEA(XEA[i, j])
ZEB[i, j] := ZEB(XEA[i, j])
ZEC[i, j] := ZEC(XEA[i, j])
ZED[i, j] := ZED(XEA[i, j])
ZEI[i, j] := ZEI(XEA[i, j])
XEA[i, 0] = [0.595383; 0.685617; 0.760645; 0.820156; 0.865217; 0.89906; 0.923422; 0.941496; 0.954942; 0.964177; 0.971465]
XEA[i, 4] = [0.481891; 0.570059; 0.649684; 0.718564; 0.776012; 0.822644; 0.860211; 0.888379; 0.911184; 0.927933; 0.94143]
ZEA[i, 0] = [0.0580982; 0.0448511; 0.0339656; 0.0254134; 0.0189855; 0.0141845; 0.0107426; 0.00819678; 0.00630699; 0.00501111; 0.00398957]
ZEA[i, 4] = [0.0750055; 0.0618469; 0.0501059; 0.0400567; 0.0317503; 0.0250574; 0.0196976; 0.0156972; 0.0124702; 0.0101067; 0.00820613]
KP(T) = [0.0452915; 0.159294; 0.480858; 1.27901; 3.05984; 6.69254; 13.5599; 25.7244; 46.0966; 78.5953; 128.285]
T = [723; 773; 823; 873; 923; 973; 1023; 1073; 1123; 1173; 1223]
ZEB[i, 0] = [0.488863; 0.472843; 0.459679; 0.449337; 0.441564; 0.435758; 0.431596; 0.428517; 0.426232; 0.424665; 0.423429]
ZEB[i, 4] = [0.509309; 0.493396; 0.479198; 0.467045; 0.457; 0.448907; 0.442425; 0.437587; 0.433685; 0.430827; 0.428528]
ZEC[i, 0] = [0.17098; 0.195626; 0.215878; 0.231789; 0.243748; 0.25268; 0.259083; 0.26382; 0.267336; 0.269747; 0.271647]
ZEC[i, 4] = [0.139525; 0.164006; 0.185849; 0.204546; 0.219999; 0.232451; 0.242423; 0.249866; 0.255869; 0.260267; 0.263803]
ZED[i, 0] = [0.042745; 0.0489064; 0.0539695; 0.0579473; 0.060937; 0.06317; 0.0647709; 0.065955; 0.066834; 0.0674367; 0.0679118]
ZED[i, 4] = [0.0348812; 0.0410014; 0.0464624; 0.0511364; 0.0549998; 0.0581128; 0.0606058; 0.0624664; 0.0639674; 0.0650667; 0.0659506]
ZEI[i, 0] = [0.239314; 0.237773; 0.236508; 0.235513; 0.234766; 0.234208; 0.233807; 0.233511; 0.233292; 0.233141; 0.233022]
ZEI[i, 4] = [0.24128; 0.23975; 0.238384; 0.237216; 0.23625; 0.235472; 0.234849; 0.234383; 0.234008; 0.233733; 0.233512]
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# Расчет равновесной температуры
TR(P, X) := root(EQ(X, T, P), T, 700, 900)  # Расчет теплового баланса
TR(1, XT) - 273 = 499.375  # Энтальпии образования веществ при 298К, кДж/моль
TR(5, XT) - 273 = 574.302
ΔHA := 0
ΔHB := -241.83
ΔHC := -92.31
ΔHD := 0
# Удельный тепловой эффект кДж/моль компонента C
ΔH := 4*ΔHC - 2*ΔHB = 114.42
q := -ΔH/4 = -28.605
# Тепловой поток на выходе из реактора
VNS := 12500/3600 = 3.47222
QK(P, X) := VNS*W(X)/22.4*1000*CpK(X)*(TR(P, X) + 20 - 273)
QK(1, XT) = 2663943  # Дж/c
QK(5, XT) = 3048254  # Дж/c
QR(X) := q*1000*VNS*1000/22.4*ZNA*X*4/2
QR(XT) = -910662
QTO(X) := -QR(X)*0.75
QTO(XT) = 682997
# Тепловой поток на входе в реактор
QN(P, X) := (QK(P, X) - QR(X) - QTO(X))/(1 - 0.05)  # Дж/с
QN(1, XT) = 3043798
# Температура на входе в реактор (градС)
QN(5, XT) = 3448336  # Дж/с
TN(P, X) := QN(P, X)*22.4/(VNS*1000*CpN)
TN(1, XT) = 603.586
TN(5, XT) = 683.806
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P := root(TN(P, XT) - 650, P, 1, 5) = 2.63069
