"ЗАДАНИЕ 2.1 РАСЧЕТ РАВНОВЕСНОГО СОС ТАВА ЕДИНИЧНОЙ РЕАКЦИИ"
# CH3OH+H20=CO2+3H2
# исходные данные
# Леготин
# Андрей гр 124
# вар 10-7
ZN(CH3OH) := 0.18
ZN(H2O) := 0.82
ZN(CO2) := 0
ZN(H2) := 0
# 1. Диапазон изменения температуры 473-873 K
# 2. Диапазон изменения давления 1-5 (атм)
# 3. ZDT=70%
# 4.Kp=10^(-2930/T+5.31)
# 5.Расход смеси 5500м3/ч
# 6.Для компенсации теплового эффекта 75%
# 7. Потери в окружающую среду 5% от величины теплового потока на входе в реактор.
# 8.Принять температуру на выходе из реактора отличающейся от равновесной на 13 С
# 9. Термодинамические характеристики веществ:
# Энтальпия образования веществ при 298К, кДж/моль
# ΔΗ(CH3OH) =-201  ; ΔΗ(H2O) =-241.83 ; ΔΗ(CO2) = -393.51 ; ΔH(H2) = 0
# Молярная изобарная теплоёмкость, Дж/(моль*К)
# Ср(CH3OH) = 44.10 ; Ср(H2O) = 33.60 ; Ср(CO2) =37.14 ; Ср(H2) = 28.84
Решение
ZNA := 0.18
ZNB := 0.82
ZNC := 0
ZND := 0
# Температурная зависимость константы равновесия
KP(T) := 10^(-2930/T + 5.31)
# Коэффициент изменения объёма
W(X) := 1 + 2*ZNA*X
ZEA(X) := ZNA*(1 - X)/W(X)
ZEB(X) := (ZNB - ZNA*X)/W(X)
ZEC(X) := ZNA*X/W(X)
ZED(X) := 3*ZNA*X/W(X)
# Расчет максимальной концентрации целевого продукта
ZDMAX := ZED(1) = 0.397059
# Расчет требуемой концентрации целевого продукта
ZDT := 0.7*ZDMAX = 0.277941
# Расчет требуемой степени превращения
XT := root(ZED(X) - ZDT, X, 0, 1) = 0.631773
CpA := 44.10
CpB := 33.60
CpC := 37.14
CpD := 28.84  # Дж/(моль*К)
CpN := CpA*ZNA + CpB*ZNB = 35.49
CpK(X) := CpA*ZEA(X) + CpB*ZEB(X) + CpC*ZEC(X) + CpD*ZED(X)
CpK(XT) = 33.172
# Уравнение целевой функции равновесия для решения трансцендетного алгебраического уравнения позволяет рассчитать XEA ключевого компонента в диапазоне изменения от XMIN до 1.
EQ(X, T, P) := KP(T)*ZEA(X)^1*ZEB(X)^1*P^-2 - ZEC(X)^1*ZED(X)^3
XMIN := 0
XEA(T, P) := root(EQ(X, T, P), X, XMIN, 1)
i := 0 .. 10
T[i] := 423 + 45*i  # уменьшил минимальную рекомендованную температуру на 50 К
j := 0 .. 4
P[j] := 1 + 1*j
XEA[i, j] := XEA(T[i], P[j])
ZEA[i, j] := ZEA(XEA[i, j])
ZEB[i, j] := ZEB(XEA[i, j])
ZEC[i, j] := ZEC(XEA[i, j])
ZED[i, j] := ZED(XEA[i, j])
KP(T) = [0.0241705; 0.112025; 0.396734; 1.14579; 2.82463; 6.14321; 12.0783; 21.8681; 36.9813; 59.0681; 89.8995]
# Реакция эндотермическая
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# Расчет равновесной температуры
TR(P, X) := root(EQ(X, T, P), T, 400, 600)
# Равновесная температура (градС), обеспечивающая достижение ZDT при P=1атм
TR(1, XT) - 273 = 177.515
TR(5, XT) - 273 = 300.865
# Расчет теплового баланса
# Энтальпии образования веществ при 298К, кДж/моль
ΔHA := -201
ΔHB := -241.83
ΔHC := -393.51
ΔHD := 0
# Энтальпия реакции, кДж
ΔH := 3*ΔHD + ΔHC - ΔHA - ΔHB = 49.32
# Удельный тепловой эффект кДж/моль компонента D
q := -ΔH/3 = -16.44
VNS := 5500/3600 = 1.52778  # м^3/с
# Тепловой поток на выходе из реактора
QK(P, X) := VNS*W(X)/22.4*1000*CpK(X)*(TR(P, X) - 13 - 273)
QK(5, XT) = 799415  # Дж/c
QK(1, XT) = 456866  # Дж/c
QR(X) := -ΔH/3*1000*VNS*1000/22.4*ZNA*X*3
QR(XT) = -382533
QTO(X) := -QR(X)*0.75
QTO(XT) = 286900
# Тепловой поток на входе в реактор
QN(P, X) := (QK(P, X) - QR(X) - QTO(X))/(1 - 0.05)
QN(1, XT) = 581578  # Дж/с
QN(5, XT) = 942156  # Дж/с
# Температура на входе в реактор (градС)
TN(P, X) := QN(P, X)*22.4/(VNS*1000*CpN)
TN(1, XT) = 240.264
TN(5, XT) = 389.229
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P := root(TN(P, XT) - 300, P, 1, 5) = 2.09755
