"ЗАДАНИЕ 2.1 РАСЧЕТ РАВНОВЕСНОГО СОС ТАВА ЕДИНИЧНОЙ РЕАКЦИИ"
# 4HCl+O2=2Cl2+2H2O
# исходные данные
ZN(HCl) := 0.14
# Панузин Кирилл
# гр 124
# вар 8-7
ZN(O2) := 0.179
ZN(Cl2) := 0
ZN(H2O) := 0.01
ZN(N2) := 0.671
# 1. Диапазон изменения температуры 473-873 K
# 2. Диапазон изменения давления 1-10 (атм)
# 3. ZCT=70%
# 4.Kp=10^(6105/T-7.10)
# 5.Расход смеси 30000м3/ч
# 6.Для компенсации теплового эффекта 80%
# 7. Потери в окружающую среду 5% от величины теплового потока на входе в реактор.
# 8.Принять температуру на выходе из реактора отличающейся от равновесной на 18 С
# 9. Термодинамические характеристики веществ:
# Энтальпия образования веществ при 298К, кДж/моль
# ΔΗ(HCl) =-92.31  ; ΔΗ(O2) =0 ; ΔΗ(Cl2) = 0 ; ΔH(H2O) = -241.83
# Молярная изобарная теплоёмкость, Дж/(моль*К)
# Ср(HCl) = 29.14 ; Ср(O2) = 29.38 ; Ср(Cl2) = 33.95 ; Ср(H2O) = 33.60 ; Cp(N2) = 29.12
Решение
ZNA := 0.14
ZNB := 0.179
ZNC := 0
ZND := 0.01
ZNI := 0.671
# Температурная зависимость константы равновесия
KP(T) := 10^(6105/T - 7.10)
# Коэффициент изменения объёма
W(X) := 1 - 1/4*ZNA*X
ZEA(X) := ZNA*(1 - X)/W(X)
ZEB(X) := (ZNB - 1/4*ZNA*X)/W(X)
ZEC(X) := (ZNC + 1/2*ZNA*X)/W(X)
ZED(X) := (ZND + 1/2*ZNA*X)/W(X)
ZEI(X) := ZNI/W(X)
# Расчет максимальной концентрации целевого продукта
ZCMAX := ZEC(1) = 0.0725389
# Расчет требуемой концентрации целевого продукта
ZCT := 0.7*ZCMAX = 0.0507772
# Расчет требуемой степени превращения
XT := root(ZEC(X) - ZCT, X, 0, 1) = 0.707428
CpA := 29.14
CpB := 29.38
CpC := 33.95
CpD := 33.60
CpI := 29.12
CpN := CpA*ZNA + CpB*ZNB + CpC*ZNC + CpD*ZND + CpI*ZNI = 29.2141
CpK(X) := CpA*ZEA(X) + CpB*ZEB(X) + CpC*ZEC(X) + CpD*ZED(X) + CpI*ZEI(X)
CpK(XT) = 29.6806
# Уравнение целевой функции равновесия для решения трансцендетного алгебраического уравнения позволяет рассчитать XEA ключевого компонента в диапазоне изменения от XMIN до 1.
EQ(X, T, P) := KP(T)*ZEA(X)^4*ZEB(X)^1*P^1 - ZEC(X)^2*ZED(X)^2
XMIN := 0
XEA(T, P) := root(EQ(X, T, P), X, XMIN, 1)
i := 0 .. 10
T[i] := 573 + 50*i
j := 0 .. 9
P[j] := 1 + 1*j
XEA[i, j] := XEA(T[i], P[j])
ZEA[i, j] := ZEA(XEA[i, j])
ZEB[i, j] := ZEB(XEA[i, j])
ZEC[i, j] := ZEC(XEA[i, j])
ZED[i, j] := ZED(XEA[i, j])
ZEI[i, j] := ZEI(XEA[i, j])
KP(T) = [3584.68; 500.447; 93.61; 22.0792; 6.2777; 2.07962; 0.781857; 0.326814; 0.14942; 0.0737466; 0.0388736]
# реакция экзотермическая
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XEA[i, 0] = [0.899857; 0.845898; 0.783272; 0.713855; 0.644286; 0.577034; 0.514249; 0.457138; 0.406151; 0.361165; 0.321751]
XEA[i, 9] = [0.94114; 0.907185; 0.865787; 0.816923; 0.764856; 0.710741; 0.657022; 0.605128; 0.556072; 0.510439; 0.468514]
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T = [573; 623; 673; 723; 773; 823; 873; 923; 973; 1023; 1073]
KP(T) = [3584.68; 500.447; 93.61; 22.0792; 6.2777; 2.07962; 0.781857; 0.326814; 0.14942; 0.0737466; 0.0388736]
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ZEA[i, 0] = [0.0144759; 0.0222325; 0.0311971; 0.0410869; 0.0509488; 0.0604359; 0.0692516; 0.0772364; 0.0843378; 0.0905819; 0.0960363]
ZEA[i, 9] = [0.00852109; 0.0134203; 0.019377; 0.0263852; 0.0338257; 0.0415293; 0.0491471; 0.0564782; 0.0633835; 0.0697853; 0.0756485]
ZEB[i, 0] = [0.152302; 0.153952; 0.155858; 0.157962; 0.160059; 0.162077; 0.163952; 0.165651; 0.167161; 0.168489; 0.169649]
ZEB[i, 9] = [0.151035; 0.152077; 0.153344; 0.154835; 0.156417; 0.158056; 0.159676; 0.161235; 0.162704; 0.164066; 0.165313]
# Расчет равновесной температуры
TR(P, X) := root(EQ(X, T, P), T, 700, 900)
# Равновесная температура (градС), обеспечивающая достижение ZDT при P=1атм
TR(1, XT) - 273 = 454.621
TR(10, XT) - 273 = 553.076
# Расчет теплового баланса
ZEC[i, 0] = [0.0650384; 0.0610194; 0.0563746; 0.0512503; 0.0461405; 0.0412249; 0.0366572; 0.03252; 0.0288405; 0.0256052; 0.0227791]
ZEC[i, 9] = [0.0681238; 0.0655853; 0.062499; 0.0588678; 0.0550126; 0.0510211; 0.0470741; 0.0432755; 0.0396977; 0.0363807; 0.0333428]
ZED[i, 0] = [0.0753636; 0.0713245; 0.0666564; 0.0615066; 0.0563712; 0.0514311; 0.0468405; 0.0426826; 0.0389847; 0.0357332; 0.032893]
ZED[i, 9] = [0.0784644; 0.0759133; 0.0728115; 0.0691621; 0.0652877; 0.0612762; 0.0573094; 0.0534919; 0.0498961; 0.0465626; 0.0435095]
# Энтальпии образования веществ при 298К, кДж/моль
ΔHA := -92.31
ΔHB := 0
ΔHC := 0
ΔHD := -241.83
ΔH := 2*ΔHC + 2*ΔHD - 4*ΔHA - ΔHB = -114.42
# Удельный тепловой эффект кДж/моль компонента D
q := -ΔH/2 = 57.21
VNS := 30000/3600 = 8.33333  # м^3/с
# Тепловой поток на выходе из реактора
QK(P, X) := VNS*W(X)/22.4*1000*CpK(X)*(TR(P, X) - 18 - 273)
QK(1, XT) = 4701759  # Дж/c
QK(10, XT) = 5761969  # Дж/c
QR(X) := q*1000*VNS*1000/22.4*ZNA*X*1/2
QR(XT) = 1053957
QTO(X) := -QR(X)*0.8
QTO(XT) = -843166
# Тепловой поток на входе в реактор
QN(P, X) := (QK(P, X) - QR(X) - QTO(X))/(1 - 0.05)
QN(1, XT) = 4727335  # Дж/с
QN(10, XT) = 5843345  # Дж/с
# Температура на входе в реактор (градС)
TN(P, X) := QN(P, X)*22.4/(VNS*1000*CpN)
TN(1, XT) = 434.963
TN(10, XT) = 537.648
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P := root(TN(P, XT) - 500, P, 1, 10) = 4.59521
