"ЗАДАНИЕ 2.1 РАСЧЕТ РАВНОВЕСНОГО СОС ТАВА ЕДИНИЧНОЙ РЕАКЦИИ"
2*NO + O2 = 2*NO2  # error: Эта переменная неопределена.  # Смирнова Екатерина гр 124 вар 5-7
# Исходные данные
ZN(NO) := 0.1
ZN(O2) := 0.187
ZN(NO2) := 0.01
ZN(N2) := 0.703
# 1. Диапазон изменения температуры 423-773 K
# 2. Диапазон изменения давления 1-10 (атм)
# 3. ZCT=70
# 4.Kp=10^(5970/T-2.4567)
# 5.Расход смеси 12500м3/ч
# 6.Для компенсации теплового эффекта 75%
# 7. Потери в окружающую среду 2% от величины теплового потока на входе в реактор.
# 8.Принять температуру на выходе из реактора отличающейся от равновесной на 17 С
# 9. Термодинамические характеристики веществ:
# Энтальпия образования веществ при 298К, кДж/моль
# ΔΗ(NO) =91.28  ; ΔΗ(O2) =0 ; ΔΗ(NO2) = 34.13
# Молярная изобарная теплоёмкость, Дж/(моль*К)
# Ср(NO) =29.80 ; Ср(O2) =29.38 ; Ср(NO2) =37.18 ; Ср(N2) = 29,12
Решение
ZNA := 0.1
ZNB := 0.187
ZNC := 0.01
ZNI := 0.703
# Температурная зависимость константы равновесия
KP(T) := 10^(5970/T + (-7.76))
# Коэффициент изменения объёма
W(X) := 1 - 1/2*ZNA*X
ZEB(X) := (ZNB - 1/2*ZNA*X)/W(X)
ZEA(X) := ZNA*(1 - X)/W(X)
ZEC(X) := (ZNC + 2/2*ZNA*X)/W(X)
ZEI(X) := ZNI/W(X)
# Расчет максимальной концентрации целевого продукта
ZCMAX := ZEC(1) = 0.115789
# Расчет требуемой концентрации целевого продукта
ZCT := 0.7*ZCMAX = 0.0810526
# Расчет требуемой степени превращения
XT := root(ZEC(X) - ZCT, X, 0, 1) = 0.682853
CpA := 29.80
CpB := 29.38
CpC := 37.18
CpI := 29.12  # Дж/(моль*К)
CpN := CpA*ZNA + CpB*ZNB + CpC*ZNC + CpI*ZNI = 29.3172
CpK(X) := CpA*ZEA(X) + CpB*ZEB(X) + CpC*ZEC(X) + CpI*ZEI(X)
CpK(XT) = 29.8368
# Уравнение целевой функции равновесия для решения трансцендетного алгебраического уравнения позволяет рассчитать XEA ключевого компонента в диапазоне изменения от XMIN до 1.
EQ(X, T, P) := KP(T)*ZEA(X)^2*ZEB(X)^1*P^1 - ZEC(X)^2
XMIN := -2/2*ZNC/ZNA = -0.1
# Расчет равновесной степени превращения
XEA(T, P) := root(EQ(X, T, P), X, XMIN, 1)
(773 - 423)/100 = 3.5
i := 0 .. 4
T[i] := 423 + 100*i
j := 0 .. 9
P[j] := 1 + 1*j
XEA[i, j] := XEA(T[i], P[j])
ZEA[i, j] := ZEA(XEA[i, j])
ZEB[i, j] := ZEB(XEA[i, j])
ZEC[i, j] := ZEC(XEA[i, j])
ZEI[i, j] := ZEI(XEA[i, j])
KP(T) = [2256707; 4517.66; 66.4759; 3.1424; 0.311852]
# Реакция экзотрмическая
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# Расчет равновесной температуры
TR(P, X) := root(EQ(X, T, P), T, 600, 800)
# Равновесная температура (градС), обеспечивающая достижение ZCT при P=1атм
TR(1, XT) - 273 = 365.813
TR(10, XT) - 273 = 442.358
# Расчет теплового баланса
# Энтальпии образования веществ при 298К, кДж/моль
ΔHA := 91.28
ΔHB := 0
ΔHC := 34.13
# Энтальпия реакции, кДж
ΔH := 2*ΔHC - (2*ΔHA + ΔHB) = -114.3
# Удельный тепловой эффект кДж/моль компонента C
q := -ΔH/2 = 57.15
VNS := 12500/3600 = 3.47222  # м^3/с
# Тепловой поток на выходе из реактора
QK(P, X) := VNS*W(X)/22.4*1000*CpK(X)*(TR(P, X) - 17 - 273)
QK(1, XT) = 1558175  # Дж/c
QK(10, XT) = 1900109  # Дж/c
QR(X) := -ΔH/2*1000*VNS*1000/22.4*ZNA*X
QR(XT) = 604927
QTO(X) := -QR(X)*0.75
QTO(XT) = -453695
# Тепловой поток на входе в реактор
QN(P, X) := (QK(P, X) - QR(X) - QTO(X))/(1 - 0.02)
Дж/с
QN(10, XT) = 1784569  # Дж/с
QN(1, XT) = 1435656
# Температура на входе в реактор (градС)
TN(P, X) := QN(P, X)*22.4/(VNS*1000*CpN)
TN(1, XT) = 315.914
TN(10, XT) = 392.691
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P := root(TN(P, XT) - 350, P, 1, 10) = 2.96514
