"ЗАДАНИЕ 2.1 РАСЧЕТ РАВНОВЕСНОГО СОС ТАВА ЕДИНИЧНОЙ РЕАКЦИИ"
# С7Н16 + 7H2O = 7CO + 15H2
# Власов Михаил гр 124
# вариант 19-7
# Исходные данные
ZN(C7H16) := 0.09
ZN(H2O) := 0.85
ZN(CO) := 0.05
ZN(H2) := 0.01
# 1. Диапазон изменения температуры 573-773 K (573-873)
# 2. Диапазон изменения давления 1-1.2 (атм)
# 3. ZDT=70%
# 4.Kp=10^(-4312/T+1.15)
# 5.Расход смеси 800 м3/ч
# 6.Для компенсации теплового эффекта 65%
# 7. Потери в окружающую среду 4% от величины теплового потока на входе в реактор.
# 8.Принять температуру на выходе из реактора отличающейся от равновесной на 15 С
# 9. Термодинамические характеристики веществ:
# Энтальпия образования веществ при 298К, кДж/моль
# ΔΗ(C7H16) =-187.62; ΔΗ(H2O) =-241.83; ΔΗ(CO) = -110.53; ΔH(H2) = 0
# Молярная изобарная теплоёмкость, Дж/(моль*К)
# Ср(C7H16) = 165.18; Ср(H2O) = 33.60; Ср(CO) =29.14; Ср(H2) = 28.84
# Максимальная температура увеличена на 100 K
Решение
ZNA := 0.09
ZNB := 0.85
ZNC := 0.05
ZND := 0.01
# Температурная зависимость константы равновесия
KP(T) := 10^(-4312/T + 1.15)
# Коэффициент изменения объёма
W(X) := 1 + 14*ZNA*X
ZEA(X) := ZNA*(1 - X)/W(X)
ZEB(X) := (ZNB - 7*ZNA*X)/W(X)
ZEC(X) := (ZNC + 7*ZNA*X)/W(X)
ZED(X) := (ZND + 15*ZNA*X)/W(X)
# Расчет максимальной концентрации целевого продукта
ZDMAX := ZED(1) = 0.60177
# Расчет требуемой концентрации целевого продукта
ZDT := 0.7*ZDMAX = 0.421239
# Расчет требуемой степени превращения
XT := root(ZED(X) - ZDT, X, 0, 1) = 0.501981
CpA := 165.18
CpB := 33.60
CpC := 29.14
CpD := 28.84
CpN := CpA*ZNA + CpB*ZNB + CpC*ZNC + CpD*ZND = 45.1716
CpK(X) := CpA*ZEA(X) + CpB*ZEB(X) + CpC*ZEC(X) + CpD*ZED(X)
CpK(XT) = 34.207
# Уравнение целевой функции равновесия для решения трансцендетного алгебраического уравнения позволяет рассчитать XEA ключевого компонента в диапазоне изменения от XMIN до 1.
EQ(X, T, P) := KP(T)*ZEA(X)^1*ZEB(X)^7*P^-14 - ZEC(X)^7*ZED(X)^15
XMIN := -1/15*ZND/ZNA = -0.00740741
XEA(T, P) := root(EQ(X, T, P), X, XMIN, 1)
# Максимальная температура была увелиена на 100 K
i := 0 .. 10
T[i] := 573 + 30*i
j := 0 .. 2
P[j] := 1 + 0.1*j
XEA[i, j] := XEA(T[i], P[j])
XEA[10, j] = [0.58654; 0.550199; 0.520027]
XEA[i, 0] = [0.440492; 0.459382; 0.477335; 0.494253; 0.510041; 0.524812; 0.538361; 0.550872; 0.564089; 0.575641; 0.58654]
ZEA[i, j] := ZEA(XEA[i, j])
ZEB[i, j] := ZEB(XEA[i, j])
ZEC[i, j] := ZEC(XEA[i, j])
ZED[i, j] := ZED(XEA[i, j])
ZED[i, 0] = [0.388847; 0.399137; 0.408633; 0.417339; 0.425261; 0.4325; 0.438999; 0.444884; 0.450983; 0.456218; 0.461076]
ZEA[i, 0] = [0.0323827; 0.0308177; 0.0293734; 0.0280493; 0.0268446; 0.0257436; 0.0247552; 0.0238602; 0.0229326; 0.0221365; 0.0213976]
KP(T) = [4.214e-7; 9.97902e-7; 2.17768e-6; 4.42822e-6; 8.46794e-6; 1.53448e-5; 2.65199e-5; 4.39517e-5; 7.01757e-5; 0.000108376; 0.000162446]
T = [573; 603; 633; 663; 693; 723; 753; 783; 813; 843; 873]
ZEB[i, 0] = [0.368156; 0.355068; 0.34299; 0.331917; 0.321842; 0.312635; 0.304368; 0.296884; 0.289126; 0.282469; 0.27629]
ZEC[i, 0] = [0.210615; 0.214977; 0.219003; 0.222694; 0.226053; 0.229122; 0.231877; 0.234372; 0.236958; 0.239177; 0.241237]
# Реакция эндотермическая
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ZED[10, j] = [0.461076; 0.44457; 0.430173]
ZEA[10, j] = [0.0213976; 0.0239079; 0.0260976]
ZEB[10, j] = [0.27629; 0.297283; 0.315595]
ZEC[10, j] = [0.241237; 0.234239; 0.228135]
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# Расчет равновесной температуры
TR(P, X) := root(EQ(X, T, P), T, 600, 900)
# Равновесная температура (градС), обеспечивающая достижение ZDT при P=1атм
TR(1, XT) - 273 = 404.388
TR(1.2, XT) - 273 = 547.226
# Расчет теплового баланса
# Энтальпии образования веществ при 298К, кДж/моль
ΔHA := -187.62
ΔHB := -241.83
ΔHC := -110.53
ΔHD := 0
# Энтальпия реакции, кДж
ΔH := 15*ΔHD + 7*ΔHC - ΔHA - 7*ΔHB = 1106.72
q := -ΔH/15 = -73.7813
VNS := 800/3600 = 0.222222  # м^3/с
# Тепловой поток на выходе из реактора
QK(P, X) := VNS*W(X)/22.4*1000*CpK(X)*(TR(P, X) - 15 - 273)
QK(1, XT) = 215719  # Дж/c
QK(1.2, XT) = 294850  # Дж/c
QR(X) := -ΔH/15*1000*VNS*1000/22.4*ZNA*X*15
QR(XT) = -496029
QTO(X) := -QR(X)*0.65
QTO(XT) = 322419
# Тепловой поток на входе в реактор
QN(P, X) := (QK(P, X) - QR(X) - QTO(X))/(1 - 0.04)
QN(1, XT) = 405551  # Дж/c
QN(1.2, XT) = 487980  # Дж/c
# Температура на входе в реактор (градС)
TN(P, X) := QN(P, X)*22.4/(VNS*1000*CpN)
TN(1, XT) = 904.984
TN(1.2, XT) = 1088.92
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P := root(TN(P, XT) - 1000, P, 1, 1.2) = 1.10831
# Может ли производительность быть достигнута при P=1.2 атм, и 600 град C?
XEA(T, P) := root(EQ(X, T, P), X, XMIN, 1)
ZED(X) := (ZND + 15*ZNA*X)/W(X)
XT := root(ZED(X) - ZDT, X, 0, 1) = 0.501981
ZDT := 0.7*ZDMAX = 0.421239
nX := XEA(600 + 273, 1.2) = 0.520027
ZED(nX) = 0.430173
nX2 := XEA(547 + 273, 1.2) = 0.501269
ZED(nX2) = 0.420884
# Нет, при исходных условиях, при P = 1.2 атм и температуре не равной 547 град C нельзя получить необходимую производительность
