# ЗАДАНИЕ 3. РАСЧЕТЫ НА ОСНОВЕ ФОРМАЛЬНЫХ КИНЕТИЧЕСКИХ УРАВНЕНИЙ
# Построить зваисимость и проанализировать влияние управляющих параметров на наблюдаемую скорость реакции
# A+3B=C+D
# Акетов Александр группа 124
# вариант 20
# ZNA=0,3
# ZNB=0,65
# ZNC=0
# ZND=0
# ZNI=0,15
#
# K01=1,21*10^9
# E1=85000
# K02=1,56*10^5
# E2=45000
#
# P1=1
# P2=1,5
# X1=0,5
# X2=0,6
# Ввод начальных мольных долей компонентов исходной смеси
ZNA := 0.3
ZNB := 0.65
ZNI := 0.15
# Уравнение Аррениуса для прямой реакции
K1(T) := 1.21*10^9*e^(-85000/(8.31*T))
# Уравнение Аррениуса для обратной реакции
K2(T) := 1.56*10^5*e^(-45000/(8.31*T))
W(X) := 1 - 2*ZNA*X
ZEA(X) := ZNA*(1 - X)/W(X)
ZEB(X) := (ZNB - 3*ZNA*X)/W(X)
ZEC(X) := ZNA*X/W(X)
ZED(X) := ZNA*X/W(X)
# Уравнение для расчета скорости прямой реакции
U1(T, P, X) := K1(T)*ZEA(X)*ZEB(X)^3*P^4
# Уравнение для расчета скорости обратной реакции
U2(T, P, X) := K2(T)*ZEC(X)*ZED(X)*P^2
U(T, P, X) := U1(T, P, X) - U2(T, P, X)
i := 0 .. 90
j := 0 .. 1
q := 0 .. 1
T[i] := 300 + 10*i
P[j] := 1 + 0.5*j
X[q] := 0.5 + 0.1*q
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# Зависимость скорости реакции от температуры
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# Так как реакция эндотермическая, расчитываем только равновесную температуру
TR(P, X) := root(U(T, P, X), T, 600, 1100)
TR(1, 0.5) = 714.332
TR(1.5, 0.5) = 637.601
TR(1, 0.6) = 1061.09
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T[65] = 950
T[70] = 1000
# Зависимость скорости реакции от степени превращения
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