# ЗАДАНИЕ 3. РАСЧЕТЫ НА ОСНОВЕ ФОРМАЛЬНЫХ КИНЕТИЧЕСКИХ УРАВНЕНИЙ
# Построить зваисимость и проанализировать влияние управляющих параметров на наблюдаемую скорость реакции
# 2A=C+D
# Леготин Андрей
# группа 124
# серия 2 вариант 9
# ZNA=0,3
# ZNC=0
# ZND=0
# ZNI=0,7
#
# K01=1,44*10^12
# E1=125000
# K02=1,36*10^5
# E2=45000
#
# P1=1
# P2=1,5
# X1=0,5
# X2=0,6
# Ввод начальных мольных долей компонентов исходной смеси
ZNA := 0.3
ZNI := 0.7
ZNC := 0
ZND := 0
# Уравнение Аррениуса для прямой реакции
K1(T) := 1.44*10^12*e^(-125000/(8.31*T))
# Уравнение Аррениуса для обратной реакции
K2(T) := 1.36*10^5*e^(-45000/(8.31*T))
W(X) := 1
ZEA(X) := ZNA*(1 - X)
ZEC(X) := 1/2*ZNA*X
ZED(X) := 1/2*ZNA*X
# Уравнение для расчета скорости прямой реакции
U1(T, P, X) := K1(T)*ZEA(X)^2*P^2
# Уравнение для расчета скорости обратной реакции
U2(T, P, X) := K2(T)*ZEC(X)*ZED(X)*P^2
# Уравнение для расчета наблюдаемой скорости реакции, записанное по законам формальной кинетики
U(T, P, X) := U1(T, P, X) - U2(T, P, X)
root(U(T, 1, 0.5), T, 300, 1000) = 548.184
i := 0 .. 60
j := 0 .. 1
q := 0 .. 1
T[i] := 300 + 5*i
P[j] := 1 + 0.5*j
X[q] := 0.5 + 0.1*q
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# Зависимость скорости реакции от температуры
# Так как реакция эндотермическая, расчитываем только равновесную температуру
TR(P, X) := root(U(T, P, X), T, 300, 1000)
TR(1, 0.5) = 548.184
TR(1.5, 0.5) = 548.184
TR(1, 0.6) = 574.722
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# Зависимость скорости реакции от давления
T[55] = 575
T[60] = 600
# Зависимость скорости реакции от степени превращения
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