# ЗАДАНИЕ 3. РАСЧЕТЫ НА ОСНОВЕ ФОРМАЛЬНЫХ КИНЕТИЧЕСКИХ УРАВНЕНИЙ
# Построить зваисимость и проанализировать влияние управляющих параметров на наблюдаемую скорость реакции
# A+B=2C
# Леготин Андрей
# группа 124
# серия 2 вариант 9
# ZNA=0,3
# ZNB=0,5
# ZNC=0
# ZNI=0,2
#
# K01=1,16*10^5
# E1=47000
# K02=1,65*10^10
# E2=132000
#
# P1=1
# P2=1,5
# X1=0,5
# X2=0,6
# Ввод начальных мольных долей компонентов исходной смеси
ZNA := 0.3
ZNB := 0.5
ZNC := 0
ZNI := 0.2
# Уравнение Аррениуса для прямой реакции
K1(T) := 1.16*10^5*e^(-47000/(8.31*T))
# Уравнение Аррениуса для обратной реакции
K2(T) := 1.65*10^10*e^(-132000/(8.31*T))
W(X) := 1
ZEA(X) := ZNA*(1 - X)
ZEB(X) := ZNB - ZNA*X
ZEC(X) := 2*ZNA*X
# Уравнение для расчета скорости прямой реакции
U1(T, P, X) := K1(T)*ZEA(X)*ZEB(X)*P^2
# Уравнение для расчета скорости обратной реакции
U2(T, P, X) := K2(T)*ZEC(X)^2*P^2
# Уравнение для расчета наблюдаемой скорости реакции, записанное по законам формальной кинетики
U(T, P, X) := U1(T, P, X) - U2(T, P, X)
root(U(T, 1, 0.5), T, 300, 1000) = 824.606
i := 0 .. 60
j := 0 .. 1
q := 0 .. 1
T[i] := 300 + 10*i
P[j] := 1 + 0.5*j
X[q] := 0.5 + 0.1*q
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# Зависимость скорости реакции от температуры
TOPT(P, X) := root(d/dT(U(T, P, X)), T, 400, 1000)
TR(P, X) := root(U(T, P, X), T, 400, 1000)
TR(1, 0.5) = 824.606
TOPT(1, 0.5) = 761.233
TR(1.5, 0.5) = 824.606
TOPT(1.5, 0.5) = 761.233
TR(1, 0.6) = 781.906
TOPT(1, 0.6) = 724.699
# Зависимость скорости реакции от давления
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# Зависимость скорости реакции от степени превращения
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