# Задание 2.1 Рассчет равновесного состава единичной реакции
# Конради Дарья 124 гр.
# 2CO+ 2H2= CH3COOH | Вариант 15-7
# Исходные данные:
#
# ZN(CO) = 0,15
# ZN(H2) = 0.6
# ZN(CH3COOH) = 0
# ZN(N2) = 0,25
# VNS = 22500
# ZCT = 70
# 1. Диапазон изменения температуры 400-870 К
# 2. Диапазон изменения давления 1-5 (атм)
# 3. ZCT = 70
# 4. Kp = 10^(3408/T -3.87)
# 5. Расход смеси 22500 м3/ч
# 6. Доля компенсации теплового эффекта 85%
# 7. Потери в окружающую среду 5% от величины теплового потока на входе в реактор
# 8. Принять температуру на выходе из реактора отличающейся от равновесной на 12 С
# 9. Термодинамические характеристики веществ:
# Энтальпия образования веществ при 298К, кДж/моль
# ΔΗ(CO) = -110.53; ΔΗ(H2) = 0.00; ΔΗ(CH3COOH) = -432.25
# Молярная изобарная теплоёмкость, Дж/(моль*К)
# Ср(СO) = 29.14; Ср(H2) = 28.84; Ср(CH3COOH) = 63.44; Ср(N2) = 29,12
# Решение
ZNA := 0.15
ZNC := 0
ZNI := 0.25
ZNB := 0.6
# Температурная зависимость константы равновесия
KP(T) := 10^(3408/T - 3.87)
# Коэффициент изменения объёма
W(X) := 1 - 3/2*ZNA*X
ZEA(X) := ZNA*(1 - X)/W(X)
ZEB(X) := (ZNB - 1*ZNA*X)/W(X)
ZEC(X) := (ZNC + 1/2*ZNA*X)/W(X)
ZEI(X) := ZNI/W(X)
# Расчет максимальной концентрации целевого продукта
ZCMAX := ZEC(1) = 0.0967742
# Расчет требуемой концентрации целевого продукта
ZCT := 0.7*ZCMAX = 0.0677419
# Расчет требуемой степени превращения
XT := root(ZEC(X) - ZCT, X, 0, 1) = 0.750672
CpA := 29.14
CpB := 28.84
CpC := 63.44
CpI := 29.12  # Дж/(моль*К)
CpN := CpA*ZNA + CpB*ZNB + CpC*ZNC + CpI*ZNI = 28.955
CpK(X) := CpA*ZEA(X) + CpB*ZEB(X) + CpC*ZEC(X) + CpI*ZEI(X)
CpK(XT) = 31.2816
# Уравнение целевой функции равновесия для решения трансцендетного алгебраического уравнения позволяет рассчитать XEA ключевого компонента в диапазоне изменения от XMIN до 1.
EQ(X, T, P) := KP(T)*ZEA(X)^2*ZEB(X)^2*P^3 - ZEC(X)
XMIN := -1/2*ZNC/ZNA = 0
# Расчет равновесной степени превращения
XEA(T, P) := root(EQ(X, T, P), X, XMIN, 1)
(870 - 420)/100 = 4.5
i := 0 .. 10
T[i] := 423 + 50*i  # максимальную рекомендованную температуру следует увеличить на 50 К
j := 0 .. 4
P[j] := 1 + 1*j
XEA[i, j] := XEA(T[i], P[j])
ZEC[i, j] := ZEC(XEA[i, j])
ZEA[i, j] := ZEA(XEA[i, j])
ZEB[i, j] := ZEB(XEA[i, j])
ZEI[i, j] := ZEI(XEA[i, j])
XEA[i, 0] = [0.977873; 0.941895; 0.875369; 0.772386; 0.637096; 0.486387; 0.344486; 0.230432; 0.149649; 0.0968574; 0.0636071]
KP(T) = [15372.3; 2163.09; 442.846; 119.576; 39.8387; 15.6276; 6.97739; 3.45778; 1.86616; 1.08089; 0.664213]
# Реакция экзотермическая
# Равновесие смещается в сторону исходных веществ
XEA[i, 4] = [0.998005; 0.994688; 0.98829; 0.977563; 0.961387; 0.938935; 0.909776; 0.873932; 0.831871; 0.78446; 0.732883]
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# Расчет равновесной температуры
TR(P, X) := root(EQ(X, T, P), T, 423, 923)
# Равновесная температура (градС), обеспечивающая достижение ZCT при P=1атм
TR(1, XT) - 273 = 308.771
TR(5, XT) - 273 = 633.126
# Расчет теплового баланса
# Энтальпии образования веществ при 298К, кДж/моль
ΔHA := -110.53
ΔHB := 0.00
ΔHC := -432.25
# Энтальпия реакции, кДж
ΔH := ΔHC - 2*ΔHA - 2*ΔHB = -211.19
# Удельный тепловой эффект кДж/моль компонента B
q := -ΔH = 211.19
VNS := 22500/3600 = 6.25  # м^3/с
# Тепловой поток на выходе из реактора | Дж/с
QK(P, X) := VNS*W(X)/22.4*1000*CpK(X)*(TR(P, X) - 12 - 273)
QK(1, XT) = 2152757
QK(5, XT) = 4505609
QR(X) := -ΔH/1*1000*VNS*1000/22.4*ZNA*X
QR(XT) = 6635091
QTO(X) := -QR(X)*0.7
QTO(XT) = -4644564
# Тепловой поток на входе в реактор | Дж/с
QN(P, X) := (QK(P, X) - QR(X) - QTO(X))/(1 - 0.05)
QN(1, XT) = 170768
QN(5, XT) = 2647454
TN(P, X) := QN(P, X)*22.4/(VNS*1000*CpN)
# Температура на входе в реактор (градС)
TN(1, XT) = 21.1374
TN(5, XT) = 327.697
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P := root(TN(P, XT) - 200, P, 1, 5) = 3.01495
