# Л1 Леготин Андрей Алексаедрович гр 124
# Блок 9.1 Дегидрирование изопропилового спирта
# i-C3H7OH=C3H6O+H2(N2)
# Условия:
# T = 150-400°C
# P = 1-10 атм
# Исходные данные:
T := 150 .. 400
P := 1 .. 10
ZNA := 0.2
ZNC := 0.01
ZND := 0.01
ZNI := 1 - ZNA - ZNC - ZND = 0.78
ΔHA := -275.4
ΔHC := -216.4
ΔHD := 0  # при 298К
ΔH1 := 1000*(ΔHC + ΔHD - ΔHA) = 59000  # реакция эндотермическая
CpA := 89.32
CpC := 74.9
CpD := 28.84
CpI := 29.12
CpN := CpA*ZNA + CpC*ZNC + CpD*ZND + CpI*ZNI = 41.615
T(T0, X) := T0 + (-ΔH1/CpN*ZNA*X)
K(T0, X) := 10^8.1*e^(-82000/(8.31*T(T0, X)))
VNS := 28000
VRC := 3662
# Находим коэффициент изменения объема:
W(X) := 1 + (1 + 1 - 1)/1*ZNA*X
ZEI(X) := ZNI/W(X)
ZEA(X) := ZNA*(1 - X)/W(X)
ZEC(X) := (ZNC + ZNA*X)/W(X)
ZED(X) := (ZND + ZNA*X)/W(X)
# Находим парциальные давления:
PA(X, P) := ZEA(X)*P
PC(X, P) := ZEC(X)*P
PD(X, P) := ZED(X)*P
# Коэффициенты полиновмов для расчета приведенной энергии Гиббса
# i-C3H7OH | C3H6O | H2
fA1 := 160.64
fC1 := 224
fD1 := 225.6
fA2 := -2.15
fC2 := 10.38
fD2 := 36.31
fA3 := 0.00124
fC3 := 0.0019
fD3 := -0.00132
fA4 := -0.5764
fC4 := -0.754
fD4 := 0.25
fA5 := 1444
fC5 := 941
fD5 := -103
fA6 := -3883
fC6 := -1664
fD6 := 335
fA7 := 2363
fC7 := 1700
fD7 := -446
θ(T) := T/10000
FA(T0, X) := fA1 + fA2*ln(θ(T(T0, X))) + fA3*θ(T(T0, X))^-2 + fA4*θ(T(T0, X))^-1 + fA5*θ(T(T0, X)) + fA6*θ(T(T0, X))^2 + fA7*θ(T(T0, X))^3
FC(T0, X) := fC1 + fC2*ln(θ(T(T0, X))) + fC3*θ(T(T0, X))^-2 + fC4*θ(T(T0, X))^-1 + fC5*θ(T(T0, X)) + fC6*θ(T(T0, X))^2 + fC7*θ(T(T0, X))^3
FD(T0, X) := fD1 + fD2*ln(θ(T(T0, X))) + fD3*θ(T(T0, X))^-2 + fD4*θ(T(T0, X))^-1 + fD5*θ(T(T0, X)) + fD6*θ(T(T0, X))^2 + fD7*θ(T(T0, X))^3
ΔF(T0, X) := FC(T0, X) + FD(T0, X) - FA(T0, X)
# Находим константу равновесия:
ΔHA := -265.8
ΔHC := -201.2
ΔHD := 0  # при 0К
ΔH := 1000*(ΔHC + ΔHD - ΔHA) = 64600
Kp(T0, X) := e^(ΔF(T0, X)/8.31 - ΔH/(8.31*T(T0, X)))
U(T0, P, X) := K(T0, X)*PA(X, P)*(1 - PC(X, P)*PD(X, P)/(Kp(T0, X)*PA(X, P)))
VNS := 28000/3600
P := 1
VRC := 3662/3600
# Рассчитываем равновесную степень превращения
XE(T0) := root(U(T0, P, X), X, 0.0001, 0.9999)
# Рассчитываем требуемую степень превращения
XT := root(VRC - VNS*(ZEC(X) - ZNC), X, 0, 1) = 0.761078
# Рассчитываем равновесную температуру
TR0 := root(U(T0, P, XT), T0, 500, 1500) = 726.327
J := trunc(1500 - TR0) = 773
j := 0 .. J
T0[j] := TR0 + 1*j
# Выбираем рабочие температуры
# 760 и 800 К
T01 := 760
T02 := 800
# Диапазон изменения степени превращения
i := 0 .. XE(T01)*1000
XE(T01) = 0.830915
q := 0 .. XE(T02)*1000
XE(T02) = 0.90126
XK1[i] := 0.001*i
XK2[q] := 0.001*q
# Объём РПС, м^3
VRPS1[i] := VNS/1*ZNA*XK1[i]/U(T01, P, XK1[i])
VRPS2[q] := VNS/1*ZNA*XK2[q]/U(T02, P, XK2[q])
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# Производительность по основному продукту, м^3/с
VRC1[i] := VNS*(ZEC(XK1[i]) - ZNC)
VRC2[q] := VNS*(ZEC(XK2[q]) - ZNC)
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# ОбъёмыРПС, обеспечивающиезаданнуюпроизводительность
VRPS1[761] = 24.6004
VRPS2[761] = 5.39517
# Объем РИВ
VRIV1[i] := VNS/1*ZNA*integral(1/U(T01, P, X), X = 0 .. XK1[i])
VRIV2[q] := VNS/1*ZNA*integral(1/U(T02, P, X), X = 0 .. XK2[q])
# Производительность по основному продукту, м^3/с
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# Объёмы РИВ, обеспечивающие заданную производительность
VRIV1[761] = 2.16389
VRIV2[761] = 0.620843
# Температура на выходе из реактора
T1[j, i] := T(T0[j], XK1[i])
T2[j, q] := T(T0[j], XK2[q])
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# Зависимость объема реактора от Tвх
VRPS[761, j] := VNS/1*ZNA*XK1[761]/U(T0[j], P, XK1[761])
VRIV[761, j] := VNS/1*ZNA*integral(1/U(T0[j], P, X), X = 0 .. XK1[761])
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