# Л4 Леготин Андрей Алексаедрович гр 124
# Блок 9.1 Дегидрирование изопропилового спирта
# i-C3H7OH=C3H6O+H2(N2)
# Условия:
# T = 150-400°C
# P = 1-10 атм
# Исходные данные:
T := 150 .. 400
P := 1 .. 10
ZNA := 0.2
ZNC := 0.01
ZND := 0.01
ZNI := 1 - ZNA - ZNC - ZND = 0.78
ΔHA := -275.4
ΔHC := -216.4
ΔHD := 0  # при 298К
ΔH[298] := 1000*(ΔHC + ΔHD - ΔHA) = 59000  # реакция эндотермическая
CpA := 89.32
CpC := 74.9
CpD := 28.84
CpI := 29.12
CpN := CpA*ZNA + CpC*ZNC + CpD*ZND + CpI*ZNI = 41.615
λ := -ΔH[298]/CpN*ZNA = -283.552
T(T0, λ, X) := T0 + λ*X
K(T0, λ, X) := 10^8.1*exp(-82000/(8.31*T(T0, λ, X)))
VNS := 28000
VRC := 3662
# Находим коэффициент изменения объема:
W(X) := 1 + (1 + 1 - 1)/1*ZNA*X
ZEA(X) := ZNA*(1 - X)/W(X)
ZEC(X) := (ZNC + ZNA*X)/W(X)
ZED(X) := (ZND + ZNA*X)/W(X)
ZEI(X) := ZNI/W(X)
# Находим парциальные давления:
PA(X, P) := ZEA(X)*P
PC(X, P) := ZEC(X)*P
PD(X, P) := ZED(X)*P
# Коэффициенты полиновмов для расчета приведенной энергии Гиббса
# i-C3H7OH | C3H6O | H2
fA1 := 160.64
fC1 := 224
fD1 := 225.6
fA2 := -2.15
fC2 := 10.38
fD2 := 36.31
fA3 := 0.00124
fC3 := 0.0019
fD3 := -0.00132  # λ
fA4 := -0.5764
fC4 := -0.754
fD4 := 0.25
fA5 := 1444
fC5 := 941
fD5 := -103
fA6 := -3883
fC6 := -1664
fD6 := 335
fA7 := 2363
fC7 := 1700
fD7 := -446
θ(T) := T/10000
FA(T0, λ, X) := fA1 + fA2*ln(θ(T(T0, λ, X))) + fA3*θ(T(T0, λ, X))^-2 + fA4*θ(T(T0, λ, X))^-1 + fA5*θ(T(T0, λ, X)) + fA6*θ(T(T0, λ, X))^2 + fA7*θ(T(T0, λ, X))^3
FC(T0, λ, X) := fC1 + fC2*ln(θ(T(T0, λ, X))) + fC3*θ(T(T0, λ, X))^-2 + fC4*θ(T(T0, λ, X))^-1 + fC5*θ(T(T0, λ, X)) + fC6*θ(T(T0, λ, X))^2 + fC7*θ(T(T0, λ, X))^3
FD(T0, λ, X) := fD1 + fD2*ln(θ(T(T0, λ, X))) + fD3*θ(T(T0, λ, X))^-2 + fD4*θ(T(T0, λ, X))^-1 + fD5*θ(T(T0, λ, X)) + fD6*θ(T(T0, λ, X))^2 + fD7*θ(T(T0, λ, X))^3
ΔF(T0, λ, X) := FC(T0, λ, X) + FD(T0, λ, X) - FA(T0, λ, X)
# Находим константу равновесия:
ΔHA := -265.8
ΔHC := -201.2
ΔHD := 0  # при 0К
ΔH[0] := 1000*(ΔHC + ΔHD - ΔHA) = 64600  # реакция эндотермическая
Kp(T0, λ, X) := exp(ΔF(T0, λ, X)/8.31 - ΔH[0]/(8.31*T(T0, λ, X)))
U(T0, λ, P, X) := K(T0, λ, X)*PA(X, P)*(1 - PC(X, P)*PD(X, P)/(Kp(T0, λ, X)*PA(X, P)))
VNS := 28000/3600
VRC := 3662/3600
P := 1
j := 0 .. 9
T0[j] := 273 + 150 + 25*j
# Рассчитываем равновесную степень превращения
XE(T0, λ) := root(U(T0, λ, 1, X), X, 0.00001, 0.9999)
# Рассчитываем требуемую степень превращения
XT := root(VRC - VNS*(ZEC(X) - ZNC), X, 0, 1) = 0.761078
xt := round(XT*1000) = 761
# Рассчитываем равновесную температуру, К при разных условиях теплообмена
# 1- компенсация 25%
# 2- компенсация 50%
# 3 - компенсация 75%
TR01 := root(U(T0, λ*0.75, P, XT), T0, 300, 1500) = 672.376
TR02 := root(U(T0, λ*0.5, P, XT), T0, 300, 1500) = 618.424
TR03 := root(U(T0, λ*0.25, P, XT), T0, 300, 1500) = 564.474
# Выбираем температуру  700 К
T1 := 700  # 75%
# 25% | 50%
g := 0 .. XE(T1, λ*0.25)*1000
i := 0 .. XE(T1, λ*0.75)*1000
q := 0 .. XE(T1, λ*0.5)*1000
XE(T1, λ*0.25) = 0.989974
XE(T1, λ*0.75) = 0.82836
XE(T1, λ*0.5) = 0.945607
XK3[g] := 0.001*g
XK1[i] := 0.001*i
XK2[q] := 0.001*q
VRPS1[i] := VNS/1*ZNA*XK1[i]/U(T1, λ*0.75, P, XK1[i])
VRPS2[q] := VNS/1*ZNA*XK2[q]/U(T1, λ*0.5, P, XK2[q])
VRPS3[g] := VNS/1*ZNA*XK3[g]/U(T1, λ*0.25, P, XK3[g])
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VRC1[i] := VNS*(ZEC(XK1[i]) - ZNC)
VRC2[q] := VNS*(ZEC(XK2[q]) - ZNC)
VRC3[g] := VNS*(ZEC(XK3[g]) - ZNC)
VRIV1[i] := VNS/1*ZNA*integral(1/U(T1, λ*0.75, P, X), X = 0 .. XK1[i])
VRIV3[g] := VNS/1*ZNA*integral(1/U(T1, λ*0.25, P, X), X = 0 .. XK3[g])
VRIV2[q] := VNS/1*ZNA*integral(1/U(T1, λ*0.5, P, X), X = 0 .. XK2[q])
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# Объёмы РПС, обеспечивающие заданную производительность
VRPS1[xt] = 33.5067
VRPS2[xt] = 4.22298
VRPS3[xt] = 0.991835
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# Объёмы РИВ, обеспечивающие заданную производительность
VRIV1[xt] = 3.32995
VRIV2[xt] = 0.778346
VRIV3[xt] = 0.279872
# Температуры на выходе из реактора
T(T1, λ*0.75, XT) = 538.146
T(T1, λ*0.5, XT) = 592.098
T(T1, λ*0.25, XT) = 646.049
# Влияние % компенсации на температуру и объемы реакторов
# При условиях: T=500 K, P = 1 атм.
# Компенсируем от 13 до 100% теплового эффекта
λh := 13 .. 90
k[λh] := (100 - λh)/100
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VRPS[λh] := VNS/1*ZNA*XT/U(T1, λ*k[λh], P, XT)
VRIV[λh] := VNS/1*ZNA*integral(1/U(T1, λ*k[λh], P, X), X = 0 .. XT)
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VRPS[25] = 33.562
VRIV[25] = 3.33337
XT = 0.761078
VRPS1[xt] = 33.5067
VRIV1[xt] = 3.32995
xt = 761
