# Л5 Леготин Андрей Алексаедрович гр 124
# Блок 9.1 Дегидрирование изопропилового спирта
# i-C3H7OH=C3H6O+H2(N2)
# Условия:
# T = 150-400°C
# P = 1-10 атм
# Исходные данные:
t1 := 150
T1 := t1 + 273
t2 := 1000
T2 := t2 + 273
T := t1, t1 + 10 .. t2
P := 1 .. 10
ZNA := 0.2
ZNC := 0.01
ZND := 0.01
ZNI := 1 - ZNA - ZNC - ZND = 0.78
ΔHA := -265.8
ΔHC := -201.2
ΔHD := 0  # при 0К
ΔH[0] := 1000*(ΔHC + ΔHD - ΔHA) = 64600  # реакция эндотермическая
K(T) := 10^8.1*exp(-82000/(8.31*T))
VNS := 28000
VRC := 3662
# Находим коэффициент изменения объема:
W(X) := 1 + (1 + 1 - 1)/1*ZNA*X
ZEA(X) := ZNA*(1 - X)/W(X)
ZEC(X) := (ZNC + ZNA*X)/W(X)
ZED(X) := (ZND + ZNA*X)/W(X)
ZEI(X) := ZNI/W(X)
# Находим парциальные давления:
PA(X, P) := ZEA(X)*P
PC(X, P) := ZEC(X)*P
PD(X, P) := ZED(X)*P
# Коэффициенты полиновмов для расчета приведенной энергии Гиббса
# i-C3H7OH | C3H6O | H2
fA1 := 160.64
fC1 := 224
fD1 := 225.6
fA2 := -2.15
fC2 := 10.38
fD2 := 36.31
fA3 := 0.00124
fC3 := 0.0019
fD3 := -0.00132  # λ
fA4 := -0.5764
fC4 := -0.754
fD4 := 0.25
fA5 := 1444
fC5 := 941
fD5 := -103
fA6 := -3883
fC6 := -1664
fD6 := 335
fA7 := 2363
fC7 := 1700
fD7 := -446
θ(T) := T/10000
FA(T) := fA1 + fA2*ln(θ(T)) + fA3*θ(T)^-2 + fA4*θ(T)^-1 + fA5*θ(T) + fA6*θ(T)^2 + fA7*θ(T)^3
FC(T) := fC1 + fC2*ln(θ(T)) + fC3*θ(T)^-2 + fC4*θ(T)^-1 + fC5*θ(T) + fC6*θ(T)^2 + fC7*θ(T)^3
FD(T) := fD1 + fD2*ln(θ(T)) + fD3*θ(T)^-2 + fD4*θ(T)^-1 + fD5*θ(T) + fD6*θ(T)^2 + fD7*θ(T)^3
ΔF(T) := FC(T) + FD(T) - FA(T)
# Находим константу равновесия:
P := 1
Kp(T) := exp(ΔF(T)/8.31 - ΔH[0]/(8.31*T))
U(T, X) := K(T)*ZEA(X)*P*(1 - ZEC(X)*ZED(X)*P/(Kp(T)*ZEA(X)))
XT := root(VRC - VNS*(ZEC(X)*W(X) - ZNC), X, 0, 1) = 0.653929
XE(T) := root(U(T, X), X, 0.001, 0.999)
TR(X) := root(U(T, X), T, 150, 800)
X := 0.4, 0.41 .. 0.99
TR(XT) = 493.815
# Tmin задаем принудительно
Δ := 1.05
Tmin(X) := Δ*TR(X)
Tmax := 285 + 273
Umin(X) := U(Tmin(X), X)
Umax(X) := U(Tmax, X)
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CpA := 89.32
CpC := 74.9
CpD := 28.84
CpI := 29.12
CpN := CpA*ZNA + CpC*ZNC + CpD*ZND + CpI*ZNI = 41.615
ΔHA := -275.4
ΔHC := -216.4
ΔHD := 0
ΔH[298] := 1000*(ΔHC + ΔHD - ΔHA) = 59000  # при 298К
λ := -ΔH[298]/CpN*ZNA = -283.552
Tr(TN, XN, X) := TN + λ*(X - XN)
θ(TN, XN, X) := Tr(TN, XN, X)/10000
FA(TN, XN, X) := fA1 + fA2*ln(θ(TN, XN, X)) + fA3*θ(TN, XN, X)^-2 + fA4*θ(TN, XN, X)^-1 + fA5*θ(TN, XN, X) + fA6*θ(TN, XN, X)^2 + fA7*θ(TN, XN, X)^3
FC(TN, XN, X) := fC1 + fC2*ln(θ(TN, XN, X)) + fC3*θ(TN, XN, X)^-2 + fC4*θ(TN, XN, X)^-1 + fC5*θ(TN, XN, X) + fC6*θ(TN, XN, X)^2 + fC7*θ(TN, XN, X)^3
FD(TN, XN, X) := fD1 + fD2*ln(θ(TN, XN, X)) + fD3*θ(TN, XN, X)^-2 + fD4*θ(TN, XN, X)^-1 + fD5*θ(TN, XN, X) + fD6*θ(TN, XN, X)^2 + fD7*θ(TN, XN, X)^3
ΔF(TN, XN, X) := FC(TN, XN, X) + FD(TN, XN, X) - FA(TN, XN, X)
Kpr(TN, XN, X) := exp(ΔF(TN, XN, X)/8.31 - ΔH[0]/(8.31*Tr(TN, XN, X)))
Kr(TN, XN, X) := 10^8.1*exp(-82000/(8.31*Tr(TN, XN, X)))
Ur(TN, XN, X) := Kr(TN, XN, X)*ZEA(X)*P*(1 - ZEC(X)*ZED(X)*P/(Kpr(TN, XN, X)*ZEA(X)))
VNS := 28000/3600
VRC := 3662/3600
Vr(TN, XN, XK) := VNS/1*ZNA*integral(1/Ur(TN, XN, X), X = XN .. XK)
XK(TN, XN) := root(Tr(TN, XN, X) - Tmin(X), X, 0.001, 0.999)
# 1 полка
TN1 := Tmax
TN1 = 558
X1 := XK(TN1, 0)
X1 = 0.309455
TK1 := Tr(TN1, 0, X1)
TK1 = 470.253
Vr1 := Vr(TN1, 0, X1)
Vr1 = 10.945
Ur(TN1, 0, X1) = 0.00800407
# 2 полка
TN2 := Tmax
TN2 = 558
X2 := XK(TN2, X1)
X2 = 0.516582
TK2 := Tr(TN2, X1, X2)
TK2 = 499.269
Vr2 := Vr(TN2, X1, X2)
Vr2 = 4.92231
# 3 полка
TN3 := Tmax
TN3 = 558
X3 := XK(TN3, X2)
X3 = 0.655199
TK3 := Tr(TN3, X2, X3)
TK3 = 518.695
Vr3 := Vr(TN3, X2, X3)
Vr3 = 3.10486
xk := 1
x := 0, 0.002 .. xk
TR(x) :=
    Tr(TN1, 0, x) if x ≤ X1
    Tr(TN2, X1, x) if X1 ≤ x ≤ X2
    Tr(TN3, X2, x) if X2 ≤ x ≤ X3
ORIGIN := 1
i := 1 .. 3
VR[i] :=
    Vr1 if i == 1
    Vr2 if i == 2
    Vr3 if i == 3
VR = [10.945; 4.92231; 3.10486]
sum(VR[i], i) = 18.9721
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# [component: inputs VR]
VRC1 := VNS*(ZEC(X3)*W(X3) - ZNC)*3600 = 3669.11
VRC*3600 = 3662
