# Егоров Данила Владимирович
# гр 124
# Блок 8.1 Дегидрирование изобутана
# i-C4H10=i-C4H8+H2(N2)
# Условия проведения:
# T=450–700°C,
# P=0,5–5 атм
# Исходные даннне:
T := 450 .. 700
P := 0.5 .. 5
K(T) := 10^5.75*e^(-125500/(8.31*T))
ZNA := 0.2
ZNB := 0
ZNC := 0.01
ZND := 0.01
VNS := 24000
VRD := 3280
ZNI := 1 - (ZNA + ZNC + ZND) = 0.78
W(X) := 1 + ((1 + 1 - 1)/1)*ZNA*X
ZD(X) := (ZND + ZNA*X)/W(X)
ZA(X) := ZNA*(1 - X)/W(X)
ZC(X) := (ZNC + X*ZNA)/W(X)
ZI(X) := ZNI/W(X)
VNS := 24000
VRD := 3280
XT := root(VNS*(W(X)*ZD(X) - ZND) - VRD, X, 0, 1) = 0.683333
PA(X, P) := ZA(X)*P
PC(X, P) := ZC(X)*P
PD(X, P) := ZD(X)*P
# Коэффициенты полиномов для расчёта приведенной энергии Гиббса
i - C4H10
i - C4H8  # H2
fA1 := 137.0
fC1 := 207.6
fD1 := 225.5
fA2 := -15.60
fC2 := 1.805
fD2 := 36.31
fA3 := 0.00096
fC3 := 0.000845
fD3 := -0.00132
fA4 := -0.5862  # Дж/моль
fC4 := 1.3250
fD4 := 0.25
fA5 := 2195
fC5 := 1659.0
fD5 := -103
fA6 := -4186
fC6 := -2907.1
fD6 := 335
fA7 := 4677
fC7 := 3013.9
fD7 := -446
θ(T) := T/10000
ΔHD := 0
FA(T) := fA1 + fA2*ln(θ(T)) + fA3*θ(T)^-2 + fA4*θ(T)^-1 + fA5*θ(T) + fA6*θ(T)^2 + fA7*θ(T)^3
FC(T) := fC1 + fC2*ln(θ(T)) + fC3*θ(T)^-2 + fC4*θ(T)^-1 + fC5*θ(T) + fC6*θ(T)^2 + fC7*θ(T)^3
FD(T) := fD1 + fD2*ln(θ(T)) + fD3*θ(T)^-2 + fD4*θ(T)^-1 + fD5*θ(T) + fD6*θ(T)^2 + fD7*θ(T)^3
ΔF(T) := FC(T) + FD(T) - FA(T)
ΔHA := -106.035
ΔHC := -10.8
ΔH := 1000*(ΔHC + ΔHD - ΔHA) = 95235
Kp(T) := e^(ΔF(T)/8.31 - ΔH/(8.31*T))
u(T, P, X) := K(T)*PA(X, P)/PC(X, P)^0.5*(1 - 1/Kp(T)*PC(X, P)*PD(X, P)/PA(X, P))
i := 0 .. 300
q := 0 .. 5
j := 0 .. 11
T[i] := 273 + 450 + 2*i
X[q] := 0.5 + 0.1*q
P[j] := 0.5 + 0.5*j
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TR(P, X) := root(u(T, P, X), T, 100, 1000)
TR(0.5, 0.6) - 273 = 294.576
TR(0.5, 0.7) - 273 = 311.747
TR(5, 0.6) - 273 = 372.961
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