# Егоров Данила Владимирович
# гр 124
# Блок 8.1 Дегидрирование изобутана
# i-C4H10=i-C4H8+H2(N2)
# Условия проведения:
# T=450–700°C,
# P=0,5–5 атм
# Исходные данные:
T := 450 .. 700
K(T) := 10^5.75*e^(-125500/(8.31*T))
P := 0.5 .. 5
ZNA := 0.2
ZNB := 0
ZNC := 0.01
ZND := 0.01
VNS := 24000
VRD := 3280
ZNI := 1 - (ZNA + ZNC + ZND) = 0.78
W(X) := 1 + ((1 + 1 - 1)/1)*ZNA*X
ZA(X) := ZNA*(1 - X)/W(X)
ZC(X) := (ZNC + X*ZNA)/W(X)
ZD(X) := (ZND + ZNA*X)/W(X)
PA(X, P) := ZA(X)*P
ZI(X) := ZNI/W(X)
PC(X, P) := ZC(X)*P
PD(X, P) := ZD(X)*P
# Коэффициенты полиномов для расчета приведенной энергии Гиббса
i - C4H10
i - C4H8  # H2
fA1 := 137.0
fC1 := 207.6
fD1 := 225.5
fA2 := -15.60
fC2 := 1.805
fD2 := 36.31
fA3 := 0.00096
fC3 := 0.000845
fD3 := -0.00132
fA4 := -0.5862
fC4 := 1.3250
fD4 := 0.25
fA5 := 2195
fC5 := 1659.0
fD5 := -103
fA6 := -4186
fC6 := -2907.1
fD6 := 335
fA7 := 4677
fC7 := 3013.9
fD7 := -446
FA(T) := fA1 + fA2*ln(T/10000) + fA3/(T/10000)^2 + fA4/(T/10000) + fA5*T/10000 + fA6*(T/10000)^2 + fA7*(T/10000)^3
FC(T) := fC1 + fC2*ln(T/10000) + fC3/(T/10000)^2 + fC4/(T/10000) + fC5*T/10000 + fC6*(T/10000)^2 + fC7*(T/10000)^3
FD(T) := fD1 + fD2*ln(T/10000) + fD3/(T/10000)^2 + fD4/(T/10000) + fD5*T/10000 + fD6*(T/10000)^2 + fD7*(T/10000)^3
DF(T) := 1*FC(T) + FD(T) - 1*FA(T)
DHA := -106.035
DHC := -10.80
DHD := 0
DH := 1000*(1*DHC + 1*DHD - 1*DHA) = 95235  # Дж/моль
Kp(T) := e^(DF(T)/8.31 - DH/(8.31*T))
u(T, P, X) := K(T)*PA(X, P)/PC(X, P)^0.5*(1 - 1/Kp(T)*PC(X, P)*PD(X, P)/PA(X, P))
TR(P, X) := root(u(T, P, X), T, 450, 1000)
TR(0.5, 0.6) = 567.576
TR(5, 0.6) = 645.961
TR(5, 0.8) = 695.644
# Максимально допустимая скорость газа в пересчёте
# на рабочие условия 2 м/с
#
# Максимально допустимый диаметр 5 м
#
# Для РИВ высота не менее 2.5 диаметров, но не более 30 м
# Для РПС высота не более 1.5 диаметров и не менее диаметра
j := 0 .. 9
VNS := 24000/3600
P := 5
T[j] := 273 + 300 + 25*j  # Требуемая производительность 3280 м3/ч
# Рассчитываем равновесную степень превращения
XE(T) := root(u(T, P, X), X, 0.00001, 0.9999)
# Рассчитываем требуемую степень превращения
XT := root(3280/3600 - VNS*(ZD(X) - ZND), X, 0, 1) = 0.800781
# Рассчитываем равновесную температуру, К
TR := root(u(T, P, XT), T, 300, 1000) = 695.895
# Выбираем рабочие температуры
# Для эндотермической реакции - больше равновесной
# Выбираем температуры  850 и 870К
i := 0 .. XE(980)*1000
XE(980) = 0.996785
q := 0 .. XE(1000)*1000
XE(1000) = 0.997418
XK1[i] := 0.001*i
XK2[q] := 0.001*q
VRPS1[i] := VNS/1*ZNA*XK1[i]/u(980, P, XK1[i])
VRPS2[q] := VNS/1*ZNA*XK2[q]/u(1000, P, XK2[q])
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VRC1[i] := VNS*(ZC(XK1[i]) - ZNC)
VRC2[q] := VNS*(ZC(XK2[q]) - ZNC)
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VRPS1[801] = 47.2566
VRPS2[801] = 34.6459
VRIV1[i] := VNS/1*ZNA*integral(1/u(980, P, X), X = 0 .. XK1[i])
VRIV2[q] := VNS/1*ZNA*integral(1/u(1000, P, X), X = 0 .. XK2[q])
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VRIV1[801] = 14.4452
VRIV2[801] = 10.6048
# Расчёт рабочей скорости газа
#
# РИВ  РПС
a := 0 .. 8
# Рассмвтриваем диаметр реактора в интервале от 1 м до 5 м
# с шагом 0,5 м
D[a] := 1 + 0.5*a
S[a] := 0.785*D[a]^2  # Площадь поперечного сечения реактора, м2
# Высота реактора
HRIV1[a] := VRIV1[801]/S[a]
HRIV2[a] := VRIV2[801]/S[a]
HRPS1[a] := VRPS1[801]/S[a]
HRPS2[a] := VRPS2[801]/S[a]
D = [1; 1.5; 2; 2.5; 3; 3.5; 4; 4.5; 5]
S = [0.785; 1.76625; 3.14; 4.90625; 7.065; 9.61625; 12.56; 15.8963; 19.625]
HRIV1 = [18.4015; 8.17846; 4.60038; 2.94424; 2.04461; 1.50217; 1.1501; 0.908717; 0.736061]
HRIV2 = [13.5093; 6.00414; 3.37733; 2.16149; 1.50104; 1.1028; 0.844332; 0.667127; 0.540373]
HRPS1 = [60.1995; 26.7553; 15.0499; 9.63192; 6.68883; 4.91424; 3.76247; 2.97281; 2.40798]
HRPS2 = [44.1349; 19.6155; 11.0337; 7.06158; 4.90387; 3.60285; 2.75843; 2.1795; 1.76539]
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# По графику видно, что заданным условиям
# соотношения диаметра и высоты для РИВ
# соответствуют диаметры 1.5 и 2 м
# При температуре 980 К (красная линия)
# Скорость газа при диаметре 2 - SKRIV1[2]
#
# При температуре 1000 К (пунктирная линия)
# Скорость газа при диаметре 1.5 - SKRIV2[2]
# По графику видно, что заданным условиям
# соотношения диаметра и высоты для РПС
# соответствуют диаметр  3.5 м
# При температуре 970 К (красная линия)
# Скорость газа при диаметре 3,5 - SKRPS1[6]
# При температуре 1000 К (пунктирная линия)
# Скорость газа при диаметре 3.5  - SKRPS2[5]
SKRIV1[2] := VNS*980/(298*P*S[2]) = 1.39643
SKRPS1[5] := VNS*970/(298*P*S[5]) = 0.451324
SKRIV1[1] := VNS*1000/(298*P*S[1]) = 2.5332
SKRPS2[5] := VNS*1000/(298*P*S[5]) = 0.465283
# Исходя из полученных результатов, предпочтительнее модель РПС
#
# Для достижения требуемых показателей можно:
# 1. Увеличить температуру до 980 К
# 1. Увеличить давление до 5 атм
# Для расчёта теплоты теплообмена рассчитываем среднюю теплоёмкость смеси на входе и выходе из реактора и удельный тепловой эффект
HA := -134.64
HC := -17.90
HD := 0
CpI := 29.12
СpA := 96.65
CpC := 88.10
CpD := 28.84
dH := HD + HC - HA = 116.74
CpN := СpA*ZNA + CpC*ZNC + CpD*ZND + CpI*ZNI = 43.213
CpK(X) := СpA*ZA(X) + CpC*ZC(X) + CpD*ZD(X) + CpI*ZI(X)
q := -dH/1 = -116.74
QTO(T) := VNS/1*(CpK(XT)*T*W(XT) - CpN*T - q*ZNA*XT)
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CpK(XT) = 40.0485
T := 450 .. 900
