# Егоров Данила Владимирович
# гр 124
# Блок 8.1 Дегидрирование изобутана
# i-C4H10=i-C4H8+H2(N2)
# Условия проведения:
# T=450–700°C,
# P=0,5–5 атм
# Исходные даннне:
T := 450 .. 700
P := 0.5 .. 5
ZNA := 0.2
ZNB := 0
ZNC := 0.01
ZND := 0.01
VNS := 24000
VRD := 3280
ZNI := 1 - (ZNA + ZNC + ZND) = 0.78
CpA := 96.65
CpC := 88.10
CpD := 28.84
CpI := 29.12
Cp := CpA*ZNA + CpC*ZNC + CpD*ZND + CpI*ZNI = 43.213
# dH при 298К
dHA := -134.64
dHC := -17.90
dHD := 0
dHI := 0
dH := 1000*(1*dHC + 1*dHD - dHA) = 116740
λ := -dH/Cp*ZNA = -540.3
T(T0, λ, X) := T0 + λ*X
K(T0, λ, X) := 10^5.75*e^(-125500/(8.31*T(T0, λ, X)))
W(X) := 1 + ((1 + 1 - 1)/1)*ZNA*X
ZA(X) := ZNA*(1 - X)/W(X)
ZC(X) := (ZNC + X*ZNA)/W(X)
ZD(X) := (ZND + ZNA*X)/W(X)
ZI(X) := ZNI/W(X)
# Коэффициенты полиномов для расчёта приведенной энергии Гиббса
i - C4H10
i - C4H8  # H2
fA1 := 137.0
fC1 := 207.6
fD1 := 225.5
fA2 := -15.60
fC2 := 1.805
fD2 := 36.31
fA3 := 0.00096
fC3 := 0.000845
fD3 := -0.00132
fA4 := -0.5862  # Дж/моль
fC4 := 1.3250
fD4 := 0.25
fA5 := 2195
fC5 := 1659.0
fD5 := -103
fA6 := -4186
fC6 := -2907.1
fD6 := 335
fA7 := 4677
fC7 := 3013.9
fD7 := -446
θ(T) := T/10000
FA(T0, λ, X) := fA1 + fA2*ln(θ(T(T0, λ, X))) + fA3*θ(T(T0, λ, X))^-2 + fA4*θ(T(T0, λ, X))^-1 + fA5*θ(T(T0, λ, X)) + fA6*θ(T(T0, λ, X))^2 + fA7*θ(T(T0, λ, X))^3
FC(T0, λ, X) := fC1 + fC2*ln(θ(T(T0, λ, X))) + fC3*θ(T(T0, λ, X))^-2 + fC4*θ(T(T0, λ, X))^-1 + fC5*θ(T(T0, λ, X)) + fC6*θ(T(T0, λ, X))^2 + fC7*θ(T(T0, λ, X))^3
FD(T0, λ, X) := fD1 + fD2*ln(θ(T(T0, λ, X))) + fD3*θ(T(T0, λ, X))^-2 + fD4*θ(T(T0, λ, X))^-1 + fD5*θ(T(T0, λ, X)) + fD6*θ(T(T0, λ, X))^2 + fD7*θ(T(T0, λ, X))^3
ΔF(T0, λ, X) := FC(T0, λ, X) + FD(T0, λ, X) - FA(T0, λ, X)
ΔHA := -106.035
ΔHD := 0
ΔHC := -10.8  # при 0К
ΔH := 1000*(ΔHC + ΔHD - ΔHA) = 95235  # реакция эндотермическая
Kp(T0, λ, X) := e^(ΔF(T0, λ, X)/8.31 - ΔH/(8.31*T(T0, λ, X)))
# Находим парциальные давления:
PA(X, P) := ZA(X)*P
PC(X, P) := ZC(X)*P
PD(X, P) := ZD(X)*P
U(T0, λ, P, X) := K(T0, λ, X)*PA(X, P)/PC(X, P)^0.5*(1 - 1/Kp(T0, λ, X)*PC(X, P)*PD(X, P)/PA(X, P))
VNS := 24000/3600
VRD := 3280/3600
P := 0.5
j := 0 .. 9
T0[j] := 273 + 450 + 25*j
# Рассчитываем равновесную степень превращения
XE(T0, λ) := root(U(T0, λ, 1, X), X, 0.00001, 0.9999)
# Рассчитываем требуемую степень превращения
XT := root(VRD - VNS*(ZD(X) - ZND), X, 0, 1) = 0.800781
xt := round(XT*1000) = 801
# Рассчитываем равновесную температуру, К при разных условиях теплообмена
# 1- компенсация 25%
# 2- компенсация 50%
# 3 - компенсация 75%
TR01 := root(U(T0, λ*0.75, P, XT), T0, 450, 2000) = 930.443
TR02 := root(U(T0, λ*0.5, P, XT), T0, 450, 1500) = 822.277
TR03 := root(U(T0, λ*0.25, P, XT), T0, 450, 1500) = 714.112
# Выбираем температуру  1100 К
T1 := 1100  # 75%
# 25% | 50%
g := 0 .. XE(T1, λ*0.25)*1000
i := 0 .. XE(T1, λ*0.75)*1000
q := 0 .. XE(T1, λ*0.5)*1000
XE(T1, λ*0.25) = 0.998487
XE(T1, λ*0.75) = 0.960807
XE(T1, λ*0.5) = 0.995367
XK3[g] := 0.001*g
XK1[i] := 0.001*i
XK2[q] := 0.001*q
VRPS1[i] := VNS/1*ZNA*XK1[i]/U(T1, λ*0.75, P, XK1[i])
VRPS2[q] := VNS/1*ZNA*XK2[q]/U(T1, λ*0.5, P, XK2[q])
VRPS3[g] := VNS/1*ZNA*XK3[g]/U(T1, λ*0.25, P, XK3[g])
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VRD1[i] := VNS*(ZD(XK1[i]) - ZND)
VRD2[q] := VNS*(ZD(XK2[q]) - ZND)
VRD3[g] := VNS*(ZD(XK3[g]) - ZND)
VRIV1[i] := VNS/1*ZNA*integral(1/U(T1, λ*0.75, P, X), X = 0 .. XK1[i])
VRIV3[g] := VNS/1*ZNA*integral(1/U(T1, λ*0.25, P, X), X = 0 .. XK3[g])
VRIV2[q] := VNS/1*ZNA*integral(1/U(T1, λ*0.5, P, X), X = 0 .. XK2[q])
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# Объёмы РПС, обеспечивающие заданную производительность
VRPS1[xt] = 8797.55
VRPS2[xt] = 796.761
VRPS3[xt] = 123.142
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# Объёмы РИВ, обеспечивающие заданную производительность
VRIV1[xt] = 775.662
VRIV2[xt] = 108.056
VRIV3[xt] = 25.2383
# Температуры на выходе из реактора
T(T1, λ*0.75, XT) = 775.503
T(T1, λ*0.5, XT) = 883.669
T(T1, λ*0.25, XT) = 991.834
# Влияние % компенсации на температуру и объемы реакторов
# При условиях: T=500 K, P = 1 атм.
# Компенсируем от 13 до 100% теплового эффекта
λh := 10 .. 90
k[λh] := (100 - λh)/100
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VRPS[λh] := VNS/1*ZNA*XT/U(T1, λ*k[λh], P, XT)
VRIV[λh] := VNS/1*ZNA*integral(1/U(T1, λ*k[λh], P, X), X = 0 .. XT)
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