# Л1 Леготин Андрей Алексаедрович гр 124
# Блок 9.1 Дегидрирование изопропилового спирта
# i-C3H7OH=C3H6O+H2(N2)
# Условия:
# T = 150-400°C
# P = 1-10 атм
# Исходные данные:
T := 150 .. 400
P := 1 .. 10
ZNA := 0.2
ZNC := 0.01
ZND := 0.01
ZNI := 1 - ZNA - ZNC - ZND = 0.78
VNS := 28000
VRC := 3662
k(T) := 10^8.1*e^(-82000/(8.31*T))
# Находим коэффициент изменения объема:
W(X) := 1 + (1 + 1 - 1)/1*ZNA*X
ZEA(X) := ZNA*(1 - X)/W(X)
ZEC(X) := (ZNC + ZNA*X)/W(X)
ZED(X) := (ZND + ZNA*X)/W(X)
ZEI(X) := ZNI/W(X)
# Находим необходимую степень превращения:
XT := root(VNS*(ZEC(X)*W(X) - ZNC) - VRC, X, 0, 1) = 0.653929
# Находим парциальные давления:
PA(X, P) := ZEA(X)*P
PC(X, P) := ZEC(X)*P
PD(X, P) := ZED(X)*P
# Коэффициенты полиновмов для расчета приведенной энергии Гиббса
# i-C3H7OH | C3H6O | H2
fA1 := 160.64
fC1 := 224
fD1 := 225.6
fA2 := -2.15
fC2 := 10.38
fD2 := 36.31
fA3 := 0.00124
fC3 := 0.0019
fD3 := -0.00132
fA4 := -0.5764
fC4 := -0.754
fD4 := 0.25
fA5 := 1444
fC5 := 941
fD5 := -103
fA6 := -3883
fC6 := -1664
fD6 := 335
fA7 := 2363
fC7 := 1700
fD7 := -446
θ(T) := T/10000
FA(T) := fA1 + fA2*ln(θ(T)) + fA3*θ(T)^-2 + fA4*θ(T)^-1 + fA5*θ(T) + fA6*θ(T)^2 + fA7*θ(T)^3
FC(T) := fC1 + fC2*ln(θ(T)) + fC3*θ(T)^-2 + fC4*θ(T)^-1 + fC5*θ(T) + fC6*θ(T)^2 + fC7*θ(T)^3
FD(T) := fD1 + fD2*ln(θ(T)) + fD3*θ(T)^-2 + fD4*θ(T)^-1 + fD5*θ(T) + fD6*θ(T)^2 + fD7*θ(T)^3
ΔF(T) := FC(T) + FD(T) - FA(T)
# Находим энтальпию реакции:
ΔHA := -265.8
ΔHC := -201.2
ΔHD := 0
ΔH := 1000*(ΔHC + ΔHD - ΔHA) = 64600  # реакция эндотермическая
# Находим константу равновесия:
Kp(T) := e^(ΔF(T)/8.31 - ΔH/(8.31*T))
# Находим скорость реакции:
U(T, P, X) := k(T)*PA(X, P)*(1 - PC(X, P)*PD(X, P)/(Kp(T)*PA(X, P)))
i := 0 .. 250
j := 0 .. 9
q := 0 .. 5
T[i] := 150 + i + 273
P[j] := 1 + 1*j
X[q] := 0.5 + 0.1*q
Графики
# Зависимость скорости реакции от температуры
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# Равновесная температура
TR(P, X) := root(U(T, P, X), T, 400, 700)
TR(1, 0.6) - 273 = 213.403
TR(10, 0.6) - 273 = 277.43
TR(1, 0.7) - 273 = 227.571
# Зависимость скорости реакции от давления
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# Зависимость скорости реакции от степени превращения
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