# Л1 Леготин Андрей Алексаедрович гр 124
# Блок 9.1 Дегидрирование изопропилового спирта
# i-C3H7OH=C3H6O+H2(N2)
# Условия:
# T = 150-400°C
# P = 1-10 атм
# Исходные данные:
T := 150 .. 400
P := 1 .. 10
ZNA := 0.2
ZNC := 0.01
ZND := 0.01
ZNI := 1 - ZNA - ZNC - ZND = 0.78
VNS := 28000
VRC := 3662
k(T) := 10^8.1*e^(-82000/(8.31*T))
# Находим коэффициент изменения объема:
W(X) := 1 + (1 + 1 - 1)/1*ZNA*X
ZEA(X) := ZNA*(1 - X)/W(X)
ZEC(X) := (ZNC + ZNA*X)/W(X)
ZED(X) := (ZND + ZNA*X)/W(X)
ZEI(X) := ZNI/W(X)
# Находим парциальные давления:
PA(X, P) := ZEA(X)*P
PC(X, P) := ZEC(X)*P
PD(X, P) := ZED(X)*P
# Коэффициенты полиновмов для расчета приведенной энергии Гиббса
# i-C3H7OH | C3H6O | H2
fA1 := 160.64
fC1 := 224
fD1 := 225.6
fA2 := -2.15
fC2 := 10.38
fD2 := 36.31
fA3 := 0.00124
fC3 := 0.0019
fD3 := -0.00132
fA4 := -0.5764
fC4 := -0.754
fD4 := 0.25
fA5 := 1444
fC5 := 941
fD5 := -103
fA6 := -3883
fC6 := -1664
fD6 := 335
fA7 := 2363
fC7 := 1700
fD7 := -446
θ(T) := T/10000
FA(T) := fA1 + fA2*ln(θ(T)) + fA3*θ(T)^-2 + fA4*θ(T)^-1 + fA5*θ(T) + fA6*θ(T)^2 + fA7*θ(T)^3
FC(T) := fC1 + fC2*ln(θ(T)) + fC3*θ(T)^-2 + fC4*θ(T)^-1 + fC5*θ(T) + fC6*θ(T)^2 + fC7*θ(T)^3
FD(T) := fD1 + fD2*ln(θ(T)) + fD3*θ(T)^-2 + fD4*θ(T)^-1 + fD5*θ(T) + fD6*θ(T)^2 + fD7*θ(T)^3
ΔF(T) := FC(T) + FD(T) - FA(T)
# Находим энтальпию реакции:
ΔHA := -265.8
ΔHC := -201.2
ΔHD := 0
ΔH := 1000*(ΔHC + ΔHD - ΔHA) = 64600  # реакция эндотермическая
# Находим константу равновесия:
Kp(T) := e^(ΔF(T)/8.31 - ΔH/(8.31*T))
# Максимально допустимая скорость газа в пересчёте
# на рабочие условия 2 м/с
#
# Максимально допустимый диаметр 5 м
#
# Для РИВ высота не менее 2.5 диаметров, но не более 30 м
# Для РПС высота не более 1.5 диаметров и не менее диаметра
# Находим скорость реакции:
U(T, P, X) := k(T)*PA(X, P)*(1 - PC(X, P)*PD(X, P)/(Kp(T)*PA(X, P)))
i := 0 .. 250
VNS1 := 28000/3600
T[i] := 150 + i + 273
P := 1
# Требуемая производительность 3662 м^3/ч
# Находим равновесную степень превращения:
XE(T) := root(U(T, 1, X), X, 0.0001, 0.9999)
# Находим требуемую степень превращения:
XT := root(VNS*(ZEC(X) - ZNC) - VRC, X, 0, 1) = 0.761077
# Рассчитываем температуру, К:
TR := root(U(T, P, XT), T, 400, 700) = 510.522
# Выбиарем температуры 650 и 700К
j := 0 .. XE(550)*1000
XE(550) = 0.91532
q := 0 .. XE(570)*1000
XE(570) = 0.951401
XK1[j] := 0.001*j
XK2[q] := 0.001*q
VRPS1[j] := VNS1/1*ZNA*XK1[j]/U(550, P, XK1[j])
VRPS2[q] := VNS1/1*ZNA*XK2[q]/U(570, P, XK2[q])
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VRC1[j] := VNS1*(ZEC(XK1[j]) - ZNC)
VRC2[q] := VNS1*(ZEC(XK2[q]) - ZNC)
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VRPS1[761] = 18.8796
VRPS2[761] = 8.67152
VRIV1[j] := VNS1/1*ZNA*integral(1/U(550, P, X), X = 0 .. XK1[j])
VRIV2[q] := VNS1/1*ZNA*integral(1/U(570, P, X), X = 0 .. XK2[q])
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VRIV1[761] = 6.60424
VRIV2[761] = 3.35238
# Расчёт рабочей скорости газа
#
# РИВ  РПС
a := 0 .. 8
# Рассмвтриваем диаметр реактора в интервале от 1 м до 5 м
# с шагом 0,5 м
D[a] := 1 + 0.5*a
S[a] := 0.785*D[a]^2  # Площадь поперечного сечения реактора, м2
HRIV1[a] := VRIV1[761]/S[a]
HRIV2[a] := VRIV2[761]/S[a]
HRPS1[a] := VRPS1[761]/S[a]
HRPS2[a] := VRPS2[761]/S[a]
D = [1; 1.5; 2; 2.5; 3; 3.5; 4; 4.5; 5]
S = [0.785; 1.76625; 3.14; 4.90625; 7.065; 9.61625; 12.56; 15.8963; 19.625]
HRIV1 = [8.41305; 3.73913; 2.10326; 1.34609; 0.934783; 0.686779; 0.525815; 0.415459; 0.336522]
HRIV2 = [4.27055; 1.89802; 1.06764; 0.683288; 0.474506; 0.348617; 0.26691; 0.210892; 0.170822]
HRPS1 = [24.0504; 10.6891; 6.01261; 3.84807; 2.67227; 1.9633; 1.50315; 1.18768; 0.962018]
HRPS2 = [11.0465; 4.90957; 2.76163; 1.76744; 1.22739; 0.901757; 0.690408; 0.545507; 0.441861]
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# По графику видно, что заданным условиям
# соотношения диаметра и высоты для РПС
# соответствуют диаметр  2 и 3 м
# При температуре 520 К (красная линия)
# Скорость газа при диаметре 3 - SKRPS1[4]
# При температуре 550 К (синяя линия)
# Скорость газа при диаметре 2  - SKRPS2[2]
# По графику видно, что заданным условиям
# соотношения диаметра и высоты для РИВ
# соответствуют диаметры 1,5 м
# При температуре 520 К (красная линия)
# Скорость газа при диаметре 1,5 - SKRIV1[1]
#
# При температуре 550 К (синяя линия)
# Скорость газа при диаметре 1,5 - SKRIV2[1]
SKRIV1[1] := VNS1*550/(298*P*S[1]) = 8.12737
SKRPS1[4] := VNS1*550/(298*P*S[4]) = 2.03184
SKRIV1[1] := VNS1*570/(298*P*S[1])
SKRPS2[2] := VNS1*570/(298*P*S[2]) = 4.73788
# Исходя из полученных результатов, предпочтительнее модель РПС
#
# Для достижения требуемых показателей можно:
# 1. Увеличить температуру до 550 К
# 2. Давление должно равнятся 1 атм
# Для расчёта теплоты теплообмена рассчитываем среднюю теплоёмкость смеси на входе и выходе из реактора и удельный тепловой эффект
ΔHA := -265.8
ΔHC := -201.2
ΔHD := 0
CpA := 89.32
CpC := 74.9
CpD := 28.84
CpI := 29.12
ΔH := ΔHC + ΔHD - ΔHA = 64.6
q := -ΔH/1 = -64.6
CpN := CpA*ZNA + CpC*ZNC + CpD*ZND + CpI*ZNI = 41.615
CpK(X) := CpA*ZEA(X) + CpC*ZEC(X) + CpD*ZED(X) + CpI*ZEI(X)
CpK(XT) = 38.0224
QTO(T) := VNS/1*(CpK(XT)*T*W(XT) - CpN*T - q*ZNA*XT)
T := 150 .. 400
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