# Л1 Смирнова Екатерина Евгееньевна гр 124
# Блок 8.2 Дегидрирование изобутана
# i-C4H10=i-C4H8+H2(N2)
# Условия проведения:
# T=450–700°C,
# P=0,5–5 атм
P := 0.5 .. 5
# Исходные даннне:
T := 450 .. 700
K(T) := 10^8.79*e^(-157000/(8.31*T))  # обратная
ZNA := 0.22
ZNB := 0
ZNC := 0.01
ZND := 0.01
VNS := 25500
VRD := 3589
ZNI := 1 - (ZNA + ZNC + ZND) = 0.76
W(X) := 1 + ((1 + 1 - 1)/1)*ZNA*X
ZD(X) := (ZND + ZNA*X)/W(X)
ZA(X) := ZNA*(1 - X)/W(X)
ZC(X) := (ZNC + X*ZNA)/W(X)
PA(X, P) := ZA(X)*P
ZI(X) := ZNI/W(X)
PC(X, P) := ZC(X)*P
PD(X, P) := ZD(X)*P
# Коэффициенты полиномов для расчета приведенной энергии Гиббса
i - C4H10
i - C4H8  # H2
fA1 := 137.0
fC1 := 207.6
fD1 := 225.5
fA2 := -15.60
fC2 := 1.805
fD2 := 36.31
fA3 := 0.00096
fC3 := 0.000845
fD3 := -0.00132
fA4 := -0.5862
fC4 := 1.3250
fD4 := 0.25
fA5 := 2195
fC5 := 1659.0
fD5 := -103
fA6 := -4186
fC6 := -2907.1
fD6 := 335
fA7 := 4677
fC7 := 3013.9
fD7 := -446
FA(T) := fA1 + fA2*ln(T/10000) + fA3/(T/10000)^2 + fA4/(T/10000) + fA5*T/10000 + fA6*(T/10000)^2 + fA7*(T/10000)^3
FC(T) := fC1 + fC2*ln(T/10000) + fC3/(T/10000)^2 + fC4/(T/10000) + fC5*T/10000 + fC6*(T/10000)^2 + fC7*(T/10000)^3
FD(T) := fD1 + fD2*ln(T/10000) + fD3/(T/10000)^2 + fD4/(T/10000) + fD5*T/10000 + fD6*(T/10000)^2 + fD7*(T/10000)^3
DF(T) := 1*FC(T) + FD(T) - 1*FA(T)
DHA := -106.035
DHC := -10.8
DHD := 0
DH := 1000*(1*DHC + 1*DHD - 1*DHA) = 95235
Дж/моль
DH = 95235
Kp(T) := e^(DF(T)/8.31 - DH/(8.31*T))
u(T, P, X) := K(T)*PA(X, P)/PC(X, P)^0.5*(1 - 1/Kp(T)*PC(X, P)*PD(X, P)/PA(X, P))
i := 0 .. 300
q := 0 .. 5
j := 0 .. 5
T[i] := 273 + 450 + 2*i
X[q] := 0.5 + 0.1*q
P[j] := 0.5 + 1*j
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TR(P, X) := root(u(T, P, X), T, 100, 1000)
TR(0.5, 0.6) - 273 = 296.701
TR(0.5, 0.2) - 273 = 228.763
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