# Л3 Смирнова Екатерина Евгееньевна гр 124
# Блок 8.2 Дегидрирование изобутана
# i-C4H10=i-C4H8+H2(N2)
# Условия проведения:
# T=450–700°C,
# P=0,5–5 атм
# Исходные даннне:
T := 450 .. 700
обратная
ZNA := 0.22
ZNB := 0
ZNC := 0.01
ZND := 0.01
VNS := 25500
VRD := 3589
ZNI := 1 - (ZNA + ZNC + ZND) = 0.76
CpA := 96.65
CpC := 88.10
CpD := 28.84
CpI := 29.12
Cp := CpA*ZNA + CpC*ZNC + CpD*ZND + CpI*ZNI = 44.5636
# dH при 298К
dHD := 0
dHI := 0
dHC := -17.90
dHA := -134.64
dH := 1000*(1*dHC + 1*dHD - dHA) = 116740
q := -dH/1
T(T0, ZNA, X) := T0 + (-dH/Cp*ZNA*X)
K(T0, ZNA, X) := 10^8.79*e^(-157000/(8.31*T(T0, ZNA, X)))
W(X) := 1 + ((1 + 1 - 1)/1)*ZNA*X
ZA(X) := ZNA*(1 - X)/W(X)
ZC(X) := (ZNC + X*ZNA)/W(X)
ZD(X) := (ZND + ZNA*X)/W(X)
# Коэффициенты полиномов для расчета приведенной энергии Гиббса
i - C4H10
i - C4H8  # H2
fA1 := 137.0
fC1 := 207.6
fD1 := 225.5
fA2 := -15.60
fC2 := 1.805
fD2 := 36.31
fA3 := 0.00096
fC3 := 0.000845
fD3 := -0.00132
fA4 := -0.5862
fC4 := 1.3250
fD4 := 0.25
fA5 := 2195
fC5 := 1659.0
fD5 := -103
fA6 := -4186
fC6 := -2907.1
fD6 := 335
fA7 := 4677
fC7 := 3013.9
fD7 := -446
FA(T0, ZNA, X) := fA1 + fA2*ln(T(T0, ZNA, X)/10000) + fA3/(T(T0, ZNA, X)/10000)^2 + fA4/(T(T0, ZNA, X)/10000) + fA5*T(T0, ZNA, X)/10000 + fA6*(T(T0, ZNA, X)/10000)^2 + fA7*(T(T0, ZNA, X)/10000)^3
FC(T0, ZNA, X) := fC1 + fC2*ln(T(T0, ZNA, X)/10000) + fC3/(T(T0, ZNA, X)/10000)^2 + fC4/(T(T0, ZNA, X)/10000) + fC5*T(T0, ZNA, X)/10000 + fC6*(T(T0, ZNA, X)/10000)^2 + fC7*(T(T0, ZNA, X)/10000)^3
FD(T0, ZNA, X) := fD1 + fD2*ln(T(T0, ZNA, X)/10000) + fD3/(T(T0, ZNA, X)/10000)^2 + fD4/(T(T0, ZNA, X)/10000) + fD5*T(T0, ZNA, X)/10000 + fD6*(T(T0, ZNA, X)/10000)^2 + fD7*(T(T0, ZNA, X)/10000)^3
DF(T0, ZNA, X) := 1*FC(T0, ZNA, X) + FD(T0, ZNA, X) - 1*FA(T0, ZNA, X)
# При 0 К
P := 0.5 .. 5
DHA := -106.035
DHC := -10.80
DHD := 0
PA(X, P) := ZA(X)*P
DH := 1000*(1*DHC + 1*DHD - 1*DHA) = 95235
PC(X, P) := ZC(X)*P
PD(X, P) := ZD(X)*P
Kp(T0, ZNA, X) := e^(DF(T0, ZNA, X)/8.31 - DH/(8.31*T(T0, ZNA, X)))
u(T0, ZNA, P, X) := K(T0, ZNA, X)*PA(X, P)/PC(X, P)^0.5*(1 - 1/Kp(T0, ZNA, X)*PC(X, P)*PD(X, P)/PA(X, P))
VNS := 25500/3600
P := 0.5
# Требуемая производительность 3589 м3/ч
# Рассчитываем равновесную степень превращения
XE(T0) := root(u(T0, ZNA, 0.5, X), X, 0.00001, 0.9999)
Дж/моль
DH = 95235
# Рассчитываем требуемую степень превращения
XT := root(3589/3600 - VNS*(ZD(X) - ZND), X, 0, 1) = 0.753308
# Рассчитываем равновесную температуру, К
TR0 := root(u(T0, ZNA, P, XT), T0, 623, 2000) = 1031.71
K := trunc(2000 - TR0) = 968
j := 0 .. K
T0[j] := TR0 + 1*j
# Выбираем рабочие температуры
#
# Для эндотермической реакции - больше равновесной
# Выбор делается на основании расчётов задания Л1
Kp(T0[j], ZNA, 0) = [
    493.487; 498.506; 503.565; 508.665; 513.807; 518.991; 524.217; 529.484; 534.795; 540.148
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]
T(T0[j], ZNA, 1) = [
    455.387; 456.387; 457.387; 458.387; 459.387; 460.387; 461.387; 462.387; 463.387; 464.387
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]
# Выбираем температуры 460 и 500 К
T1 := 1300
T2 := 1330
i := 0 .. XE(T1)*1000
XE(T1) = 0.985848
q := 0 .. XE(T2)*1000
XE(T2) = 0.99151
XK1[i] := 0.001*i
XK2[q] := 0.001*q
# Объем реактора РПС и РИВ, м3/с
VRPS1[i] := VNS/1*ZNA*XK1[i]/u(T1, ZNA, P, XK1[i])
VRPS2[q] := VNS/1*ZNA*XK2[q]/u(T2, ZNA, P, XK2[q])
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# Этот график в отчёт можно не включать, он только показывает, что программа работает правильно
# Этот график в отчёт можно не включать, он только показывает, что программа работает правильно
# Производительность по целевому продукту, м3/с
VRD1[i] := VNS*(ZD(XK1[i]) - ZND)
VRD2[q] := VNS*(ZD(XK2[q]) - ZND)
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VRPS1[753] = 67.0502
VRPS2[753] = 32.2586
'
VRIV1[i] := VNS/1*ZNA*integral(1/u(T1, ZNA, P, X), X = 0 .. XK1[i])
VRIV2[q] := VNS/1*ZNA*integral(1/u(T2, ZNA, P, X), X = 0 .. XK2[q])
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VRIV1[753] = 5.0564
VRIV2[753] = 2.56986
# Температура на выходе из реактора
T1[j, i] := T(T0[j], ZNA, XK1[i])
T2[j, q] := T(T0[j], ZNA, XK2[q])
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# Зависимость объема реактора от Твх
TOL := 0.000001
VRPS[753, j] := VNS/1*ZNA*XK1[753]/u(T0[j], ZNA, P, XK1[753])
VRIV[753, j] := VNS/1*ZNA*integral(1/u(T0[j], ZNA, P, X), X = 0 .. XK1[753])
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