# Л3 Смирнова Екатерина Евгееньевна гр 124
# Блок 8.2 Дегидрирование изобутана
# i-C4H10=i-C4H8+H2(N2)
# Условия проведения:
# T=450–700°C,
# P=0,5–5 атм
# Исходные даннне:
T := 450 .. 700
обратная
ZNA := 0.22
ZNB := 0
ZNC := 0.01
ZND := 0.01
VNS := 25500
VRD := 3589
ZNI := 1 - (ZNA + ZNC + ZND) = 0.76
CpA := 96.65
CpC := 88.10
CpD := 28.84
CpI := 29.12
Cp := CpA*ZNA + CpC*ZNC + CpD*ZND + CpI*ZNI = 44.5636
# dH при 298К
dHD := 0
dHI := 0
dHC := -17.90
dHA := -134.64
dH := 1000*(1*dHC + 1*dHD - dHA) = 116740
λ := -dH/Cp*ZNA = -576.318
T(T0, λ, X) := T0 + λ*X
K(T0, λ, X) := 10^8.79*e^(-157000/(8.31*T(T0, λ, X)))
W(X) := 1 + ((1 + 1 - 1)/1)*ZNA*X
ZA(X) := ZNA*(1 - X)/W(X)
ZC(X) := (ZNC + X*ZNA)/W(X)
ZD(X) := (ZND + ZNA*X)/W(X)
# Коэффициенты полиномов для расчета приведенной энергии Гиббса
i - C4H10
i - C4H8  # H2
fA1 := 137.0
fC1 := 207.6
fD1 := 225.5
fA2 := -15.60
fC2 := 1.805
fD2 := 36.31
fA3 := 0.00096
fC3 := 0.000845
fD3 := -0.00132
fA4 := -0.5862
fC4 := 1.3250
fD4 := 0.25
fA5 := 2195
fC5 := 1659.0
fD5 := -103
fA6 := -4186
fC6 := -2907.1
fD6 := 335
fA7 := 4677
fC7 := 3013.9
fD7 := -446
FA(T0, λ, X) := fA1 + fA2*ln(T(T0, λ, X)/10000) + fA3/(T(T0, λ, X)/10000)^2 + fA4/(T(T0, λ, X)/10000) + fA5*T(T0, λ, X)/10000 + fA6*(T(T0, λ, X)/10000)^2 + fA7*(T(T0, λ, X)/10000)^3
FC(T0, λ, X) := fC1 + fC2*ln(T(T0, λ, X)/10000) + fC3/(T(T0, λ, X)/10000)^2 + fC4/(T(T0, λ, X)/10000) + fC5*T(T0, λ, X)/10000 + fC6*(T(T0, λ, X)/10000)^2 + fC7*(T(T0, λ, X)/10000)^3
FD(T0, λ, X) := fD1 + fD2*ln(T(T0, λ, X)/10000) + fD3/(T(T0, λ, X)/10000)^2 + fD4/(T(T0, λ, X)/10000) + fD5*T(T0, λ, X)/10000 + fD6*(T(T0, λ, X)/10000)^2 + fD7*(T(T0, λ, X)/10000)^3
DF(T0, λ, X) := 1*FC(T0, λ, X) + FD(T0, λ, X) - 1*FA(T0, λ, X)
P := 0.5 .. 5
PA(X, P) := ZA(X)*P
PC(X, P) := ZC(X)*P
Kp(T0, λ, X) := e^(DF(T0, λ, X)/8.31 - dH/(8.31*T(T0, λ, X)))
PD(X, P) := ZD(X)*P
u(T0, λ, P, X) := K(T0, λ, X)*PA(X, P)/PC(X, P)^0.5*(1 - 1/Kp(T0, λ, X)*PC(X, P)*PD(X, P)/PA(X, P))
j := 0 .. 9
VNS := 25500/3600
P := 0.5
T0[j] := 273 + 600 + 25*j
# Требуемая производительность 3589 м3/ч
# Рассчитываем равновесную степень превращения
XE(T0, λ) := root(u(T0, λ, 0.5, X), X, 0.00001, 0.9999)
# Рассчитываем требуемую степень превращения
XT := root(3589/3600 - VNS*(ZD(X) - ZND), X, 0, 1) = 0.753308
# Рассчитываем равновесную температуру, К при разных условиях теплообмена
# 1- компенсация 25%
# 2- компенсация 50%
# 3 - компенсация 75%
TR01 := root(u(T0, λ*0.75, P, XT), T0, 450, 2000) = 1066.36
TR02 := root(u(T0, λ*0.5, P, XT), T0, 300, 1500) = 957.826
TR01 := root(u(T0, λ*0.25, P, XT), T0, 300, 1500) = 849.29
# Выбираем рабочую температуру на входе в реактор
# Для эндотермической реакции - больше равновесной
# Выбираем температуру 1200 К
i := 0 .. XE(1200, λ*0.75)*1000
XE(1200, λ*0.75) = 0.916363
# 25% компенсации
#
# 50% компенсации
#
# 75% компенсации
XE(1200, λ*0.5) = 0.987525
q := 0 .. XE(1200, λ*0.5)*1000
a := 0 .. XE(1200, λ*0.25)*1000
XE(1200, λ*0.25) = 0.998189
XK1[i] := 0.001*i
XK2[q] := 0.001*q
XK3[a] := 0.001*a
VRPS1[i] := VNS/1*ZNA*XK1[i]/u(1200, λ*0.75, P, XK1[i])
VRPS2[q] := VNS/1*ZNA*XK2[q]/u(1200, λ*0.5, P, XK2[q])
VRPS3[a] := VNS/1*ZNA*XK3[a]/u(1200, λ*0.25, P, XK3[a])
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VRC1[i] := VNS*(ZC(XK1[i]) - ZNC)
VRC2[q] := VNS*(ZC(XK2[q]) - ZNC)
VRC3[a] := VNS*(ZC(XK3[a]) - ZNC)
VRIV1[i] := VNS/1*ZNA*integral(1/u(1200, λ*0.75, P, X), X = 0 .. XK1[i])
VRIV2[q] := VNS/1*ZNA*integral(1/u(1200, λ*0.5, P, X), X = 0 .. XK2[q])
VRIV3[a] := VNS/1*ZNA*integral(1/u(1200, λ*0.25, P, X), X = 0 .. XK3[a])
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# Объёмы РПС, обеспечивающие заданную производительность
#
# 753 - значение счётчика степени превращения,
# при которой обеспечивается заданная  производительность
VRPS1[753] = 57.6565
VRPS2[753] = 5.03906
VRPS3[753] = 0.739551
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# Объёмы РИВ, обеспечивающие заданную производительность
VRIV3[753] = 0.164828
VRIV2[753] = 0.72776
VRIV1[753] = 5.30537
T(1200, λ*0.75, XT) = 874.391
T(1200, λ*0.5, XT) = 982.927
T(1200, λ*0.25, XT) = 1091.46
# Влияние% компенсациинатемпературуиобъемыреакторов
λh := 10 .. 90
k[λh] := (100 - λh)/100
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VRPS[λh] := VNS/1*ZNA*XT/u(1200, λ*k[λh], P, XT)
VRIV[λh] := VNS/1*ZNA*integral(1/u(1200, λ*k[λh], P, X), X = 0 .. XT)
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