# Курсовая работа
# N2+3H2=2NH3 (CH4)
#
# ZNA=0.19  VNS=30000-75000 м3/ч  lg(k0)=15.79 c^-1
# ZNB=0.71  VRC=3000-5000 м3/ч
# ZNC=0.02  Е=-215000
ZNA := 0.19
ZNB := 0.71
ZNC := 0.02
ZNI := 1 - ZNA - ZNB - ZNC = 0.08
W(X) := 1 - 2*ZNA*X
ZA(X) := ZNA*(1 - X)/W(X)
ZI(X) := ZNI/W(X)
ZB(X) := (ZNB - 3*ZNA*X)/W(X)
ZC(X) := (ZNC + 2*ZNA*X)/W(X)
PA(X, P) := ZA(X)*P
PB(X, P) := ZB(X)*P
PC(X, P) := ZC(X)*P
DHA := 0
DHB := 0
DHC := -45.94
СpA := 29.12
CpB := 28.84
CpC := 35.63
CpI := 35.71
DH := 1000*(2*DHC - DHA - 3*DHB) = -91880
Cp := СpA*ZNA + CpB*ZNB + CpC*ZNC + CpI*ZNI = 29.5786
λ := -DH/Cp*ZNA = 590.197
T(T0, λ, X) := T0 + λ*X
# -константа прямой реакции
K(T0, λ, X) := 6.2*10^15*e^(-215000/(8.31*T(T0, λ, X)))
fA1 := 247.9
fB1 := 225.6
fC1 := 224.8
fB2 := 36.31
fA2 := 23.46
fC2 := 18.36
fB3 := -0.00132
fA3 := 0.000993
fC3 := 0.00121
fB4 := 0.25
fA4 := -0.1813
fC4 := -0.31
fA5 := 63.80
fB5 := -103
fC5 := 272
fA6 := -72.48
fB6 := 335
fC6 := -334
fA7 := 46.03
fB7 := -446
fC7 := 268
FA(T0, λ, X) := fA1 + fA2*ln(T(T0, λ, X)/10000) + fA3/(T(T0, λ, X)/10000)^2 + fA4/(T(T0, λ, X)/10000) + fA5*T(T0, λ, X)/10000 + fA6*(T(T0, λ, X)/10000)^2 + fA7*(T(T0, λ, X)/10000)^3
FB(T0, λ, X) := fB1 + fB2*ln(T(T0, λ, X)/10000) + fB3/(T(T0, λ, X)/10000)^2 + fB4/(T(T0, λ, X)/10000) + fB5*T(T0, λ, X)/10000 + fB6*(T(T0, λ, X)/10000)^2 + fB7*(T(T0, λ, X)/10000)^3
FC(T0, λ, X) := fC1 + fC2*ln(T(T0, λ, X)/10000) + fC3/(T(T0, λ, X)/10000)^2 + fC4/(T(T0, λ, X)/10000) + fC5*T(T0, λ, X)/10000 + fC6*(T(T0, λ, X)/10000)^2 + fC7*(T(T0, λ, X)/10000)^3
DF(T0, λ, X) := 2*FC(T0, λ, X) - 1*FA(T0, λ, X) - 3*FB(T0, λ, X)
Kp(T0, λ, X) := e^(DF(T0, λ, X)/8.31 - DH/(8.31*T(T0, λ, X)))
U(T0, λ, P, X) := K(T0, λ, X)*Kp(T0, λ, X)*PA(X, P)*(PB(X, P)^3/PC(X, P)^2)^0.5*(1 - 1/Kp(T0, λ, X)*PC(X, P)^2/(PA(X, P)*(PB(X, P)^3)))
VNS := 55000/3600
P := 200
VRC := 5000/3600
# Рассчитываем равновесную степень превращения
XE(T0, λ) := root(U(T0, λ, P, X), X, 0.00000000001, 0.9999999)
# Рассчитываем требуемую степень превращения
XT := root(VRC - VNS*(ZC(X)*W(X) - ZNC), X, 0.00000000001, 0.999999) = 0.239234
# Рассчитываем равновесную температуру, К при разных условиях теплообмена
# 1- компенсация 25%
# 2- компенсация 50%
# 3 - компенсация 75%
# 4 - компенсация 100%
# 5 - компенсация 0%
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TR01 := root(U(T0, λ*0.75, P, XT), T0, 300, 1500) = 797.226
TR02 := root(U(T0, λ*0.5, P, XT), T0, 300, 1500) = 832.524
TR03 := root(U(T0, λ*0.25, P, XT), T0, 300, 1500) = 867.823
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TR04 := root(U(T0, λ*0, P, XT), T0, 300, 1500) = 903.122
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TR05 := root(U(T0, λ*1, P, XT), T0, 300, 1500) = 761.927
# Выбираем рабочую температуру на входе в реактор
# Для экзотермической реакции - меньше равновесной
# Выбираем температуру
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T1 := 750
i := 0 .. XE(T1, λ*0.25)*1000
XE(T1, λ*0.25) = 0.433333
# 75% компенсации
#
# 50% компенсации
#
# 25% компенсации
#
# 0% компенсации
#
# 100% компенсации
XE(T1, λ*0.5) = 0.343307
q := 0 .. XE(T1, λ*0.5)*1000
a := 0 .. XE(T1, λ*0.75)*1000
XE(T1, λ*0.75) = 0.28776
b := 0 .. XE(T1, λ*1)*1000
XE(T1, λ*1) = 0.249614
d := 0 .. XE(T1, λ*0)*1000
XE(T1, λ*0) = 0.606239
XK1[i] := 0.001*i
XK2[q] := 0.001*q
XK3[a] := 0.001*a
XK4[b] := 0.001*b
XK5[d] := 0.001*d
VRPS1[i] := VNS/(22.4*10^-3)*ZNA*XK1[i]/U(T1, λ*0.25, P, XK1[i])
VRPS2[q] := VNS/(22.4*10^-3)*ZNA*XK2[q]/U(T1, λ*0.5, P, XK2[q])
VRPS3[a] := VNS/(22.4*10^-3)*ZNA*XK3[a]/U(T1, λ*0.75, P, XK3[a])
VRPS4[b] := VNS/(22.4*10^-3)*ZNA*XK4[b]/U(T1, λ*1, P, XK4[b])
VRPS5[d] := VNS/(22.4*10^-3)*ZNA*XK5[d]/U(T1, λ*0, P, XK5[d])
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VRC1[i] := VNS*(ZC(XK1[i]) - ZNC)
VRC2[q] := VNS*(ZC(XK2[q]) - ZNC)
VRC3[a] := VNS*(ZC(XK3[a]) - ZNC)
VRC4[b] := VNS*(ZC(XK4[b]) - ZNC)
VRC5[d] := VNS*(ZC(XK5[d]) - ZNC)
VRIV1[i] := VNS/(22.4*10^-3)*ZNA*integral(1/U(T1, λ*0.25, P, X), X = 0 .. XK1[i])
VRIV2[q] := VNS/(22.4*10^-3)*ZNA*integral(1/U(T1, λ*0.5, P, X), X = 0 .. XK2[q])
VRIV3[a] := VNS/(22.4*10^-3)*ZNA*integral(1/U(T1, λ*0.75, P, X), X = 0 .. XK3[a])
VRIV4[b] := VNS/(22.4*10^-3)*ZNA*integral(1/U(T1, λ*1, P, X), X = 0 .. XK4[b])
VRIV5[d] := VNS/(22.4*10^-3)*ZNA*integral(1/U(T1, λ*0, P, X), X = 0 .. XK5[d])
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xt := round(XT*1000) = 239
# Объёмы РПС, обеспечивающие заданную производительность
VRPS1[xt] = 5.61238
VRPS2[xt] = 3.43234
VRPS3[xt] = 2.65039
VRPS4[xt] = 4.70462
VRPS5[xt] = 10.4784
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# Объёмы РИВ, обеспечивающие заданную производительность
VRIV1[xt] = 3.35822
VRIV3[xt] = 1.79682
VRIV4[xt] = 1.52987
VRIV2[xt] = 2.37399
VRIV5[xt] = 5.08186
T(T1, λ*0.25, XT) = 785.299
T(T1, λ*0.5, XT) = 820.598
T(T1, λ*0.75, XT) = 855.897
T(T1, λ*1, XT) = 891.195
T(T1, λ*0, XT) = 750
λh := 25 .. 75  # - доля компенсации
k[λh] := (100 - λh)/100  # - доля теплового эффекта
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VRPS[λh] := VNS/(22.4*10^-3)*ZNA*XT/U(T1, λ*k[λh], P, XT)
VRIV[λh] := VNS/(22.4*10^-3)*ZNA*integral(1/U(T1, λ*k[λh], P, X), X = 0 .. XT)
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# Идеализированная модель РИВ
# Режим адиабатический
#
# VNS=55000
# VRIV4=1.53
J := trunc(TR05 - 300)
j := 0 .. J
XK4[239] = 0.239
T0[j] := 300 + 1*j
VRIV4[239, j] := VNS/(22.4*10^-3)*ZNA*integral(1/U(T0[j], λ*1, P, X), X = 0 .. XK4[239])
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p := 0 .. 50
P0[p] := 200 + 1*p
VRIV4[239, p] := VNS/(22.4*10^-3)*ZNA*integral(1/U(750, λ*1, P0[p], X), X = 0 .. XK4[239])
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s := 0 .. 10000
VNS0[s] := (55000 + 1*s)
VRIV4[239, s] := VNS0[s]/(3600*22.4*10^-3)*ZNA*integral(1/U(750, λ*1, P, X), X = 0 .. XK4[239])
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n := 0 .. 2
ZNA0[n] := 0.19 + 0.01*n
VRIV1[239, n] := VNS/(22.4*10^-3)*ZNA0[n]*integral(1/U(750, λ*1, P, X), X = 0 .. XK4[239])
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