# 2NH3 = N2 + 3H2
# ZNA = 0,15-0,23
# ZNC = 0,01
# ZNI - остальное
#
# P = 1-5 атм
# T = 700-800 С
#
# VNS = 33000-41000 м3/ч
# VRD = 6900 м3/ч
ZNA := 0.15
ZNC := 0.01
ZND := 0
ZNI := 1 - ZNA - ZNC - ZND = 0.84  # (CH4)
W(X) := 1 + (3 + 1 - 2)/2*ZNA*X
ZA(X) := ZNA*(1 - X)/W(X)
ZC(X) := (ZNC + 1/2*ZNA*X)/W(X)
ZD(X) := (ZND + 3/2*ZNA*X)/W(X)
# Парциальные давления
PA(X, P) := ZA(X)*P
ZI(X) := ZNI/W(X)
PC(X, P) := ZC(X)*P
PD(X, P) := ZD(X)*P
# Энтальпия при 298К
ΔHA := -45.94
ΔHC := 0
ΔHD := 0
ΔH[298] := 1000*(ΔHC + 3*ΔHD - 2*ΔHA) = 91880  # Дж(реакция эндотермическая)
CpA := 35.63
CpC := 29.12
CpD := 28.83
CpI := 35.7
CpN := CpA*ZNA + CpC*ZNC + CpD*ZND + CpI*ZNI = 35.6237
CpK(X) := CpA*ZA(X) + CpC*ZC(X) + CpD*ZD(X) + CpI*ZI(X)
λ := -ΔH[298]/(CpN*2)*ZNA = -193.439
T1(T0, λ, X) := T0 + λ*X
K1(T0, λ, X) := 18.56*10^9*exp(-142630/(8.31*T1(T0, λ, X)))
# Коэффициенты полиновмов для расчета приведенной энергии Гиббса
# NH3 | N2 | H2
fA1 := 224.8
fC1 := 248
fD1 := 225.6
fA2 := 18.36
fC2 := 23.46
fD2 := 36.31
fA3 := 0.00121
fC3 := 0.00099
fD3 := -0.00132
fA4 := -0.31
fC4 := -0.18
fD4 := 0.25
fA5 := 272
fC5 := 64
fD5 := -103
fA6 := -334
fC6 := -72
fD6 := 335
fA7 := 268
fC7 := 46
fD7 := -446
θ(T0, λ, X) := T1(T0, λ, X)/10000
FA(T0, λ, X) := fA1 + fA2*ln(θ(T0, λ, X)) + fA3*θ(T0, λ, X)^-2 + fA4*θ(T0, λ, X)^-1 + fA5*θ(T0, λ, X) + fA6*θ(T0, λ, X)^2 + fA7*θ(T0, λ, X)^3
FC(T0, λ, X) := fC1 + fC2*ln(θ(T0, λ, X)) + fC3*θ(T0, λ, X)^-2 + fC4*θ(T0, λ, X)^-1 + fC5*θ(T0, λ, X) + fC6*θ(T0, λ, X)^2 + fC7*θ(T0, λ, X)^3
FD(T0, λ, X) := fD1 + fD2*ln(θ(T0, λ, X)) + fD3*θ(T0, λ, X)^-2 + fD4*θ(T0, λ, X)^-1 + fD5*θ(T0, λ, X) + fD6*θ(T0, λ, X)^2 + fD7*θ(T0, λ, X)^3
ΔF(T0, λ, X) := FC(T0, λ, X) + FD(T0, λ, X) - FA(T0, λ, X)
# Находим константу равновесия
# Энтальпия при 0К
ΔHA0 := -38.95
ΔHC0 := 0
ΔHD0 := 0
ΔH[0] := 1000*(ΔHC0 + 3*ΔHD0 - 2*ΔHA0) = 77900  # Дж
Kp(T0, λ, X) := exp(ΔF(T0, λ, X)/8.31 - ΔH[0]/(8.31*T1(T0, λ, X)))
# Кинетическое уравнение
U(T0, λ, X, P) := K1(T0, λ, X)/P*((PA(X, P)/PD(X, P)^1.5)^0.25 - PC(X, P)*PD(X, P)^1.5/(PA(X, P)*Kp(T0, λ, X)))
VNS := 33000/3600
VRD := 6900/3600
P := 1
# Рассчитываем равновесную степень превращения
XE(T0, λ) := root(U(T0, λ, X, P), X, 0.0001, 0.9999)
# Рассчитываем требуемую степень превращения
XT := root(VRD - W(X)*VNS*ZD(X), X, 0, 1) = 0.929293
xt := round(XT*1000) = 929
kλ(x) := (100 - x)/100  # множитель для % компенсации
# Рассчитываем равновесную температуру, при разных режимах теплообмена
# Изотермический режим
TR00 := root(U(T0, λ*kλ(100), XT, P), T0, 500, 1000) = 635.003
# Политермический режим
TR01 := root(U(T0, λ*kλ(75), XT, P), T0, 500, 1000) = 679.944  # 75%
TR02 := root(U(T0, λ*kλ(50), XT, P), T0, 500, 1000) = 724.884  # 50%
TR03 := root(U(T0, λ*kλ(25), XT, P), T0, 500, 1000) = 769.824  # 25%
TR04 := root(U(T0, λ*kλ(10), XT, P), T0, 500, 1000) = 796.788  # 10%
TR05 := root(U(T0, λ*kλ(5), XT, P), T0, 500, 1000) = 805.776  # 5%
# адиабатичеаский режим
TR06 := root(U(T0, λ*kλ(0), XT, P), T0, 500, 1000) = 814.764
# Выбираем температуру, для эндотермической реакции больше равновесной
T := 700 + 273
# Изотермический режим
i := 1 .. XE(T, λ*kλ(100))*1000
XE(T, λ*kλ(100)) = 0.999379
XK0[i] := 0.001*i
VRPS0[i] := VNS*ZNA/(22.4*10^-3)*XK0[i]/U(T, λ*kλ(100), XK0[i], P)
VRIV0[i] := VNS*ZNA/(22.4*10^-3)*integral(1/U(T, λ*kλ(100), X, P), X = 0 .. XK0[i])
VRD0[i] := VNS*W(XK0[i])*ZD(XK0[i])
# Политермический режим
# 1) 75% компенсации
j := 1 .. XE(T, λ*kλ(75))*1000
XE(T, λ*kλ(75)) = 0.998989
XK1[j] := 0.001*j
VRPS1[j] := VNS*ZNA/(22.4*10^-3)*XK1[j]/U(T, λ*kλ(75), XK1[j], P)
VRIV1[j] := VNS*ZNA/(22.4*10^-3)*integral(1/U(T, λ*kλ(75), X, P), X = 0 .. XK1[j])
VRD1[j] := VNS*(W(XK1[j])*ZD(XK1[j]) - ZND)
# 2) 50% компенсации
q := 1 .. XE(T, λ*kλ(50))*1000
XE(T, λ*kλ(50)) = 0.998271
XK2[q] := 0.001*q
VRPS2[q] := VNS*ZNA/(22.4*10^-3)*XK2[q]/U(T, λ*kλ(50), XK2[q], P)
VRIV2[q] := VNS*ZNA/(22.4*10^-3)*integral(1/U(T, λ*kλ(50), X, P), X = 0 .. XK2[q])
VRD2[q] := VNS*(W(XK2[q])*ZD(XK2[q]) - ZND)
# 3) 25% компенсации
g := 1 .. XE(T, λ*kλ(25))*1000
XE(T, λ*kλ(25)) = 0.996871
XK3[g] := 0.001*g
VRPS3[g] := VNS*ZNA/(22.4*10^-3)*XK3[g]/U(T, λ*kλ(25), XK3[g], P)
VRIV3[g] := VNS*ZNA/(22.4*10^-3)*integral(1/U(T, λ*kλ(25), X, P), X = 0 .. XK3[g])
VRD3[g] := VNS*(W(XK3[g])*ZD(XK3[g]) - ZND)
# 4) 10% компенсации
XE(T, λ*kλ(10)) = 0.995401
n := 1 .. XE(T, λ*kλ(10))*1000
XE(T, λ*kλ(10)) = 0.995401
XK4[n] := 0.001*n
VRPS4[n] := VNS*ZNA/(22.4*10^-3)*XK4[n]/U(T, λ*kλ(10), XK4[n], P)
VRIV4[n] := VNS*ZNA/(22.4*10^-3)*integral(1/U(T, λ*kλ(10), X, P), X = 0 .. XK4[n])
VRD4[n] := VNS*(W(XK4[n])*ZD(XK4[n]) - ZND)
# 5) 5% компенсации
z := 1 .. XE(T, λ*kλ(5))*1000
XE(T, λ*kλ(5)) = 0.994746
XK5[z] := 0.001*z
VRPS5[z] := VNS*ZNA/(22.4*10^-3)*XK5[z]/U(T, λ*kλ(5), XK5[z], P)
VRIV5[z] := VNS*ZNA/(22.4*10^-3)*integral(1/U(T, λ*kλ(5), X, P), X = 0 .. XK5[z])
VRD5[z] := VNS*(W(XK5[z])*ZD(XK5[z]) - ZND)
# адиабатичеаский режим
m := 1 .. XE(T, λ*kλ(0))*1000
XE(T, λ*kλ(0)) = 0.993982
XK6[m] := 0.001*m
VRPS6[m] := VNS*ZNA/(22.4*10^-3)*XK6[m]/U(T, λ*kλ(0), XK6[m], P)
VRIV6[m] := VNS*ZNA/(22.4*10^-3)*integral(1/U(T, λ*kλ(0), X, P), X = 0 .. XK6[m])
VRD6[m] := VNS*(W(XK6[m])*ZD(XK6[m]) - ZND)
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РПС
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VRPS0[xt] = 0.240182
VRPS1[xt] = 0.5651
VRPS2[xt] = 1.45268
VRPS3[xt] = 4.14644
VRPS4[xt] = 8.255
VRPS5[xt] = 10.5025
VRPS6[xt] = 13.4441
РИВ
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VRIV0[xt] = 0.116664
VRIV1[xt] = 0.202093
VRIV2[xt] = 0.385725
VRIV3[xt] = 0.824751
VRIV4[xt] = 1.385
VRIV5[xt] = 1.66521
VRIV6[xt] = 2.01432
T1(T, λ*kλ(100), XT) - 273 = 700
T1(T, λ*kλ(75), XT) - 273 = 655.06
T1(T, λ*kλ(50), XT) - 273 = 610.119
T1(T, λ*kλ(25), XT) - 273 = 565.179
T1(T, λ*kλ(10), XT) - 273 = 538.215
T1(T, λ*kλ(5), XT) - 273 = 529.227
T1(T, λ*kλ(0), XT) - 273 = 520.239
# Зависимсоть объёма от температуры:
x := 0 .. 100
T0[x] := 700 + 273 + x*1
VRIV4[n, x] := VNS*ZNA/(22.4*10^-3)*integral(1/U(T0[x], λ*kλ(10), X, P), X = 0 .. XK4[n])
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# Зависимсоть объёма от давления:
p := 0 .. 8
P0[p] := 1 + 0.5*p
VRIV4[n, p] := VNS*ZNA/(22.4*10^-3)*integral(1/U(T, λ*kλ(10), X, P0[p]), X = 0 .. 0.929)
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# Зависимсоть объёма от расхода:
s := 0 .. 8
VNS0[s] := VNS*3600 + 1000*s
VRIV4[n, s] := VNS0[s]*ZNA/(3600*22.4*10^-3)*integral(1/U(T, λ*kλ(10), X, P), X = 0 .. 0.929)
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# Зависимсоть объёма от доли аммиака:
k := 0 .. 8
ZNA0[k] := 0.15 + 0.01*k
VRIV4[n, k] := VNS*ZNA0[k]/(22.4*10^-3)*integral(1/U(T, λ*kλ(10), X, P), X = 0 .. 0.929)
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