# Курсовая работа
#
# N2+3H2=2NH3 (CH4)
#
# ZNA=0.23
# ZNB=0.72
# ZNC=0.003
# VNS=30000-75000
# VRC=3000-5000
# Долганина И. 221 гр.
# Ввод начальных мольных долей компонентов исходной смеси
ZNA := 0.23
ZNB := 0.72
ZNC := 0.003
ZND := 0
ZNI := 1 - ZNA - ZNB - ZNC = 0.047
W(X) := 1 - 2*ZNA*X
ZEA(X) := ZNA*(1 - X)/W(X)
ZEC(X) := (ZNC + 2/1*ZNA*X)/W(X)
ZEC(X) := (ZNC + 2*ZNA*X/1)/W(X)
ZEB(X) := (ZNB - 3/1*ZNA*X)/W(X)
ZEI(X) := ZNI/W(X)
# при 0 К
DHA := 0
DHB := 0
DHC := -38.95
CpI := 35.71
СpA := 29.12
CpB := 28.84
CpC := 35.63
DH := 1000*(2*DHC - DHA - 3*DHB) = -77900
Cp := СpA*ZNA + CpB*ZNB + CpC*ZNC + CpI*ZNI = 29.2477
λ := -DH/Cp*ZNA = 612.596
T(T0, λ, X) := T0 + λ*X
k1 := 0.184
K1(T0, λ, X) := k1*e^(-57000/(8.31*T(T0, λ, X)))
fA1 := 247.9
fB1 := 225.6
fC1 := 224.8
fB2 := 36.31
fA2 := 23.46
fC2 := 18.36
fB3 := -0.00132
fA3 := 0.000993
fC3 := 0.00121
fB4 := 0.25
fA4 := -0.1813
fC4 := -0.31
fA5 := 63.80
fB5 := -103
fC5 := 272
fA6 := -72.48
fB6 := 335
fC6 := -334
fA7 := 46.03
fB7 := -446
fC7 := 268
FA(T0, λ, X) := fA1 + fA2*ln(T(T0, λ, X)/10000) + fA3/(T(T0, λ, X)/10000)^2 + fA4/(T(T0, λ, X)/10000) + fA5*T(T0, λ, X)/10000 + fA6*(T(T0, λ, X)/10000)^2 + fA7*(T(T0, λ, X)/10000)^3
FB(T0, λ, X) := fB1 + fB2*ln(T(T0, λ, X)/10000) + fB3/(T(T0, λ, X)/10000)^2 + fB4/(T(T0, λ, X)/10000) + fB5*T(T0, λ, X)/10000 + fB6*(T(T0, λ, X)/10000)^2 + fB7*(T(T0, λ, X)/10000)^3
FC(T0, λ, X) := fC1 + fC2*ln(T(T0, λ, X)/10000) + fC3/(T(T0, λ, X)/10000)^2 + fC4/(T(T0, λ, X)/10000) + fC5*T(T0, λ, X)/10000 + fC6*(T(T0, λ, X)/10000)^2 + fC7*(T(T0, λ, X)/10000)^3
DF(T0, λ, X) := 2*FC(T0, λ, X) - 1*FA(T0, λ, X) - 3*FB(T0, λ, X)
Kp(T0, λ, X) := 10^(4189/T(T0, λ, X) - 6.028*log(T(T0, λ, X)) + 0.964*10^-3*T(T0, λ, X) - 0.126*10^5*T(T0, λ, X)^-2 + 6.491)
PA(P, X) := P*ZEA(X)
PB(P, X) := P*ZEB(X)
PC(P, X) := P*ZEC(X)
PI(P, X) := P*ZEI(X)
U(T0, λ, P, X) := K1(T0, λ, X)*PA(P, X)*(PB(P, X)^1.5)/PC(P, X)*(1 - 1/Kp(T0, λ, X)*PC(P, X)^2/(PA(P, X)*(PB(P, X)^3)))
VNS := 40000/3600
P := 250
VRC := 4500/3600
j := 0 .. 500
T0[j] := 273 + 100 + 25*j
# Рассчитываем равновесную степень превращения
XE(T0, λ) := root(U(T0, λ, P, X), X, 0.000001, 0.9999999)
# Рассчитываем требуемую степень превращения
XT := root(4500/3600 - VNS*(ZEC(X)*W(X) - ZNC), X, 0.000001, 0.999999) = 0.244565
# Рассчитываем равновесную температуру, К при разных условиях теплообмена
# 1- компенсация 25%
# 2- компенсация 50%
# 3 - компенсация 75%
# 4 - компенсация 0%
# 5 - компенсация 100%
TR01 := root(U(T0, λ*0.75, P, XT), T0, 200, 1500)
TR01 = 713.036
TR02 := root(U(T0, λ*0.5, P, XT), T0, 300, 1500)
TR02 = 750.49
TR03 := root(U(T0, λ*0.25, P, XT), T0, 300, 1500)
TR03 = 787.945
TR04 := root(U(T0, λ*0, P, XT), T0, 300, 1500)
TR04 = 825.4
TR05 := root(U(T0, λ*1, P, XT), T0, 300, 1500)
TR05 = 675.581
# Выбираем рабочую температуру на входе в реактор
# Для экзотермической реакции - меньше равновесной
t := TR05 - 10
i := 0 .. XE(t, λ*0.75)*1000
XE(t, λ*0.75) = 0.290079
# 25% компенсации
#
# 50% компенсации
#
# 75% компенсации
#
# 100% компенсации
#
# 0% компенсации
XE(t, λ*0.5) = 0.344492
q := 0 .. XE(t, λ*0.5)*1000
a := 0 .. XE(t, λ*0.25)*1000
XE(t, λ*0.25) = 0.432338
b := 0 .. XE(t, λ*0)*1000
XE(t, λ*0) = 0.597105
k := 0 .. XE(t, λ*1)*1000
XE(t, λ*1) = 0.252687
XK1[i] := 0.001*i
XK2[q] := 0.001*q
XK3[a] := 0.001*a
XK4[b] := 0.001*b
XK5[k] := 0.001*k
VRPS1[i] := VNS/1*ZNA*XK1[i]/U(t, λ*0.75, P, XK1[i])
VRPS4[b] := VNS/1*ZNA*XK4[b]/U(t, λ*0, P, XK4[b])
VRPS2[q] := VNS/1*ZNA*XK2[q]/U(t, λ*0.5, P, XK2[q])
VRPS5[k] := VNS/1*ZNA*XK5[k]/U(t, λ*1, P, XK5[k])
VRPS3[a] := VNS/1*ZNA*XK3[a]/U(t, λ*0.25, P, XK3[a])
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VRC1[i] := VNS*(ZEC(XK1[i])*W(XK1[i]) - ZNC)
VRC2[q] := VNS*(ZEC(XK2[q])*W(XK2[q]) - ZNC)
VRC3[a] := VNS*(ZEC(XK3[a])*W(XK3[a]) - ZNC)
VRC4[b] := VNS*(ZEC(XK4[b])*W(XK4[b]) - ZNC)
VRC5[k] := VNS*(ZEC(XK5[k])*W(XK5[k]) - ZNC)
VRIV1[i] := VNS/1*ZNA*integral(1/U(t, λ*0.75, P, X), X = 0 .. XK1[i])
VRIV4[b] := VNS/1*ZNA*integral(1/U(t, λ*0, P, X), X = 0 .. XK4[b])
VRIV2[q] := VNS/1*ZNA*integral(1/U(t, λ*0.5, P, X), X = 0 .. XK2[q])
VRIV5[k] := VNS/1*ZNA*integral(1/U(t, λ*1, P, X), X = 0 .. XK5[k])
VRIV3[a] := VNS/1*ZNA*integral(1/U(t, λ*0.25, P, X), X = 0 .. XK3[a])
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xt := 245
# Объёмы РПС, обеспечивающие требуемую производительность | Объёмы РИВ, обеспечивающие требуемую производительность
VRPS1[xt] = 12.8739
VRIV1[xt] = 6.16768
VRPS2[xt] = 14.8172
VRIV2[xt] = 7.81651
VRPS3[xt] = 21.6694
VRIV3[xt] = 10.5966
VRPS4[xt] = 35.9197
VRIV4[xt] = 15.2106
VRPS5[xt] = 31.4469
VRIV5[xt] = 5.75913
# Температура на выходе из реактора
T(t, λ*0.75, XT) = 777.945
T(t, λ*0.5, XT) = 740.49
T(t, λ*0.25, XT) = 703.036
T(t, λ*0, XT) = 665.581
T(t, λ*1, XT) = 815.4
# Зависимость объема реактора от давления
i := 0 .. 20
P0[i] := 230 + 5*i
VRIV5[245, i] := VNS/1*ZNA*integral(1/U(665, λ*1, P0[i], X), X = 0 .. XK5[245])
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# Зависимость объема реактора от температуры
j := 0 .. 10
T0[j] := 273 + 100 + 25*j
VRIV5[245, j] := VNS/1*ZNA*integral(1/U(T0[j], λ*1, P, X), X = 0 .. XK5[245])
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# Зависимость объема реактора от VNS
l := 0 .. 1000
VNS0[l] := 30000 + 45*l
VRIV5[245, l] := VNS0[l]/(3600*1)*ZNA*integral(1/U(665, λ*1, P, X), X = 0 .. XK5[245])
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# Зависимость объема реактора от ZNA
r := 0 .. 23
ZNA0[r] := 0.01 + 0.01*r
VRIV5[245, r] := VNS/1*ZNA0[r]*integral(1/U(665, λ*1, P, X), X = 0 .. XK5[245])
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# Влияние % компенсации на температуру и объемы реакторов
# При условиях: T=665 K, P = 250 атм
# Компенсируем от 0% до 100% теплового эффекта
y := 0 .. 100  # доля компенсации
k[y] := (100 - y)/100  # доля теплового эффекта
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VRPS[y] := VNS/1*ZNA*XT/U(t, λ*k[y], P, XT)
VRIV[y] := VNS/1*ZNA*integral(1/U(t, λ*k[y], P, X), X = 0 .. XT)
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