# Л1 Панузин К.И. гр.124
# Блок 12.1.Разложение метанола
# CH3OH ⇌ CO + 2H2(N2)
# Условия:
# T = 150-400°C
# P = 1-5 атм
# Исходные данные:
T := 150 .. 400
P := 1 .. 5
ZNA := 0.2
ZNC := 0.01
ZND := 0
ZNI := 1 - ZNA - ZNC - ZND = 0.79
VNS := 23000
VRD := 1504
k(T) := 10^10.39*e^(-127000/(8.31*T))
# Находим коэффициент изменения объема:
W(X) := 1 + (2 + 1 - 1)/1*ZNA*X
ZEA(X) := ZNA*(1 - X)/W(X)
ZEC(X) := (ZNC + ZNA*X)/W(X)
ZED(X) := (ZND + 2*ZNA*X)/W(X)
ZEI(X) := ZNI/W(X)
# Находим необходимую степень превращения:
XT := root(VNS*(ZED(X)*W(X) - ZND) - VRD, X, 0, 1) = 0.163478
# Находим парциальные давления:
PA(X, P) := ZEA(X)*P
PC(X, P) := ZEC(X)*P
PD(X, P) := ZED(X)*P
# Расчет константы равновесия
# Коэффициенты для расчета приведённой энергии Гиббса
# CH3OH | CO | H2
fA1 := 192.0
fC1 := 254.4
fD1 := 225.6
fA2 := -3.04
fC2 := 23.72
fD2 := 36.31
fA3 := 0.00314
fC3 := 0.00085
fD3 := -0.00132
fA4 := -0.081
fC4 := -0.16
fD4 := 0.25
fA5 := 787
fC5 := 65
fD5 := -103
fA6 := -1370
fC6 := -73
fD6 := 335
fA7 := 1410
fC7 := 42
fD7 := -446
θ(T) := T/10000
FA(T) := fA1 + fA2*ln(θ(T)) + fA3*θ(T)^-2 + fA4*θ(T)^-1 + fA5*θ(T) + fA6*θ(T)^2 + fA7*θ(T)^3
FC(T) := fC1 + fC2*ln(θ(T)) + fC3*θ(T)^-2 + fC4*θ(T)^-1 + fC5*θ(T) + fC6*θ(T)^2 + fC7*θ(T)^3
FD(T) := fD1 + fD2*ln(θ(T)) + fD3*θ(T)^-2 + fD4*θ(T)^-1 + fD5*θ(T) + fD6*θ(T)^2 + fD7*θ(T)^3
ΔF(T) := FC(T) + FD(T) - FA(T)
# Находим энтальпию реакции:
ΔHA := -190.11
ΔHC := -113.81
ΔHD := 0
ΔH := 1000*(ΔHC + ΔHD - ΔHA) = 76300
# реакция эндотермическая
# Находим константу равновесия:
Kp(T) := e^(ΔF(T)/8.31 - ΔH/(8.31*T))
# Находим скорость реакции:
U(T, P, X) := k(T)*(PA(X, P)/PC(X, P))^0.25*(1 - (1/Kp(T)*PC(X, P)*PD(X, P)^2/PA(X, P))^0.5)
i := 0 .. 250
j := 0 .. 4
q := 0 .. 5
T[i] := 150 + i + 273
P[j] := 1 + 1*j
X[q] := 0.1 + 0.1*q
# Графики зависимостей скорости реакции от
# 1. От температуры
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# Равновесная температура
TR(P, X) := root(U(T, P, X), T, 400, 700)
TR(1, 0.1) - 273 = 288.746
TR(4, 0.1) - 273 = 382.843
TR(1, 0.2) - 273 = 351.321
