# CH4 + CO2 = 2CO + 2H2
ZNA := 0.18*0.92 = 0.1656
ZNB := 0.5
ZNC := 0
ZND := 0
ZNI := 1 - ZNA - ZNB - ZNC - ZND = 0.3344
P := 2  # атм
VNS := 40000/3600
VR := 26000/3600
# T = 850-950 C = 1123-1223
K1(T) := 1.06*10^8*exp(-95000/(8.31*T))
W(X) := 1 + 2*ZNA*X
ZA(X) := ZNA*(1 - X)/W(X)
ZB(X) := (ZNB - ZNA*X)/W(X)
ZC(X) := (ZNC + 2*ZNA*X)/W(X)
ZD(X) := (ZND + 2*ZNA*X)/W(X)
ZI(X) := ZNI/W(X)
# Коэффициенты полиномов для расчета приведенной энергии Гиббса
# CH4 | CO2 | CO | H2
fA1 := 1.529*10^2
fB1 := 2.645*10^2
fC1 := 2.544*10^2
fD1 := 2.256*10^2
fA2 := -2.343*10^0
fB2 := 2.618*10^1
fC2 := 2.373*10^1
fD2 := 3.631*10^1
fA3 := 3.673*10^-3
fB3 := -8.334*10^-4
fC3 := 8.459*10^-4
fD3 := -1.322*10^-3
fA4 := -8.559*10^-1
fB4 := 1.028*10^-1
fC4 := -1.623*10^-1
fD4 := 2.496*10^-1
fA5 := 5.617*10^2
fB5 := 2.554*10^2
fC5 := 6.522*10^1
fD5 := -1.03*10^2
fA6 := -7.319*10^2
fB6 := -4.804*10^2
fC6 := -7.302*10^1
fD6 := 3.346*10^2
fA7 := 5.730*10^2
fB7 := 5.064*10^2
fC7 := 4.213*10^1
fD7 := -4.463*10^2
τ(T) := T/10000
FA(T) := fA1 + fA2*ln(τ(T)) + fA3/τ(T)^2 + fA4/τ(T) + fA5*τ(T) + fA6*τ(T)^2 + fA7*τ(T)^3
FB(T) := fB1 + fB2*ln(τ(T)) + fB3/τ(T)^2 + fB4/τ(T) + fB5*τ(T) + fB6*τ(T)^2 + fB7*τ(T)^3
FC(T) := fC1 + fC2*ln(τ(T)) + fC3/τ(T)^2 + fC4/τ(T) + fC5*τ(T) + fC6*τ(T)^2 + fC7*τ(T)^3
FD(T) := fD1 + fD2*ln(τ(T)) + fD3/τ(T)^2 + fD4/τ(T) + fD5*τ(T) + fD6*τ(T)^2 + fD7*τ(T)^3
DF(T) := 2*FD(T) + 2*FC(T) - FB(T) - FA(T)
# Энтальпия при 0К
DHA := -66.63
DHB := -393.145
DHC := -113.811
DHD := 0
DH := 1000*(2*DHD + 2*DHC - DHA - DHB) = 232153
# Константа равновесия
Kp(T) := e^(DF(T)/8.31 - DH/(8.31*T))
# Уравнение скорости реакции
u(T, X, P) := K1(T)*(ZA(X)*ZB(X)*P^2 - ZC(X)^2*ZD(X)^2*P^4/Kp(T))
# Рассчитываем равновесную степень превращения
XE(T) := root(u(T, X, P), X, 0, 1)
# Рассчитываем требуемую степень превращения
XT := root(VNS*(W(X)*(ZC(X) + ZD(X)) - ZNC - ZND) - VR, X, 0, 1) = 0.98128
xt := round(XT*1000) = 981
# Рассчитываем равновесную температуру, К
TR := root(u(T, XT, P), T, 700 + 273, 950 + 273) = 1010.01
1010 - 273 = 737
# Выбираем температуру, для эндотермической реакции больше равновесной
T1 := 850 + 273 = 1123
i := 0 .. XE(T1)*1000
XE(T1) = 0.999102
XK1[i] := 0.001*i
T2 := 950 + 273 = 1223
q := 0 .. XE(T2)*1000
XE(T2) = 0.999907
XK2[q] := 0.001*q
# Объёмы РПС при заданных температурах входа:
VRPS1[i] := VNS/1*ZNA*XK1[i]/u(T1, XK1[i], P)
VRPS2[q] := VNS/1*ZNA*XK2[q]/u(T2, XK2[q], P)
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VR1[i] := VNS*W(XK1[i])*(ZC(XK1[i]) + ZD(XK1[i]))
VR2[q] := VNS*W(XK2[q])*(ZC(XK2[q]) + ZD(XK2[q]))
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VRPS1[xt] = 0.194043
VRPS2[xt] = 0.0810764
VRIV1[i] := VNS/1*ZNA*integral(1/u(T1, X, P), X = 0 .. XK1[i])
VRIV2[q] := VNS/1*ZNA*integral(1/u(T2, X, P), X = 0 .. XK2[q])
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VRIV1[xt] = 0.0118429
VRIV2[xt] = 0.00510144
# Так как при заданном диапазоне температур объемы реакторов слишком малы, понижаем температуры до 740 и 750 C
T1 := 740 + 273 = 1013
i := 0 .. XE(T1)*1000
XE(T1) = 0.982807
XK1[i] := 0.001*i
T2 := 750 + 273 = 1023
q := 0 .. XE(T2)*1000
XE(T2) = 0.987061
XK2[q] := 0.001*q
# Объёмы РПС при заданных температурах входа:
VRPS1[i] := VNS/1*ZNA*XK1[i]/u(T1, XK1[i], P)
VRPS2[q] := VNS/1*ZNA*XK2[q]/u(T2, XK2[q], P)
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VRPS1[xt] = 5.50778
VRPS2[xt] = 1.49567
# Объёмы РИВ при заданных температурах
VRIV1[i] := VNS/1*ZNA*integral(1/u(T1, X, P), X = 0 .. XK1[i])
VRIV2[q] := VNS/1*ZNA*integral(1/u(T2, X, P), X = 0 .. XK2[q])
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VRIV1[xt] = 0.0566936
VRIV2[xt] = 0.0405278
# Для расчёта теплоты теплообмена рассчитываем среднюю теплоёмкость смеси на входе и выходе из реактора и удельный тепловой эффект
HA := -74.85
HB := -393.51
HC := -110.53
HD := 0
СpA := 35.31
CpB := 37.11
CpC := 29.14
CpD := 28.84
CpI := 29.12
dH := 1000*(2*HD + 2*HC - HB - HA) = 247300
CpN := СpA*ZNA + CpB*ZNB + CpC*ZNC + CpD*ZND + CpI*ZNI = 34.1401
CpK(X) := СpA*ZA(X) + CpB*ZB(X) + CpC*ZC(X) + CpD*ZD(X) + CpI*ZI(X)
q := -dH/1 = -247300
CpK(XT) = 31.1059
T := 700 + 273 .. 950 + 273
QTO(T) := VNS*1000/22.4*(CpK(XT)*T*W(XT) - CpN*T - q*ZNA*XT)
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QTO(T1) = 23488828
