# CH4 + CO2 = 2CO + 2H2
ZNA := 0.15*0.9 = 0.135
ZNB := 0.5
ZNC := 0
ZND := 0
ZNI := 1 - ZNA - ZNB - ZNC - ZND = 0.365
P := 1  # атм
VNS := 60000/3600
VR := 29000/3600
# T = 800-950 C = 1073-1223
K1(T) := 1.06*10^8*exp(-95000/(8.31*T))
W(X) := 1 + 2*ZNA*X
ZA(X) := ZNA*(1 - X)/W(X)
ZB(X) := (ZNB - ZNA*X)/W(X)
ZC(X) := (ZNC + 2*ZNA*X)/W(X)
ZD(X) := (ZND + 2*ZNA*X)/W(X)
ZI(X) := ZNI/W(X)
# Коэффициенты полиномов для расчета приведенной энергии Гиббса
# CH4 | CO2 | CO | H2
fA1 := 1.529*10^2
fB1 := 2.645*10^2
fC1 := 2.544*10^2
fD1 := 2.256*10^2
fA2 := -2.343*10^0
fB2 := 2.618*10^1
fC2 := 2.373*10^1
fD2 := 3.631*10^1
fA3 := 3.673*10^-3
fB3 := -8.334*10^-4
fC3 := 8.459*10^-4
fD3 := -1.322*10^-3
fA4 := -8.559*10^-1
fB4 := 1.028*10^-1
fC4 := -1.623*10^-1
fD4 := 2.496*10^-1
fA5 := 5.617*10^2
fB5 := 2.554*10^2
fC5 := 6.522*10^1
fD5 := -1.03*10^2
fA6 := -7.319*10^2
fB6 := -4.804*10^2
fC6 := -7.302*10^1
fD6 := 3.346*10^2
fA7 := 5.730*10^2
fB7 := 5.064*10^2
fC7 := 4.213*10^1
fD7 := -4.463*10^2
fA(T) := fA1 + fA2*ln(T/10000) + fA3/(T/10000)^2 + fA4/(T/10000) + fA5*T/10000 + fA6*(T/10000)^2 + fA7*(T/10000)^3
fB(T) := fB1 + fB2*ln(T/10000) + fB3/(T/10000)^2 + fB4/(T/10000) + fB5*T/10000 + fB6*(T/10000)^2 + fB7*(T/10000)^3
fC(T) := fC1 + fC2*ln(T/10000) + fC3/(T/10000)^2 + fC4/(T/10000) + fC5*T/10000 + fC6*(T/10000)^2 + fC7*(T/10000)^3
fD(T) := fD1 + fD2*ln(T/10000) + fD3/(T/10000)^2 + fD4/(T/10000) + fD5*T/10000 + fD6*(T/10000)^2 + fD7*(T/10000)^3
Δf(T) := 2*fD(T) + 2*fC(T) - fB(T) - fA(T)
# Энтальпия при 0К
ΔHA := -66.63
ΔHB := -393.145
ΔHC := -113.811
ΔHD := 0
ΔH := 1000*(2*ΔHD + 2*ΔHC - ΔHA - ΔHB) = 232153
# Константа равновесия
Kp(T) := e^(Δf(T)/8.31 - ΔH/(8.31*T))
# Уравнение скорости реакции
U(T, X, P) := K1(T)*(ZA(X)*ZB(X)*P^2 - ZC(X)^2*ZD(X)^2*P^4/Kp(T))
# Рассчитываем равновесную степень превращения
XE(T) := root(U(T, X, P), X, 0, 1)
# Рассчитываем требуемую степень превращения
XT := root(VNS*(W(X)*(ZC(X) + ZD(X)) - ZNC - ZND) - VR, X, 0, 1) = 0.895062
xt := round(XT*1000) = 895
# Рассчитываем равновесную температуру, К
TR := root(U(T, XT, P), T, 500 + 273, 1000 + 273) = 892.399
892 - 273 = 619
T1 := 800 + 273 = 1073
i := 0 .. XE(T1)*1000
XE(T1) = 0.999551
XK1[i] := 0.001*i
Kp(100) = 1.88833e-114
T2 := 950 + 273 = 1223
q := 0 .. XE(T2)*1000
XE(T2) = 0.999987
XK2[q] := 0.001*q
Δf(10000) = -501.416
ΔH/(8.31*T1) = 26.036
# Объёмы РПС при заданных температурах входа:
VRPS1[i] := VNS/1*ZNA*XK1[i]/U(T1, XK1[i], P)
VRPS2[q] := VNS/1*ZNA*XK2[q]/U(T2, XK2[q], P)
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VR1[i] := VNS*W(XK1[i])*(ZC(XK1[i]) + ZD(XK1[i]))
VR2[q] := VNS*W(XK2[q])*(ZC(XK2[q]) + ZD(XK2[q]))
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VRPS1[xt] = 0.231535
VRPS2[xt] = 0.0625091
VRIV1[i] := VNS/1*ZNA*integral(1/U(T1, X, P), X = 0 .. XK1[i])
VRIV2[q] := VNS/1*ZNA*integral(1/U(T2, X, P), X = 0 .. XK2[q])
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VRIV1[xt] = 0.0494139
VRIV2[xt] = 0.0133665
# Так как при заданном диапазоне температур объемы реакторов слишком малы, понижаем температуры до значения, близкого к равновесию, а именно: 625 и 630 C
T1 := 625 + 273 = 898
i := 0 .. XE(T1)*1000
XE(T1) = 0.909983
XK1[i] := 0.001*i
T2 := 630 + 273 = 903
q := 0 .. XE(T2)*1000
XE(T2) = 0.921869
XK2[q] := 0.001*q
# Объёмы РПС при заданных температурах входа:
VRPS1[i] := VNS/1*ZNA*XK1[i]/U(T1, XK1[i], P)
VRPS2[q] := VNS/1*ZNA*XK2[q]/U(T2, XK2[q], P)
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VRPS1[xt] = 9.35382
VRPS2[xt] = 5.08324
# Объёмы РИВ при заданных температурах
VRIV1[i] := VNS/1*ZNA*integral(1/U(T1, X, P), X = 0 .. XK1[i])
VRIV2[q] := VNS/1*ZNA*integral(1/U(T2, X, P), X = 0 .. XK2[q])
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VRIV1[xt] = 0.591033
VRIV2[xt] = 0.486162
# Для расчёта теплоты теплообмена рассчитываем среднюю теплоёмкость смеси на входе и выходе из реактора и удельный тепловой эффект
HA := -74.85
HB := -393.51
HC := -110.53
HD := 0
СpA := 35.31
CpB := 37.11
CpC := 29.14
CpD := 28.84
CpI := 29.12
dH := 1000*(2*HD + 2*HC - HB - HA) = 247300
CpN := СpA*ZNA + CpB*ZNB + CpC*ZNC + CpD*ZND + CpI*ZNI = 33.9507
CpK(X) := СpA*ZA(X) + CpB*ZB(X) + CpC*ZC(X) + CpD*ZD(X) + CpI*ZI(X)
q := -dH/1
CpK(XT) = 31.5799
T := 700 + 273 .. 950 + 273
QTO(T) := VNS*1000/22.4*(CpK(XT)*T*W(XT) - CpN*T - q*ZNA*XT)
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QTO(T1) = 25748911
QTO(T2) = 25768483
