ZNA := 0.02  # CO  # CO+3H2=CH4+H2O
ZNB := 0.8  # H2
ZNC := 0.01  # H2O
ZND := 0.09  # CH4
ZNI := 1 - ZNA - ZNB - ZNC - ZND = 0.08  # N2
P := 5  # атм
# Tвх = 280-320 C
# max Tвых = 350 C
VNS := 40000/3600
# Находим теплоёмкость исходной смеси
CpA := 29.141
CpB := 28.836
CpC := 33.598
CpD := 35.696
CpI := 29.124
Cp := CpA*ZNA + CpB*ZNB + CpC*ZNC + CpD*ZND + CpI*ZNI = 29.5302
# Энтальпия реакции при 298К
dHA := -110.53
dHB := 0
dHC := -241.826
dHD := -74.6
dH := 1000*(dHD + dHC - dHA) = -205896
q := -dH/1 = 205896
# Температура на выходе из реактора:
T(T0, X) := T0 + q/Cp*ZNA*X
K(T0, X) := 888*exp(-26000/(8.31*T(T0, X)))
W(X) := 1 - 2*ZNA*X
ZA(X) := ZNA*(1 - X)/W(X)
ZB(X) := (ZNB - 3*ZNA*X)/W(X)
ZC(X) := (ZNC + ZNA*X)/W(X)
ZD(X) := (ZND + ZNA*X)/W(X)
ZI(X) := ZNI/W(X)
# Коэффициенты полиномов для расчета приведенной энергии Гиббса
# CO | H2 | H2O | CH4
fA1 := 2.544*10^2
fB1 := 2.256*10^2
fC1 := 2.594*10^2
fD1 := 1.529*10^2
fA2 := 2.373*10^1
fB2 := 3.631*10^1
fC2 := 2.908*10^1
fD2 := -2.343*10^0
fA3 := 8.459*10^-4
fB3 := -1.322*10^-3
fC3 := 5.866*10^-4
fD3 := 3.673*10^-3
fA4 := -1.623*10^-1
fB4 := 2.496*10^-1
fC4 := -1.168*10^-1
fD4 := -8.559*10^-1
fA5 := 6.522*10^1
fB5 := -1.03*10^2
fC5 := 4.778*10^1
fD5 := 5.617*10^2
fA6 := -7.302*10^1
fB6 := 3.346*10^2
fC6 := 7.519*10^1
fD6 := -7.319*10^2
fA7 := 4.213*10^1
fB7 := -4.463*10^2
fC7 := -1.531*10^2
fD7 := 5.730*10^2
τ(T0, X) := T(T0, X)/10000
FA(T0, X) := fA1 + fA2*ln(τ(T0, X)) + fA3/τ(T0, X)^2 + fA4/τ(T0, X) + fA5*τ(T0, X) + fA6*τ(T0, X)^2 + fA7*τ(T0, X)^3
FB(T0, X) := fB1 + fB2*ln(τ(T0, X)) + fB3/τ(T0, X)^2 + fB4/τ(T0, X) + fB5*τ(T0, X) + fB6*τ(T0, X)^2 + fB7*τ(T0, X)^3
FC(T0, X) := fC1 + fC2*ln(τ(T0, X)) + fC3/τ(T0, X)^2 + fC4/τ(T0, X) + fC5*τ(T0, X) + fC6*τ(T0, X)^2 + fC7*τ(T0, X)^3
FD(T0, X) := fD1 + fD2*ln(τ(T0, X)) + fD3/τ(T0, X)^2 + fD4/τ(T0, X) + fD5*τ(T0, X) + fD6*τ(T0, X)^2 + fD7*τ(T0, X)^3
DF(T0, X) := FD(T0, X) + FC(T0, X) - 3*FB(T0, X) - FA(T0, X)
# Энтальпия при 0К
DHA := -113.811
DHB := 0
DHC := -238.923
DHD := -66.63
DH := 1000*(DHD + DHC - DHA) = -191742
Kp(T0, X) := DF(T0, X)/8.31 - DH/(8.31*T(T0, X))
u(T0, X, P) := K(T0, X)*P*(ZA(X) - ZC(X)*ZD(X)*P/Kp(T0, X))
# Рассчитываем равновесную степень превращения
XE(T0) := root(u(T0, X, P), X, 0, 1)
# Рассчитываем требуемую степень превращения
XT := root(ZA(X) - 0.002, X, 0, 1) = 0.903585
xt := round(XT*1000) = 904
# Рассчитываем равновесную температуру, К
TR0 := root(u(T0, XT, P), T0, 280 + 273, 320 + 273) = 575.43
575 - 273 = 302
# Выбираем рабочие температуры
# Для экзотермической реакции - меньше равновесной
# Выбираем температуру 493К = 220C, 553К = 280C, 573К = 300C
T1 := 493
T(T1, XT) - 273 = 346.003
i := 0 .. XE(T1)*1000
XE(T1) = 0.936859
XK1[i] := 0.001*i
T2 := 553
T(T2, XT) - 273 = 406.003
q := 0 .. XE(T2)*1000
XE(T2) = 0.914686
XK2[q] := 0.001*q
T3 := 573
T(T3, XT) = 699.003
j := 0 .. XE(T3)*1000
XE(T3) = 0.904884
XK3[j] := 0.001*j
# Объёмы РПС при заданных температурах входа:
VRPS1[i] := VNS/1*ZNA*XK1[i]/u(T1, XK1[i], P)
VRPS2[q] := VNS/1*ZNA*XK2[q]/u(T2, XK2[q], P)
VRPS3[j] := VNS/1*ZNA*XK3[j]/u(T3, XK3[j], P)
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VRPS1[xt] = 9.43342
VRPS2[xt] = 17.7671
VRPS3[xt] = 184.292
# Объёмы РИВ при заданных температурах:
VRIV1[i] := VNS/1*ZNA*integral(1/u(T1, X, P), X = 0 .. XK1[i])
VRIV2[q] := VNS/1*ZNA*integral(1/u(T2, X, P), X = 0 .. XK2[q])
VRIV3[j] := VNS/1*ZNA*integral(1/u(T3, X, P), X = 0 .. XK3[j])
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VRIV1[xt] = 1.70858
VRIV2[xt] = 1.22705
VRIV3[xt] = 1.49597
