# Задача 1
# Уравнение реакции | CH4+H2O=CO+3H2
# Исходные данные
ZNA := 0.2
VNS := 50000
Kp(T) := e^(-7206/T + 9.84)
ZNB := 0.7
VRD := 22500
P := 10  # Ключевой компонент - CH4(A)
ZNI := 0.1
# Решение
# Коэффициент изменения объема
W(X) := 1 + (3 + 1 - 1 - 1)/1*ZNA*X
ZEA(X) := ZNA*(1 - X)/W(X)
ZEB(X) := (ZNB - ZNA*X)/W(X)
ZEC(X) := ZNA*X/W(X)
ZED(X) := 3*ZNA*X/W(X)
ZEI(X) := ZNI/W(X)
# Расчёт необходимой степени превращения
XMIN := 0
XT := root(ZED(X) - VRD/(VNS*W(X)), X, XMIN, 1) = 0.750004
ZEA(XT) + ZEB(XT) + ZEC(XT) + ZED(XT) + ZEI(XT) = 1
# Уравнение целевой функции
EQ(T, P, X) := Kp(T)*ZEA(X)*ZEB(X)*P^-2 - ZEC(X)*ZED(X)^3
# Расчёт равновесной температуры
TR(P, X) := root(EQ(T, P, X), T, 400, 1200)
TR(10, XT) - 273 = 842.722
