# Задание 2
# Уравнение реакции  A+B=C
# Исходные данные
ZNA := 0.37
E01 := 47500
K01 := 1.16*10^5
ZNB := 0.5
E02 := 135000
K02 := 1.65*10^10
ZNI := 0.23
P := 3
VNS := 41000
VRC := 10500
# Константы | Решение
K1(T) := K01*e^(-E01/(8.314*T))
K2(T) := K02*e^(-E02/(8.314*T))
# Коэффициент изменения объёма
W(X) := 1 + ((1 - 1 - 1)/1)*ZNA*X
ZEA(X) := ZNA*(1 - X)/W(X)
ZEB(X) := (ZNB - ZNA*X)/W(X)
ZEC(X) := ZNA*X/W(X)
ZEI(X) := ZNI/W(X)
# Находим необходимую степень  превращения
XMIN := 0
XT := root(ZEC(X) - VRC/(VNS*W(X)), X, XMIN, 1) = 0.692156
# Уравнния скоростей реакций
U1(T, P, X) := K1(T)*ZEA(X)*ZEB(X)*P^2
U2(T, P, X) := K2(T)*ZEC(X)*P
U(T, P, X) := U1(T, P, X) - U2(T, P, X)
i := 0 .. 100
T[i] := 300 + 10*i
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# Увеличиваем производительность по компоненту С на 10%
XT1 := root(ZEC(X) - VRC*1.1/(VNS*W(X)), X, XMIN, 1) = 0.761371
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T(P, X) := root(U(T, P, X) - U(T, 3, XT), T, 600, 900)
T(4, XT1) = 799.329
# Вывод: Увеличение производительности по компоненту C можно достигнуть за счет увеличения давления до 4 атм и выше.
# При увеличении давления до 4 атм Температура должна равнятся 799 К
# При увеличении давления до 5 атм и выше необходимо расширять температурный диапазон
# При давлении ниже 4 необходимую производителоьность получить невозможно
