# Задача 1
# Уравнение реакции | CH3OH+O2=HCOOH+H2O
# Исходные данные
Kp(T) := e^(6732/T - 2.81)
ZNA := 0.4
VNS := 20000
ZNB := 0.126
P := 5
VRC := 2500
ZNI := 1 - ZNA - ZNB = 0.474  # Ключевой компонент - O2
Решение
# Коэффициент изменения объема
W(X) := 1
ZEA(X) := ZNA - ZNB*X
ZEB(X) := ZNB*(1 - X)
ZEC(X) := ZNB*X
ZED(X) := ZNB*X
ZEI := ZNI
# Расчёт степени превращения
XMIN := 0
XT := root(ZEC(X) - VRC/(VNS*W(X)), X, XMIN, 1) = 0.992063
ZEA(XT) + ZEB(XT) + ZEC(XT) + ZED(XT) + ZEI = 1
# Уравнение целевой функции
EQ(X, T, P) := Kp(T)*ZEA(X)*ZEB(X)*P^0 - ZEC(X)*ZED(X)
# Расчёт равновесной температуры
TR(X, P) := root(EQ(X, T, P), T, 300, 1000)
TR(XT, 5) - 273 = 709.794
