# Задание 2
# Уравнение реакции  2A=C+D
# Исходные данные
ZNA := 0.6
E01 := 51000
K01 := 1.66*10^5
ZNI := 0.4
E02 := 87000
K02 := 1.24*10^9
VNS := 20000
P := 7
VRC := 2900
# Решение
# Константы
K1(T) := K01*e^(-E01/(8.314*T))
K2(T) := K02*e^(-E02/(8.314*T))
# Коэффициент изменения объёма
W(X) := 1
ZEA(X) := ZNA*(1 - X)
ZEC(X) := 1/2*ZNA*X
ZED(X) := 1/2*ZNA*X
ZEI := ZNI
# Находим необходимую степень  превращения
XMIN := 0
XT := root(ZEC(X) - VRC/(VNS*W(X)), X, XMIN, 1) = 0.483333
# Уравнния скоростей реакций
U1(T, P, X) := K1(T)*ZEA(X)^2*P^2
U2(T, P, X) := K2(T)*ZEC(X)*ZED(X)*P^2
U(T, P, X) := U1(T, P, X) - U2(T, P, X)
i := 0 .. 250
T[i] := 300 + 2*i
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# Увеличиваем производительность по компоненту С на 10%
XT1 := root(ZEC(X) - VRC*1.1/(VNS*W(X)), X, 0, 1) = 0.531667
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T(P, X) := root(U(T, P, X) - U(T, 7, XT), T, 500, 600)
T(10, XT1) = 529.727
# Вывод: увеличение производительности компонента С можно добиться увеличением давления до 10 атм при температуре 530 К
# При давлении ниже 10 атм невозможно обеспечить необходимую скорость и соответственно производительность
