# Задача 1
# Уравнение реакции | 2CH4+O2=C2H4+2H2O
Kp(T) := e^(7506/T - 2.13)
# Исходные данные
VNS := 20000
ZNA := 0.4
VRC := 2600
P := 15
ZNB := 0.137
ZNI := 1 - ZNA - ZNB = 0.463  # Ключевой компонент - O2(B)
# Решение
# Коэффициент изменения объема
W(X) := 1
ZEA(X) := ZNA - 2*ZNB*X
ZEB(X) := ZNB*(1 - X)
ZEC(X) := ZNB*X
ZED(X) := 2*ZNB*X
ZEI := ZNI
# Расчёт степени превращения
XMIN := 0
XT := root(ZEC(X) - VRC/VNS, X, XMIN, 1) = 0.948905
ZEA(XT) + ZEB(XT) + ZEC(XT) + ZED(XT) + ZEI = 1
# Уравнение целевой функции
EQ(T, P, X) := Kp(T)*ZEA(X)^2*ZEB(X)*P^0 - ZEC(X)*ZED(X)^2
# Расчёт равновесной температуры
TR(P, X) := root(EQ(T, P, X), T, 300, 1200)
TR(15, XT) - 273 = 920.379
