# Задание 2
# Уравнение реакции  A+B=3C+D
# Исходные данные
ZNA := 0.15
E01 := 48000
K01 := 1.31*10^5
ZNB := 0.65
E02 := 90000
K02 := 1.11*10^12
VNS := 25000
ZNI := 0.2
P := 3
VRC := 7700
# Решение
# Константы
K1(T) := K01*e^(-E01/(8.314*T))
K2(T) := K02*e^(-E02/(8.314*T))
# Коэффициент изменения объёма
W(X) := 1 + ((3 + 1 - 1 - 1)/1)*ZNA*X
ZEA(X) := ZNA*(1 - X)/W(X)
ZEB(X) := (ZNB - 3*ZNA*X)/W(X)
ZEC(X) := 3*ZNA*X/W(X)
ZED(X) := ZNA*X/W(X)
ZEI(X) := ZNI/W(X)
# Находим необходимую степень  превращения
XMIN := 0
XT := root(ZEC(X) - VRC/(VNS*W(X)), X, 0, 1) = 0.684446
# Уравнния скоростей реакций
U1(T, P, X) := K1(T)*ZEA(X)*ZEB(X)*P^2
U2(T, P, X) := K2(T)*ZEC(X)^3*ZED(X)*P^4
U(T, P, X) := U1(T, P, X) - U2(T, P, X)
i := 0 .. 200
T[i] := 200 + 1*i
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# Увеличиваем производительность по компоненту С на 10%
XT1 := root(ZEC(X) - VRC*1.1/(VNS*W(X)), X, XMIN, 1) = 0.75289
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# Вывод: Производительность по компоненту С не может быть увеличена на 10% за счет изменения давления
# При повышении степеи превращения скорость сильно уменьшается
# С уменьшением давления до 1 атм температурный диапазон уменьшается, но скорость остается недостаточной
# При увеличении давления до 5 атм температурный диапазон сужается, а скорость уменьшается
