# Задача 1
# Уравнение реакции | 4HCl+O2=2Cl2+2H2O
# Исходные данные
Kp(T) := e^(6455/T - 4.43)
ZNA := 0.3
VNS := 20000
ZNB := 0.14
P := 3
VRC := 2600
ZNI := 1 - ZNA - ZNB = 0.56  # Ключевой компонент HCl(A)
Решение
# Коэффициент изменения объема
W(X) := 1 + (2 + 2 - 1 - 4)/4*ZNA*X
ZEA(X) := ZNA*(1 - X)/W(X)
ZEB(X) := (ZNB - 1/4*ZNA*X)/W(X)
ZEC(X) := 1/2*ZNA*X/W(X)
ZED(X) := 1/2*ZNA*X/W(X)
ZEI(X) := ZNI/W(X)
# Расчёт степени превращения
XMIN := 0
XT := root(ZEC(X) - VRC/(VNS*W(X)), X, XMIN, 1) = 0.866667
ZEA(XT) + ZEB(XT) + ZEC(XT) + ZED(XT) + ZEI(XT) = 1
# Уравнение целевой функции
EQ(X, T, P) := Kp(T)*ZEA(X)^4*ZEB(X)*P^1 - ZEC(X)^2*ZED(X)^2
# Расчёт равновесной температуры
TR(X, P) := root(EQ(X, T, P), T, 300, 900)
TR(XT, 3) - 273 = 337.745
