# Задание 2
# Уравнение реакции  A+2B=5C+2D
# Исходные данные
ZNA := 0.2
E01 := 52000
K01 := 1.72*10^5
ZNB := 0.5
E02 := 96000
K02 := 1.28*10^10
VNS := 15000
ZNI := 0.3
P := 3
VRC := 7300
# Решение
# Константы
K1(T) := K01*e^(-E01/(8.314*T))
K2(T) := K02*e^(-E02/(8.314*T))
# Коэффициент изменения объёма
W(X) := 1 + ((2 + 5 - 2 - 1)/1)*ZNA*X
ZEA(X) := ZNA*(1 - X)/W(X)
ZEB(X) := (ZNB - 2*ZNA*X)/W(X)
ZED(X) := 2*ZNA*X/W(X)
ZEC(X) := 5*ZNA*X/W(X)
ZEI(X) := ZNI/W(X)
# Находим необходимую степень  превращения
XMIN := 0
XT := root(ZEC(X) - VRC/(VNS*W(X)), X, 0, 1) = 0.486652
# Уравнния скоростей реакций
U1(T, P, X) := K1(T)*ZEA(X)*ZEB(X)^2*P^3
U2(T, P, X) := K2(T)*ZEC(X)^5*ZED(X)^2*P^7
U(T, P, X) := U1(T, P, X) - U2(T, P, X)
i := 0 .. 250
T[i] := 200 + 2*i
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# Увеличиваем производительность по компоненту С на 10%
XT1 := root(ZEC(X) - VRC*1.1/(VNS*W(X)), X, 0, 1) = 0.535353
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# Вывод: увеличение производительности компонента С можно добиться уменьшением
# давления до 1 атм, при этом расширив температурный диапазон
# При увеличении давления скорость реакции и диапазон температур уменьшаются
# При уменьшении давления скорость реакции и температурный диапазон увеличивается
