# Уравнение реакции 2Cl2+2H2O=4HCl+O2
# Исходные данные
ZNA := 0.3
ZNB := 0.5
ZNI := 1 - ZNA - ZNB = 0.2
VNS := 20000
VRC := 4600
P := 2  # Ключевой компонент - Cl2(A)
Решение
KP(T) := e^(-6455/T + 4.43)
# Коэфициент изменения объема
W(X) := 1 + (4 + 1 - 2 - 2)/2*ZNA*X
ZEA(X) := ZNA*(1 - X)/W(X)
ZEB(X) := (ZNB - ZNA*X)/W(X)
ZEC(X) := 2*ZNA*X/W(X)
ZED(X) := 1/2*ZNA*X/W(X)
ZEI(X) := ZNI/W(X)
# Расчет требуемой степени превращения
XMIN := 0
XT := root(ZEC(X) - VRC/(VNS*W(X)), X, XMIN, 1) = 0.383333
ZEA(XT) + ZEB(XT) + ZEC(XT) + ZED(XT) + ZEI(XT) = 1
# Уравнение целевой функции равновесия
EQ(T, P, X) := KP(T)*ZEA(X)^2*ZEB(X)^2*P^-1 - ZEC(X)^4*ZED(X)
# Расчет равновесной температуры
TR(P, X) := root(EQ(T, P, X), T, 400, 1100)
TR(P, XT) - 273 = 618.129
