# Задание 2
# Уравнение реакции | 4A+3B=2C+6D
# Исходные данные
ZNA := 0.3
E1 := 43000
K01 := 1.46*10^5
ZNB := 0.4
E2 := 92000
K02 := 1.65*10^10
VNS := 20000
VRC := 2000
P := 3
ZNI := 1 - ZNA - ZNB = 0.3  # ключевой компонент A
Решение
# Уравнение Аррениуса для констант скоростей прямой и обратной реакции
K1(T) := K01*e^(-E1/(8.31*T))
K2(T) := K02*e^(-E2/(8.31*T))
# Коэфициент изменения объема
W(X) := 1 + (6 + 2 - 4 - 3)/4*ZNA*X
ZEA(X) := ZNA*(1 - X)/W(X)
ZEB(X) := (ZNB - 3/4*ZNA*X)/W(X)
ZEC(X) := 2/4*ZNA*X/W(X)
ZEI(X) := ZNI/W(X)
ZED(X) := 6/4*ZNA*X/W(X)
# Расчет требуемой степени превращения
XMIN := 0
XT := root(ZEC(X) - VRC/(VNS*W(X)), X, XMIN, 1) = 0.666667
# Уравнения для расчета скорости реакции
U1(T, P, X) := K1(T)*ZEA(X)^4*ZEB(X)^3*P^7
U2(T, P, X) := K2(T)*ZEC(X)^2*ZED(X)^6*P^8
U(T, P, X) := U1(T, P, X) - U2(T, P, X)
i := 0 .. 100
T[i] := 200 + 5*i
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XT1 := root(ZEC(X) - VRC*1.1/(VNS*W(X)), X, XMIN, 1) = 0.733333
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# Вывод: Увеличение производительности по компоненту С на 10% можно получить за счет увеличения давления до 5 атм, но при это небходимо уменьшить температурный диапазон
# При давлении ниже 5 атм скорость реакции низкая
# При уменьшении давления скорость реакции уменьшается еще сильнее и получение необходимой производительности становится невозможным
