# Уравнение реакции 2CH3OH+O2=2CH2O+2H2O
# Исходные данные
ZNA := 0.4
ZNB := 0.147
ZNI := 1 - ZNA - ZNB = 0.453
VNS := 15000
VRC := 3600
P := 3  # Ключевой компонент - O2(B)
Решение
KP(T) := e^(6591/T - 3.86)
# Коэфициент изменения объема
W(X) := 1 + (2 + 2 - 2 - 1)/1*ZNB*X
ZEA(X) := (ZNA - 2*ZNB*X)/W(X)
ZEB(X) := ZNB*(1 - X)/W(X)
ZEC(X) := 2*ZNB*X/W(X)
ZED(X) := 2*ZNB*X/W(X)
ZEI(X) := ZNI/W(X)
# Расчет требуемой степени превращения
XMIN := 0
XT := root(ZEC(X) - VRC/(VNS*W(X)), X, XMIN, 1) = 0.816327
ZEA(XT) + ZEB(XT) + ZEC(XT) + ZED(XT) + ZEI(XT) = 1
# Уравнение целевой функции равновесия
EQ(T, P, X) := KP(T)*ZEA(X)^2*ZEB(X)*P^-1 - ZEC(X)^2*ZED(X)^2
# Расчет равновесной температуры
TR(P, X) := root(EQ(T, P, X), T, 300, 1100)
TR(P, XT) - 273 = 754.611
