# Задание 2
# Уравнение реакции | 4A+5B=4C+6D
# Исходные данные
ZNA := 0.25
E1 := 55000
K01 := 1.86*10^5
ZNB := 0.4
E2 := 120000
K02 := 1.21*10^9
VNS := 25000
VRC := 3000
P := 5
ZNI := 1 - ZNA - ZNB = 0.35  # ключевой компонент A
Решение
# Уравнение Аррениуса для констант скоростей прямой и обратной реакции
K1(T) := K01*e^(-E1/(8.31*T))
K2(T) := K02*e^(-E2/(8.31*T))
# Коэфициент изменения объема
W(X) := 1 + (6 + 4 - 4 - 5)/4*ZNA*X
ZEA(X) := ZNA*(1 - X)/W(X)
ZEB(X) := (ZNB - 5/4*ZNA*X)/W(X)
ZEC(X) := ZNA*X/W(X)
ZEI(X) := ZNI/W(X)
ZED(X) := 6/4*ZNA*X/W(X)
# Расчет требуемой степени превращения
XMIN := 0
XT := root(ZEC(X) - VRC/(VNS*W(X)), X, XMIN, 1) = 0.48
# Уравнения для расчета скорости реакции
U1(T, P, X) := K1(T)*ZEA(X)^4*ZEB(X)^5*P^9
U2(T, P, X) := K2(T)*ZEC(X)^4*ZED(X)^6*P^10
U(T, P, X) := U1(T, P, X) - U2(T, P, X)
i := 0 .. 100
T[i] := 200 + 10*i
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XT1 := root(ZEC(X) - VRC*1.1/(VNS*W(X)), X, XMIN, 1) = 0.528
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# Вывод: Увеличение производительности по компоненту С на 10% можно получить за счет увеличения давления до 7-8 атм, но при это небходимо уменьшить температурный диапазон
# При давлении ниже 7 атм скорость реакции слишком низкая
# При уменьшении давления скорость реакции уменьшается еще сильнее и получение необходимой производительности становится невозможным
