# Уравнение реакции CH4+O2=HCOH+H2O
# Исходные данные
ZNA := 0.34
ZNB := 0.139
ZNI := 1 - ZNA - ZNB = 0.521
VNS := 20000
VRCT := 2700
P := 7  # Ключевой компонент - O2(B)
Решение
KP(T) := e^(6112/T - 2.99)
# Коэфициент изменения объема
W(X) := 1
ZEA(X) := ZNA - ZNB*X
ZEB(X) := ZNB*(1 - X)
ZEI := ZNI
ZEC(X) := ZNB*X
ZED(X) := ZNB*X
# Расчет требуемой степени превращения
XMIN := 0
XT := root(VRCT - VNS*W(X)*ZED(X), X, XMIN, 1) = 0.971223
ZEA(XT) + ZEB(XT) + ZEC(XT) + ZED(XT) + ZEI = 1
# Уравнение целевой функции равновесия
EQ(T, P, X) := KP(T)*ZEA(X)*ZEB(X)*P^0 - ZEC(X)*ZED(X)
# Расчет равновесной температуры
TR(P, X) := root(EQ(T, P, X), T, 400, 1100)
TR(P, XT) - 273 = 730.407
