# Задание 2
# Уравнение реакции | A+2B=4C+2D
# Исходные данные
a := 1
ZNA := 0.35
E1 := 52000
K01 := 1.72*10^5
b := 2
ZNB := 0.65
E2 := 96000
K02 := 1.28*10^10
c := 4
VNS := 33000
VRC := 2300
P := 3
d := 2
ZNI := 1 - ZNA - ZNB = 0
# ключевой компонент B
Решение
# Уравнение Аррениуса для констант скоростей прямой и обратной реакции
K1(T) := K01*e^(-E1/(8.31*T))
K2(T) := K02*e^(-E2/(8.31*T))
# Коэфициент изменения объема
W(X) := 1 + (c + d - a - b)/b*ZNB*X
ZEA(X) := (ZNA - 1/2*ZNB*X)/W(X)
ZEB(X) := ZNB*(1 - X)/W(X)
ZEC(X) := 2*ZNB*X/W(X)
ZED(X) := ZNB*X/W(X)
# Расчет требуемой степени превращения
XMIN := 0
XT := root(ZEC(X) - VRC/(VNS*W(X)), X, XMIN, 1) = 0.0536131
# Уравнения для расчета скорости реакции
U1(T, P, X) := K1(T)*ZEA(X)*ZEB(X)^2*P^3
U2(T, P, X) := K2(T)*ZEC(X)^4*ZED(X)^2*P^6
U(T, P, X) := U1(T, P, X) - U2(T, P, X)
i := 0 .. 100
T[i] := 300 + 10*i
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XT1 := root(ZEC(X) - VRC*1.1/(VNS*W(X)), X, 0, 1) = 0.0589744
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