# Уравнение реакции: N2+3H2=2NH3
ZNA := 0.17
ZNB := 0.5
P := 250
VRC := 1700
ZNI := 1 - ZNA - ZNB = 0.33
VNS := 20000
# Ключевой компонент - H2(B)
Kp(T) := e^(2571/T - 13.84)
# Расчет коэффициента изменения объема
W(X) := 1 + (2 - 3 - 1)/3*ZNB*X
ZEA(X) := (ZNA - 1/3*ZNB*X)/W(X)
ZEB(X) := ZNB*(1 - X)/W(X)
ZEI(X) := ZNI/W(X)
ZEC(X) := 2/3*ZNB*X/W(X)
# Требуемая степень превращения
XMIN := 0
XT := root(ZEC(X) - VRC/(VNS*W(X)), X, 0, 1) = 0.254993
ZEA(XT) + ZEB(XT) + ZEC(XT) + ZEI(XT) = 1
EQ(T, P, X) := Kp(T)*ZEA(X)*ZEB(X)^3*P^2 - ZEC(X)^2
TR(P, X) := root(EQ(T, P, X), T, 300, 1000)
TR(P, XT) - 273 = 675.25
