# Задание 2
# Уравнение реакции | A+B=C
# Исходные данные
VRC := 11500
ZNA := 0.37
E1 := 148000
VNS := 45000
ZNB := 0.55
E2 := 55200
ZNC := 0
K01 := 1.74*10^11
ZNI := 0.8
K02 := 1.48*10^5
# P= от  3 до 8 атм
# РЕШЕНИЕ
# Уравнения Аррениуса для константы скоростей в прямом и обратном направлениях
K1(T) := K01*e^(-E1/(8.314*T))
K2(T) := K02*e^(-E2/(8.314*T))
# Коэффициент изменения объема
W(X) := 1 + (1 - 1 - 1)/1*ZNA*X
ZEA(X) := ZNA*(1 - X)/W(X)
ZEB(X) := (ZNB - ZNA*X)/W(X)
ZEC(X) := (ZNC + ZNA*X)/W(X)
ZEI(X) := ZNI/W(X)
# Расчет требуемой степени превращения
XMIN := 0
XT := root(ZEC(X) - VRC/(VNS*W(X)), X, XMIN, 1) = 0.690691
# Уравнение для расчета скорости реакции
U1(T, P, X) := K1(T)*ZEA(X)*ZEB(X)*P^2
U2(T, P, X) := K2(T)*ZEC(X)*P
U(T, P, X) := U1(T, P, X) - U2(T, P, X)
i := 0 .. 100
T[i] := 300 + 10*i
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# Увеличим производительность по компоненту С на 10 %
XT1 := root(ZEC(X) - VRC*1.1/(VNS*W(X)), X, 0, 1) = 0.75976
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# Вывод: Производительность по компоненту С может быть увеличена на 10% за счет увеличения давления до 6-8 атм
# При увеличении давления скорость реакции и температурный диапазон увеличивается
# При давлении ниже 6 атм скорость реакции ниже необходимой, поэтому обеспечение производительности невозможно
