# Уравнение реакции 2NH3=N2+3H2
# Исходные данные
ZNA := 0.3
ZNI := 1 - ZNA = 0.7
VNS := 20000
VRD := 6100
P := 2
Решение
KP(T) := e^(-2571/T + 2.84)
# Коэфициент изменения объема
W(X) := 1 + (3 + 1 - 2)/2*ZNA*X
ZEA(X) := ZNA*(1 - X)/W(X)
ZEC(X) := 1/2*ZNA*X/W(X)
ZED(X) := 3/2*ZNA*X/W(X)
ZEI(X) := ZNI/W(X)
# Расчет требуемой степени превращения
XMIN := 0
XT := root(ZED(X) - VRD/(VNS*W(X)), X, XMIN, 1) = 0.67778
ZEA(XT) + ZEC(XT) + ZED(XT) + ZEI(XT) = 1
# Уравнение целевой функции равновесия
EQ(T, P, X) := KP(T)*ZEA(X)^2*P^-2 - ZEC(X)*ZED(X)^3
# Расчет равновесной температуры
TR(P, X) := root(EQ(T, P, X), T, 400, 1100)
TR(P, XT) - 273 = 584.204
