# Задание 2
# Уравнение реакции | 2A+B=C
# Исходные данные
ZNA := 0.2
E1 := 143000
K01 := 1.35*10^11
ZNB := 0.7
E2 := 55000
K02 := 1.38*10^5
VNS := 45000
VRC := 2600
P := 4
ZNI := 1 - ZNA - ZNB = 0.1  # ключевой компонент A
Решение
# Уравнение Аррениуса для констант скоростей прямой и обратной реакции
K1(T) := K01*e^(-E1/(8.31*T))
K2(T) := K02*e^(-E2/(8.31*T))
# Коэфициент изменения объема
W(X) := 1 + (1 - 1 - 2)/2*ZNA*X
ZEA(X) := ZNA*(1 - X)/W(X)
ZEB(X) := (ZNB - 1/2*ZNA*X)/W(X)
ZEI(X) := ZNI/W(X)
ZEC(X) := 1/2*ZNA*X/W(X)
# Расчет требуемой степени превращения
XMIN := 0
XT := root(ZEC(X) - VRC/(VNS*W(X)), X, XMIN, 1) = 0.577779
# Уравнения для расчета скорости реакции
U1(T, P, X) := K1(T)*ZEA(X)^2*ZEB(X)^1*P^3
U2(T, P, X) := K2(T)*ZEC(X)*P^1
U(T, P, X) := U1(T, P, X) - U2(T, P, X)
i := 0 .. 100
T[i] := 600 + 10*i
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XT1 := root(ZEC(X) - VRC*1.1/(VNS*W(X)), X, XMIN, 1) = 0.635557
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# Вывод: Увеличение производительности по компоненту С на 10% можно получить за счет увеличения давления до 5-8 атм, но при это небходимо увеличить температурный диапазон
# При давлении ниже 5 атм скорость реакции низкая
# При уменьшении давления скорость реакции уменьшается еще сильнее и получение необходимой производительности становится невозможным
