# Уравнение реакции CH3OH=CO+2H2
# Исходные данные
ZNA := 0.3
ZNI := 1 - ZNA = 0.7
VNS := 20000
VRD := 9200
P := 2
Решение
KP(T) := e^(-1967/T + 3.36)
# Коэфициент изменения объема
W(X) := 1 + (2 + 1 - 1)/1*ZNA*X
ZEA(X) := ZNA*(1 - X)/W(X)
ZEC(X) := ZNA*X/W(X)
ZED(X) := 2*ZNA*X/W(X)
ZEI(X) := ZNI/W(X)
# Расчет требуемой степени превращения
XMIN := 0
XT := root(ZED(X) - VRD/(VNS*W(X)), X, XMIN, 1) = 0.766667
ZEA(XT) + ZEC(XT) + ZED(XT) + ZEI(XT) = 1
# Уравнение целевой функции равновесия
EQ(T, P, X) := KP(T)*ZEA(X)*P^-2 - ZEC(X)^1*ZED(X)^2
# Расчет равновесной температуры
TR(P, X) := root(EQ(T, P, X), T, 400, 1100)
TR(P, XT) - 273 = 362.736
