# Задание 2
# Уравнение реакции | 2A+2B=C
# Исходные данные
ZNA := 0.1
E1 := 143000
K01 := 1.35*10^11
ZNB := 0.75
E2 := 55000
K02 := 1.38*10^5
VNS := 17000
VRC := 530
P := 3
ZNI := 1 - ZNA - ZNB = 0.15  # ключевой компонент A
Решение
# Уравнение Аррениуса для констант скоростей прямой и обратной реакции
K1(T) := K01*e^(-E1/(8.31*T))
K2(T) := K02*e^(-E2/(8.31*T))
# Коэфициент изменения объема
W(X) := 1 + (1 - 2 - 2)/2*ZNA*X
ZEA(X) := ZNA*(1 - X)/W(X)
ZEB(X) := (ZNB - ZNA*X)/W(X)
ZEI(X) := ZNI/W(X)
ZEC(X) := 1/2*ZNA*X/W(X)
# Расчет требуемой степени превращения
XMIN := 0
XT := root(ZEC(X) - VRC/(VNS*W(X)), X, XMIN, 1) = 0.62353
# Уравнения для расчета скорости реакции
U1(T, P, X) := K1(T)*ZEA(X)^2*ZEB(X)^2*P^4
U2(T, P, X) := K2(T)*ZEC(X)*P^1
U(T, P, X) := U1(T, P, X) - U2(T, P, X)
i := 0 .. 100
T[i] := 400 + 10*i
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XT1 := root(ZEC(X) - VRC*1.1/(VNS*W(X)), X, XMIN, 1) = 0.685883
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# Вывод: Увеличение производительности по компоненту С на 10% можно получить за счет увеличения давления до 4-5 атм, но при это небходимо увеличить температурный диапазон
# При давлении ниже 4 атм скорость реакции слишком низкая
# При уменьшении давления скорость реакции уменьшается еще сильнее и получение необходимой производительности становится невозможным
