# Уравнение реакции CO+H2=CH2O
# Исходные данные
ZNA := 0.4
ZNB := 0.5
ZNI := 1 - ZNA - ZNB = 0.1
VNS := 30000
VRC := 11200
P := 20
Решение
KP(T) := e^(-3961/T + 5.88)
# Коэфициент изменения объема
W(X) := 1 + (1 - 1 - 1)/1*ZNA*X
ZEA(X) := ZNA*(1 - X)/W(X)
ZEB(X) := (ZNB - ZNA*X)/W(X)
ZEC(X) := ZNA*X/W(X)
ZEI(X) := ZNI/W(X)
# Расчет требуемой степени превращения
XMIN := 0
XT := root(ZEC(X) - VRC/(VNS*W(X)), X, XMIN, 1) = 0.933333
ZEA(XT) + ZEB(XT) + ZEC(XT) + ZEI(XT) = 1
# Уравнение целевой функции равновесия
EQ(T, P, X) := KP(T)*ZEA(X)*ZEB(X)*P^1 - ZEC(X)
# Расчет равновесной температуры
TR(P, X) := root(EQ(T, P, X), T, 300, 1000)
TR(P, XT) - 273 = 581.065
