# Задание 2
# Уравнение реакции  A+B=2C
# Исходные данные
ZNA := 0.2
E01 := 124000
K01 := 1.14*10^10
ZNB := 0.65
E02 := 55000
K02 := 1.11*10^5
VNS := 18000
ZNC := 0
P := 4
VRC := 4200
ZNI := 0.15
# Решение
# Константы
K1(T) := K01*e^(-E01/(8.314*T))
K2(T) := K02*e^(-E02/(8.314*T))
# Коэффициент изменения объёма
W(X) := 1
ZEA(X) := ZNA*(1 - X)
ZEB(X) := ZNB - ZNA*X
ZEC(X) := 2*ZNA*X
ZEI(X) := ZNI
# Находим необходимую степень  превращения
XT := root(ZEC(X) - VRC/VNS, X, 0, 1) = 0.583333
# Уравнния скоростей реакций
U1(T, P, X) := K1(T)*ZEA(X)*ZEB(X)*P^2
U2(T, P, X) := K2(T)*ZEC(X)^2*P^2
U(T, P, X) := U1(T, P, X) - U2(T, P, X)
i := 0 .. 100
T[i] := 500 + 5*i
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TR(P, X) := root(U(T, P, X), T, 300, 800)
TR(4, XT) = 732.073
# Увеличиваем производительность по компоненту С на 10%
XT1 := root(ZEC(X) - VRC*1.1/VNS, X, 0, 1) = 0.641667
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TR(5, XT1) = 756.328
# Вывод: увеличение производительности компонента С можно добиться увеличением
# давления до 5 атм.
# При этом необходимо уменьшить температурынй диапазон
