# Билет 4
# Задача 1
# Уравнение реакции: | C2H6+2H2O=2CO+5H2
# Исходные данные:
ZNA := 0.18
ZNB := 0.82
ZNC := 0
ZND := 0
VNS := 15000
P := 2
VRD := 12600
# РЕШЕНИЕ
# Температурная зависимость константы равновесия
KP(T) := e^(-4715/T + 11.03)
# Коэффициент изменения объёма
W(X) := 1 + (2 + 5 - 2 - 1)/1*ZNA*X
ZEA(X) := ZNA*(1 - X)/W(X)
ZEB(X) := (ZNB - 2*ZNA*X)/W(X)
ZEC(X) := 2*ZNA*X/W(X)
ZED(X) := 5*ZNA*X/W(X)
# Расчёт требуемой степени превращения
XMIN := 0
XT := root(ZED(X) - VRD/(VNS*W(X)), X, XMIN, 1) = 0.933333
ZEA(XT) + ZEC(XT) + ZED(XT) + ZEB(XT) = 1
# Уравнение целевой функции равновесия
EQ(T, P, X) := KP(T)*ZEA(X)*ZEB(X)^2*P^-4 - ZEC(X)^2*ZED(X)^5
# Расчёт равновесной температуры
TR(P, X) := root(EQ(T, P, X), T, 300, 1000)
TR(P, XT) - 273 = 356.308
