# Задание 2
# Уравнение реакции | 4A+B=2C+2D
# Исходные данные
a := 4
ZNA := 0.14
E1 := 48000
K01 := 1.32*10^5
b := 1
ZNB := 0.6
E2 := 90000
K02 := 1.21*10^10
c := 2
VNS := 35000
VRC := 1200
d := 2
# P= от 5 до 15 атм
ZNI := 1 - ZNA - ZNB = 0.26
# РЕШЕНИЕ
# Уравнения Аррениуса для константы скоростей в прямом и обратном направлениях
K1(T) := 1.32*10^5*e^(-48000/(8.314*T))
K2(T) := 1.21*10^10*e^(-90000/(8.314*T))
# Уравнение для расчета термодинамической константы равновесия
KP(T) := K1(T)/K2(T)
# Коэффициент изменения объема
W(X) := 1 + (2 + 2 - 4 - 1)/4*ZNA*X
ZEA(X) := ZNA*(1 - X)/W(X)
ZEB(X) := (ZNB - 1/4*ZNA*X)/W(X)
ZEC(X) := 1/2*ZNA*X/W(X)
ZED(X) := 1/2*ZNA*X/W(X)
ZEI(X) := ZNI/W(X)
# Расчет требуемой степени превращения
XMIN := 0
XT := root(ZEC(X) - VRC/(VNS*W(X)), X, 0, 1) = 0.489796
# Уравнение для расчета скорости реакции
U1(T, P, X) := K1(T)*ZEA(X)^4*ZEB(X)*P^5
U2(T, P, X) := K2(T)*ZEC(X)^2*ZED(X)^2*P^4
U(T, P, X) := U1(T, P, X) - U2(T, P, X)
i := 0 .. 100
T[i] := 300 + 10*i
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# Увеличим производительность по компоненту С на 10 %
XT1 := root(ZEC(X) - VRC*1.1/(VNS*W(X)), X, XMIN, 1) = 0.538776
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T(P, X) := root(U(T, P, X) - U(T, 10, XT), T, 600, 800)
T(13, XT1) = 675.811
T(15, XT1) = 705.053
# Вывод: Производительность по компоненту С можно добится увеличения давления до 13-15 атм
# При давлении 13-15 атм для обеспечения необходимой производительности температура должна быть в диапазоне от 676 до 705К
# При давлении ниже 13 атм достичь нужной производительности невозможно из-за низкой скорости реакции и более узкого температурного диапазона
