# Задание 1
# Уравнение реакции  CO+3H2=CH4+H2O
# Исходные данные
ZNA := 0.15
VRC := 1100
ZNB := 0.75
VNS := 8000
ZNC := 0
P := 5
ZND := 0
Kp(T) := e^(7206/T - 9.84)  # Ключевой компонент - CO(A)
ZNI := 0.1
# Решение
W(X) := 1 + ((1 + 1 - 3 - 1)/1)*ZNA*X
ZEA(X) := ZNA*(1 - X)/W(X)
ZEB(X) := (ZNB - 3*ZNA*X)/W(X)
ZEC(X) := ZNA*X/W(X)
ZED(X) := ZNA*X/W(X)
ZEI(X) := ZNI/W(X)
# Находим необходимую степень  превращения
XMIN := 0
XT := root(ZED(X) - VRC/(VNS*W(X)), X, XMIN, 1) = 0.916667
ZEA(XT) + ZEB(XT) + ZEC(XT) + ZED(XT) + ZEI(XT) = 1
# Уравнние целевой функции
EQ(X, T, P) := Kp(T)*ZEA(X)*ZEB(X)^3*P^2 - ZEC(X)*ZED(X)
# Равновесная температура
TR(X, P) := root(EQ(X, T, P), T, 300, 1100)
TR(XT, 5) - 273 = 473.713
