# Задание 2
# Уравнение реакции  A+B=2C
# Исходные данные
ZNA := 0.2
E01 := 52000
K01 := 1.41*10^5
ZNB := 0.65
E02 := 96000
K02 := 1.72*10^9
VNS := 15000
ZNC := 0
P := 3
VRC := 3500
ZNI := 0.15
# Решение
# Константы
K1(T) := K01*e^(-E01/(8.314*T))
K2(T) := K02*e^(-E02/(8.314*T))
# Коэффициент изменения объёма
W(X) := 1 + ((2 - 1 - 1)/1)*ZNA*X
ZEA(X) := ZNA*(1 - X)/W(X)
ZEB(X) := (ZNB - ZNA*X)/W(X)
ZEC(X) := 2*ZNA*X/W(X)
ZEI(X) := ZNI/W(X)
# Находим необходимую степень  превращения
XT := root(ZEC(X) - VRC/(VNS*W(X)), X, 0, 1) = 0.583333
# Уравнния скоростей реакций
U1(T, P, X) := K1(T)*ZEA(X)*ZEB(X)*P^2
U2(T, P, X) := K2(T)*ZEC(X)^2*P^2
U(T, P, X) := U1(T, P, X) - U2(T, P, X)
i := 0 .. 100
T[i] := 300 + 10*i
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# Увеличиваем производительность по компоненту С на 10%
XT1 := root(ZEC(X) - VRC*1.1/(VNS*W(X)), X, 0, 1) = 0.641667
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T(P, X) := root(U(T, P, X) - U(T, 3, XT), T, 450, 550)
T(4, XT1) = 506.194
T(7, XT1) = 526.213
# Вывод: увеличение производительности компонента С можно добиться увеличением
# давления до 4-7 атм, при этом температура должна равняться 506-526 К
# При уменьшении давления скорость уменьшается, поэтому получить необходимую производительность невозможно
