# Задача 1
# Уравнение реакции | CH4+CO2=2CO+2H2
# Исходные данные
Kp(T) := e^(-7007/T + 10.92)
ZNA := 0.3
VRD := 27500  # Ключевой компонент - CH4(A)
ZNB := 0.6
VNS := 60000
ZNI := 0.1
P := 10
# Решение
# Коэффицицент изменения объема
W(X) := 1 + (2 + 2 - 1 - 1)/1*ZNA*X
ZEA(X) := ZNA*(1 - X)/W(X)
ZEB(X) := (ZNB - ZNA*X)/W(X)
ZEC(X) := 2*ZNA*X/W(X)
ZED(X) := 2*ZNA*X/W(X)
ZEI(X) := ZNI/W(X)
# Находим необходимую степень превращения
XMIN := 0
XT := root(ZED(X) - VRD/(VNS*W(X)), X, XMIN, 1) = 0.763889
ZEA(XT) + ZEB(XT) + ZEC(XT) + ZED(XT) + ZEI(XT) = 1
# Уравнение целевой функции
EQ(X, T, P) := Kp(T)*ZEA(X)*ZEB(X)*P^-2 - ZEC(X)^2*ZED(X)^2
# Равновесная температура
TR(X, P) := root(EQ(X, T, P), T, 300, 1100)
TR(XT, 10) - 273 = 796.669
