# Задача 2
# Уравнение реакции | A+3B=2C
# Исходыне данные
E1 := 43000
K01 := 1.76*10^5
VNS := 25000
ZNA := 0.19
E2 := 92000
K02 := 1.31*10^9
VRC := 5600
ZNB := 0.7
P := 5
ZNI := 1 - ZNA - ZNB = 0.11
# Решение
Константы
K1(T) := K01*e^(-E1/(8.314*T))
K2(T) := K02*e^(-E2/(8.314*T))
# Коэффициент изменения объма
W(X) := 1 + (2 - 3 - 1)/1*ZNA*X
ZEA(X) := ZNA*(1 - X)/W(X)
ZEB(X) := (ZNB - 3*ZNA*X)/W(X)
ZEC(X) := 2*ZNA*X/W(X)
ZEI(X) := ZNI/W(X)
# Рачёт степени превращения
XMIN := 0
XT := root(ZEC(X) - VRC/(VNS*W(X)), X, XMIN, 1) = 0.589504
# Уравнения скоростей реакции
U1(T, P, X) := K1(T)*ZEA(X)*ZEB(X)^3*P^4
U2(T, P, X) := K2(T)*ZEC(X)^2*P^2
U(T, P, X) := U1(T, P, X) - U2(T, P, X)
i := 0 .. 100
T[i] := 300 + 10*i
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# Увеличиваем производительность по компоненту C на 10%
XT1 := root(ZEC(X) - VRC*1.1/(VNS*W(X)), X, 0, 1) = 0.648457
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T(P, X) := root(U(T, P, X) - U(T, 5, XT), T, 400, 800)
T(6, XT1) = 708.24
# Вывод: Увеличение производительности компонента C можно добится увеличением давления до 6-8 атм
# При давлении в 6 атм температура должна составлять 708 К
# При давлении выше 6 атм необходимо увеличивать температурынй диапазон
# При давлении ниже 6 атм получить необходимую производительность невозможно из-за уменьшения скорости реакции и сужения температурного диапазона
