# Задание 1
# Уравнение реакции  C2H6+2CO2=4CO+3H2
# Исходные данные
ZNA := 0.3
VRD := 7500
ZNB := 0.6
VNS := 10000
ZNI := 0.1
P := 10
Kp(T) := e^(-4375/T + 19.76)
# Решение
W(X) := 1 + ((4 + 3 - 2 - 1)/1)*ZNA*X
ZEA(X) := ZNA*(1 - X)/W(X)
ZEB(X) := (ZNB - 2*ZNA*X)/W(X)
ZEC(X) := 4*ZNA*X/W(X)
ZED(X) := 3*ZNA*X/W(X)
ZEI(X) := ZNI/W(X)
# Находим необходимую степень  превращения
XMIN := 0
XT := root(ZED(X) - VRD/(VNS*W(X)), X, XMIN, 1) = 0.833333
ZEA(XT) + ZEB(XT) + ZEC(XT) + ZED(XT) + ZEI(XT) = 1
# Уравнние целевой функции
EQ(X, T, P) := Kp(T)*ZEA(X)*ZEB(X)^2*P^-4 - ZEC(X)^4*ZED(X)^3
# Равновесная температура
TR(X, P) := root(EQ(X, T, P), T, 300, 700)
TR(XT, 10) - 273 = 391.45
