# Задание 2
# Уравнение реакции  A+2B=C
# Исходные данные
ZNA := 0.3
E01 := 55000
K01 := 1.42*10^5
ZNB := 0.65
E02 := 120000
K02 := 1.43*10^10
ZNI := 0.05
P := 3
VNS := 37000
VRC := 6500
# Решение
# Константы
K1(T) := K01*e^(-E01/(8.314*T))
K2(T) := K02*e^(-E02/(8.314*T))
# Коэффициент изменения объёма
W(X) := 1 + ((1 - 2 - 1)/1)*ZNA*X
ZEA(X) := ZNA*(1 - X)/W(X)
ZEB(X) := (ZNB - 2*ZNA*X)/W(X)
ZEC(X) := ZNA*X/W(X)
ZEI(X) := ZNI/W(X)
# Находим необходимую степень  превращения
XT := root(ZEC(X) - VRC/(VNS*W(X)), X, 0, 1) = 0.585586
# Уравнния скоростей реакций
U1(T, P, X) := K1(T)*ZEA(X)*ZEB(X)^3*P^3
U2(T, P, X) := K2(T)*ZEC(X)*P^1
U(T, P, X) := U1(T, P, X) - U2(T, P, X)
i := 0 .. 100
T[i] := 300 + 10*i
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# Увеличиваем производительность по компоненту С на 10%
XT1 := root(ZEC(X) - VRC*1.1/(VNS*W(X)), X, 0, 1) = 0.644144
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T(P, X) := root(U(T, P, X) - U(T, 3, XT), T, 600, 700)
# Вывод: увеличение производительности компонента С можно добиться увеличением
# давления до 4-8 атм, при этом необходимо расширить температурный диапазон
# При уменьшении давления скорость уменьшается, поэтому получить необходимую производительность невозможно
