# Задача 1
# Уравнение реакции | CO+H2O=CO2+H2
# Исходные данные
VRD := 4500
VNS := 30000
Kp(T) := e^(5612/T - 5.77)
ZNA := 0.18
ZNB := 0.55
ZNC := 0.05
ZND := 0.1
ZNI := 1 - ZNA - ZNB - ZNC - ZND = 0.12
P := 10  # Ключевой компонент - CO(A)
# Коэффициент изменения объема
W(X) := 1
ZEA(X) := ZNA*(1 - X)
ZEB(X) := ZNB - ZNA*X
ZEC(X) := ZNC + ZNA*X
ZED(X) := ZND + ZNA*X
ZEI(X) := ZNI
# Расчет требуемой степени превращения
XMIN := -1/1*ZND/ZNA = -0.555556
XT := root(ZED(X) - (VRD + ZND*VNS)/VNS, X, XMIN, 1) = 0.833333
ZEA(XT) + ZEB(XT) + ZEC(XT) + ZED(XT) + ZEI(XT) = 1
# Уравнение целевой функции
EQ(T, X, P) := Kp(T)*ZEA(X)*ZEB(X)*P^-1 - ZEC(X)*ZED(X)^2
# Расчет равновесной температуры
TR(X, P) := root(EQ(T, X, P), T, 300, 1000)
TR(XT, 10) - 273 = 418.695
