# Уравнение реакции | A+3B=C+D
# Изначальные данные
ZNA := 0.15
E1 := 47000
K01 := 1.72*10^5
VNS := 31000
ZNB := 0.6
E2 := 132000
K02 := 1.27*10^9
VRC := 2600
ZNI := 1 - ZNA - ZNB = 0.25
P := 4
# Константы реакций
K1(T) := K01*e^(-E1/(8.314*T))
K2(T) := K02*e^(-E2/(8.314*T))
# Коэффициент изменения объема
W(X) := 1 + (1 + 1 - 3 - 1)/1*ZNA*X
ZEA(X) := ZNA*(1 - X)/W(X)
ZEB(X) := (ZNB - 3*ZNA*X)/W(X)
ZEC(X) := ZNA*X/W(X)
ZED(X) := ZNA*X/W(X)
ZEI(X) := ZNI/W(X)
# Расчёт необходимой степени превращения
XMIN := 0
XT := root(ZEC(X) - VRC/(VNS*W(X)), X, XMIN, 1) = 0.559147
# Уравнения скорости
U1(T, P, X) := K1(T)*ZEA(X)*ZEB(X)^3*P^4
U2(T, P, X) := K2(T)*ZEC(X)*ZED(X)*P^2
U(T, P, X) := U1(T, P, X) - U2(T, P, X)
i := 0 .. 150
T[i] := 300 + i*10
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# Оптимальная температура
# Увеличиваем степень превращения компонента C на 10%
XT1 := root(ZEC(X) - VRC*1.1/(VNS*W(X)), X, XMIN, 1) = 0.615064
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# Вывод: Производительности по компоненту С можно увеличить за счет увеличения давления до 5-8 атм, но при этом необходимо увеличивать температурный диапазон
# При давлении ниже 5 атм добится увеличения производительности невозможно так как уменьшается корость реакции и сужается температурный диапазон
