# 1 Задача
# Уравнение реакции | 2CH4+3O2=2HCOOH+2H2O
# Исходные данные
VRC := 1250
VNS := 15000
Kp(T) := e^(7423/T - 4.71)
ZNA := 0.3
ZNB := 0.147
ZNI := 1 - ZNA - ZNB = 0.553  # Ключевой компонент - O2(B)
P := 10
# Коэффициент изменения объема
W(X) := 1 + (2 + 2 - 2 - 3)/3*ZNB*X
ZEA(X) := (ZNA - 2/3*ZNB*X)/W(X)
ZEB(X) := ZNB*(1 - X)/W(X)
ZEC(X) := 2/3*ZNB*X/W(X)
ZED(X) := 2/3*ZNB*X/W(X)
ZEI(X) := ZNI/W(X)
Производительность
XMIN := 0
XT := root(ZEC(X) - VRC/(VNS*W(X)), X, XMIN, 1) = 0.85034
ZEA(XT) + ZEB(XT) + ZEC(XT) + ZED(XT) + ZEI(XT) = 1
z'
# Уравнение целевой фунцкии
EQ(T, P, X) := Kp(T)*ZEA(X)^2*ZEB(X)^3*P^-1 - ZEC(X)^2*ZED(X)^2
# Равновесная температура
TR(P, X) := root(EQ(T, P, X), T, 300, 900)
TR(10, XT) - 273 = 370.278
