# Задача 2
# Уравнение реакции | A+4B=C+2D
# Изначальные условия
E1 := 45000
K01 := 1.26*10^5
VNS := 42000
ZNA := 0.15
E2 := 85000
K02 := 1.65*10^10
VRC := 3600
ZNB := 0.7
ZNI := 1 - ZNA - ZNB = 0.15
P := 7
# Константы равновесия
K1(T) := K01*e^(-E1/(8.314*T))
K2(T) := K02*e^(-E2/(8.314*T))
# Коэффициент изменения объема
W(X) := 1 + (2 + 1 - 4 - 1)/1*ZNA*X
ZEA(X) := ZNA*(1 - X)/W(X)
ZEB(X) := (ZNB - 4*ZNA*X)/W(X)
ZEC(X) := ZNA*X/W(X)
ZED(X) := 2*ZNA*X/W(X)
ZEI(X) := ZNI/W(X)
# Расчёт степени превращения
XMIN := 0
XT := root(ZEC(X) - VRC/(VNS*W(X)), X, XMIN, 1) = 0.571436
# Уравнения скорости реакции
U1(T, P, X) := K1(T)*ZEA(X)*ZEB(X)^4*P^5
U2(T, P, X) := K2(T)*ZEC(X)*ZED(X)^2*P^3
U(T, P, X) := U1(T, P, X) - U2(T, P, X)
i := 0 .. 100
T[i] := 300 + i*10
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# Увеличим производительность по компоненту С на 10%
XT1 := root(ZEC(X) - VRC*1.1/(VNS*W(X)), X, XMIN, 1) = 0.628582
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T(P, X) := root(U(T, P, X) - U(T, 7, XT), T, 500, 600)
T(9, XT1) = 542.792
T(10, XT1) = 566.187
# Вывод: Увеличения производительности компонента С на 10% можно добится увеличением давления до 9-10 атм, при температуре 543-566 К
# При меньшем давлении необходиую производительность достичб невозможно из-за меньшей скорости и узкого температурного диапазона
