# Перевод из ат в Па
P(P) := P*9.81*10^4
p(P) := P/(9.81*10^4)
# Температура кипения:
a := -16*10^-1
b := -56.5*10^-2
t(P, x) := 1670/(10.09 - log(P) + log(a*x^2 + b*x + 1)) - 228.4
# Плотность расстворов:
α0 := 2302.1*10^-4
α1 := 559.82*10^-6
α2 := 327.84*10^-8
ρ0(t) := 1000 - 0.063*t - 0.00355*t^2
ρ(t, x) := 10^(log(ρ0(t)) + (α0 + α1*t - α2*t^2)*x)
# Вязкость раствора:
d0 := 73.59*10^-2
d1 := 44.64*10^-4
d2 := -409.06*10^-9
μ0(t) := 0.59849*(43.252 + t)^-1.5423
μ(t, x) := 10^(log(μ0(t)) + (d0 + d1*t + d2*t^2)*x)
# Теплоемкость раствора:
B0 := 4663.14
Bx := 2938.54
Bt := 5.52
B2 := 7.43*10^-3
c0(t) := 4224 + 2.476*t*log(t/100)
c(t, x) := c0(t) + (-B0 + Bx*x + Bt*t - B2*t^2)*x
# Теплопроводность раствора:
B := 84.81*10^-3
λ0(t) := 0.5545 + 0.00246*t - 1.184*10^-5*t^2
λ(t, x) := λ0(t)*(1 - B*x)
x := 0.08
t := 37
x2 := 0.02
t2 := 46.6
Pr(t, x) := c(t, x)*μ(t, x)/λ(t, x)
ρ(t, x) = 1038.92
ρ(t2, x2) = 1000.77
μ(t, x) = 0.00081631
μ(t2, x2) = 0.000606725
λ(t, x) = 0.625041
λ(t2, x2) = 0.642333
c(t, x) = 3845.72
c(t2, x2) = 4098.47
Pr(t, x) = 5.02255
Pr(t2, x2) = 3.87127
N := 0.021*12978^0.8*3.927^0.43*(3.927/Pr(t, x))^0.5 = 65.283
N2 := 0.021*14600^0.8*7.373^0.43*(7.3733/Pr(t2, x2))^0.5 = 146.789
a2 := N2*λ(t2, x2)/0.022 = 4285.79
a := N*λ(t, x)/0.047 = 868.182
a2*(t2 - 19.4) = 116573
a*(52.1 - t) = 13109.5
500*(52.1 - 19.4) = 16350
2/(1/430 - 1/a - 1/a2 - 4*10^-3/46.5) = 2340.83
1/(1/a + 1/a2 + (2/2300 + 4*10^-3/46.5)) = 427.214
