# Перевод из ат в Па
P(P) := P*9.81*10^4
p(P) := P/(9.81*10^4)
# Температура кипения:
a := -4.7*10^-1
b := -65.4*10^-2
t(P, x) := 1670/(10.09 - log(P) + log(a*x^2 + b*x + 1)) - 228.4
# Плотность расстворов:
α0 := 1126.89*10^-4
α1 := 587.31*10^-6
α2 := 319.05*10^-8
ρ0(t) := 1000 - 0.063*t - 0.00355*t^2
ρ(t, x) := 10^(log(ρ0(t)) + (α0 + α1*t - α2*t^2)*x)
# Вязкость раствора:
ρ(45, 0.03) = 999.09
d0 := -20.28*10^-2
d1 := 83.11*10^-4
d2 := -910.4*10^-9
μ0(t) := 0.59849*(43.252 + t)^-1.5423
μ(t, x) := 10^(log(μ0(t)) + (d0 + d1*t + d2*t^2)*x)
# Теплоемкость раствора:
B0 := 5087.59
Bx := 3829.86
Bt := 5.61
B2 := 17.89*10^-3
c0(t) := 4224 + 2.476*t*log(t/100)
c(t, x) := c0(t) + (-B0 + Bx*x + Bt*t - B2*t^2)*x
# Теплопроводность раствора:
B := 245.88*10^-3
λ0(t) := 0.5545 + 0.00246*t - 1.184*10^-5*t^2
λ(t, x) := λ0(t)*(1 - B*x)
Pr(t, x) := c(t, x)*μ(t, x)/λ(t, x)
x := 0.09
t := 37
x2 := 0.03
t2 := 46.6
ρ(t, x) = 1019.93
ρ(t2, x2) = 998.495
μ(t, x) = 0.000706523
1/(1/a + 1/a2 + (2/2300 + 4*10^-3/46.5)) =  # error: Эта переменная неопределена.
μ(t2, x2) = 0.00058831
λ(t, x) = 0.615385
λ(t2, x2) = 0.638679
c(t, x) = 3774.06
c(t2, x2) = 4043.23
Pr(t, x) = 4.33299
Pr(t2, x2) = 3.72437
N := 0.021*12978^0.8*3.927^0.43*(3.927/Pr(t, x))^0.5 = 70.2859
N2 := 0.021*14600^0.8*7.373^0.43*(7.3733/Pr(t2, x2))^0.5 = 149.656
a2 := N2*λ(t2, x2)/0.022 = 4344.63
a := N*λ(t, x)/0.047 = 920.274
a2*(t2 - 19.4) = 118174
a*(52.1 - t) = 13896.1
500*(52.1 - 19.4) = 16350
2/(1/430 - 1/a - 1/a2 - 4*10^-3/46.5) = 2167.42
