a_kond(t_val1) := 14484/nthroot(5*(110 - t_val1), 4)
q_kond(t_val1) := a_kond(t_val1)*(110 - t_val1)
t_val2(t_val1) := t_val1 - q_kond(t_val1)*7.15*10^-4
a_kip(t_val1) := 21.47*(t_val2(t_val1) - 81.0)^2
q_kip(t_val1) := a_kip(t_val1)*(t_val2(t_val1) - 81.0)
ε(t_val1) := |q_kond(t_val1) - q_kip(t_val1)|/q_kond(t_val1)
t := 106.9
a_kond(t) = 7299.71
q_kond(t) = 22629.1
t_val2(t) = 90.7202
a_kip(t) = 2028.53
q_kip(t) = 19717.7
ε(t) = 0.128656
