# 1) 2CH4 + O2 = 2CO + 4H2
# 2) CH4 + H2O = CO + 3H2
# Выход после первичного риформинга
ZN1_CH4 := 0.1
ZN1_H2 := 0.5
ZN1_CO := 0.17
ZN1_N2 := 0.05
ZN1_H2O := 1 - ZN1_CH4 - ZN1_H2 - ZN1_CO - ZN1_N2 = 0.18
VNS1 := 60000/3600 = 16.6667
# Воздух
ZN2_N2 := 0.78
ZN2_O2 := 0.21
T := 880 + 273 = 1153  # К
# Итоговый состав
# Задаем вариативность расхода воздуха
i := 0 .. 3000
VNS2[i] := (10000 + i*10)/3600
VNS[i] := VNS1 + VNS2[i]
ZN_CH4 := ZN1_CH4*VNS1/VNS
ZN_O2 := ZN2_O2*VNS2/VNS
ZN_CO := ZN1_CO*VNS1/VNS
ZN_H2 := ZN1_H2*VNS1/VNS
ZN_H2O := ZN1_H2O*VNS1/VNS
ZN_N2 := (ZN1_N2*VNS1 + ZN2_N2*VNS2)/VNS
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Z1_O2(X) := (ZN_O2 - 1/2*ZN_CH4*X)/W1(X)  # error: Эта переменная неопределена.
Z1_H2(X) := (ZN_H2 + 2*ZN_CH4*X)/W1(X)  # error: Эта переменная неопределена.
# Так как при повышении расхода воздуха выше опреденного значения, становится невозможно использовать весь кислород, найдем максимальный расход воздуха
MaxVN(i) :=
    j ← 0
    m ← 0
    for k ∈ 0 .. i
        j ← j + 1 if ZN_CH4[k] - 2*ZN_O2[k] ≥ 0
    (j - 1)
MaxVN(3000) = 428
# Максимальный расход воздуха, м3/ч:
VNS2[MaxVN(3000)] = 3.96667
i := 0 .. 428
VNS2[i] := (10000 + i*10)/3600
VNS[i] := VNS1 + VNS2[i]
W1(X) := 1 + 3*ZN1_CH4*X/2
Z1_CH4(X) := ZN_CH4*(1 - X)/W1(X)
Z1_O2(X) := (ZN_O2 - 1/2*ZN_CH4*X)/W1(X)
Z1_CO(X) := (ZN_CO + ZN_CH4*X)/W1(X)
Z1_H2(X) := (ZN_H2 + 2*ZN_CH4*X)/W1(X)
Z1_N2(X) := ZN_N2/W1(X)
W2(X) := 1 + 2*Z1_CH4(X)
Z2_CH4(X) := Z1_CH4(X)*0/W2(X)
Z2_H2O(X) := (ZN_H2O - Z1_CH4(X))/W2(X)
Z2_CO(X) := (Z1_CO(X) + Z1_CH4(X))/W2(X)
Z2_H2(X) := (Z1_H2(X) + 3*Z1_CH4(X))/W2(X)
Z2_N2(X) := Z1_N2(X)/W2(X)
# Итоговые концентрации продуктов:
Z_CH4(X) := Z2_CH4(X)
Z_O2(X) := Z1_O2(X)/W2(X)
Z_N2(X) := Z2_N2(X)
Z_CO(X) := Z2_CO(X)
Z_H2(X) := Z2_H2(X)
Z_H2O(X) := Z2_H2O(X)
# Рассчитываем степень превращения для 1 реакции так, чтобы был использован весь кислород
XT[i] := root(Z_O2(X)[i], X, 0, 1)
# Концентрации продуктов при требуемой степени превращения
Z_CH4(XT)
Z_O2(XT)
Z_N2(XT)
Z_CO(XT)
Z_H2(XT)
Z_H2O(XT)
# Построим график зависимости отношения водорода к азоту от расхода воздуха
HN[i] := Z_H2(XT[i])[i]/Z_N2(XT[i])[i]
HN[i] = [
    4.05556; 4.05224; 4.04893; 4.04562; 4.04232; 4.03903; 4.03573; 4.03245; 4.02916; 4.02589
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]
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# По графику видим, что максимальное соотношение водорода к азоту достигается при минимальном расходе воздуха
VNS2[0] = 2.77778  # м3/ч
# При этом на выходе из реактора:
VNS[0] := VNS[0]*W1(XT[0])*W2(XT[0])[0] = 22.4861  # м3/ч
Z_CH4(XT[0])[0] = 0
Z_O2(XT[0])[0] = -2.0607e-12
Z_N2(XT[0])[0] = 0.133416
Z_CO(XT[0])[0] = 0.200124
Z_H2(XT[0])[0] = 0.541075
Z_H2O(XT[0])[0] = 0.125188
