j := 0 .. 1000
ρ := 12.45*gm/cm^3
# работа 1
d[j] := (4.28 + j*0.1)*Angstrom
A2 := 6
B1 := 2
B2 := 4
B := B1 + B2 = 6
A := 0, 0.001 .. 20
A1 := 0.05
# Фактор формы
f(A) :=
    (B1 + B2*A) if 0 ≤ A < 1
    (B1/A + B2) if A ≥ 1
a(A, d) := f(A)/(ρ*d)
# пластина бесконечная | пластина конечная | призма | стержень конечный | стержень бесконечный
a(1, d[0]) = 1126 m^2/gm
a(A2, d[0]) = 813.222 m^2/gm
a(∞, d[0]) = 750.666 m^2/gm
a(0, d[0]) = 375.333 m^2/gm
a(A1, d[0]) = 412.866 m^2/gm
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# Зависимость удельной поверхности от размера частицы
ы
