Dmin := 2.87
Dmax := Dmin*100
i := 3 .. 100
d0 := Dmin*Angstrom
d[i] := (Dmin*i)*Angstrom
# более точный расчет
# Приближенный расчет
N1[i] := 6*d0/d[i]
N2[i] := 1 - (1 - 2*d0/d[i])^3
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# расчет для заданой кристаллической решетки | Ni | ГЦК
Ns[i] := 12 + 24*((d[i]/d0 + 1)/2 - 2) + 8*(((d[i]/d0 + 1)/2 - 2)*((d[i]/d0 + 1)/2 - 3)/2) + 6*((d[i]/d0 + 1)/2 - 2)^2
NE[i] := sum((Ns[p] + (-1)^(p + 1)*Ns[p])/2, p = 3 .. i) + 1
Given
a1*3^3 + a2*3^2 + a3*3^1 + a4 == NE[3]
a1*5^3 + a2*5^2 + a3*5 + a4 == NE[5]
a1*7^3 + a2*7^2 + a3*7 + a4 == NE[7]
a1*9^3 + a2*9^2 + a3*9 + a4 == NE[9]
a1 := 0
a2 := 0
a3 := 0
a4 := 0
a := Find(a1, a2, a3, a4)
a = [0.416667; -2.88727e-14; 0.583333; -2.21038e-13]
NE[i] := a[0]*(d[i]/d0)^3 + a[1]*(d[i]/d0)^2 + a[2]*(d[i]/d0) + a[3]
N3[i] := Ns[i]/NE[i]
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Δ1[i] := |N1[i] - N3[i]|/N3[i]*100
Δ2[i] := |N2[i] - N3[i]|/N3[i]*100
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