# металл: | Fe
# Свойства
# Температура плавления макроскоптческой частицы | Молярная масса
T_пл := 1811 K
M := 56*gm/mol
# Поверхностное натяжение | Плотность
σ := 2.48*N/m
ρ := 7.874*gm/cm^3
# Размеры частицы
# Энтальпия плавления
Dmin := 2.87
ΔH_пл := 13810*J/mol
i := 0 .. 10000
d0 := Dmin*Angstrom
d[i] := d0*(i + 3)
# Температура плавления частицы от диаметра d
T(d) := T_пл*(1 - 4*σ*M/(ρ*d*ΔH_пл))
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# Критическая температура при комнатной температуре и 0K
d_кр(t) := root(T(d0) - t, d0)
T1 := 25 °C = 298.15 K
T2 := 0 K
d_кр(T1) = 61.1552 Angstrom
d_кр(T2) = 51.087 Angstrom
# Влияние d на температуру
dT(d) := d/dd(T(d))
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dT(d[i]) = [
    1248.02; 702.013; 449.288; 312.006; 229.229; 175.503; 138.669; 112.322; 92.8282; 78.0015
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] K/Angstrom
# Удельная поверхность для частицы, имеющей размер, равный критическому при комнатной температуре
as(x) := 6/(ρ*x)
as(d_кр(T1)) = 124.601 m^2/gm
# Доля поверхностных атомов для ГПУ
# Количество поверхностных атомов
Ns(x) := 8 + 12*((x/d0 + 1)/2 - 2) + 6*((x/d0 + 1)/2 - 2)^2
# Общее колличество атомов
NE(x) := 0.417*(x/d0)^3 + 0.583*x/d0
# Доля поверхностных атомов
N(x) := Ns(x)/NE(x)
N(d_кр(T1)) = 0.153363
