# металл: | Ni
# Свойства
# Температура плавления макроскоптческой частицы | Молярная масса
T_пл := 1728 K
M := 59*gm/mol
# Поверхностное натяжение | Плотность
σ := 2.45*N/m
ρ := 8.907*gm/cm^3
# Размеры частицы
# Энтальпия плавления
Dmin := 2.49
ΔH_пл := 17480*J/mol
i := 0 .. 10000
d0 := Dmin*Angstrom
d[i] := d0*(i + 3)
# Температура плавления частицы от диаметра d
T(d) := T_пл*(1 - 4*σ*M/(ρ*d*ΔH_пл))
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# Критическая температура при комнатной температуре и 0K
d_кр(t) := root(T(d0) - t, d0)
T1 := 25 °C = 298.15 K
T2 := 0 K
d_кр(T1) = 44.8806 Angstrom
d_кр(T2) = 37.1369 Angstrom
# Влияние d на температуру
dT(d) := d/dd(T(d))
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dT(d[i]) = [
    1150.03; 646.89; 414.009; 287.507; 211.229; 161.722; 127.781; 103.502; 85.5391; 71.8766
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] K/Angstrom
# Удельная поверхность для частицы, имеющей размер, равный критическому при комнатной температуре
as(x) := 6/(ρ*x)
as(d_кр(T1)) = 150.093 m^2/gm
# Доля поверхностных атомов для ГПУ
# Количество поверхностных атомов
Ns(x) := 12 + 24*((x/d0 + 1)/2 - 2) + 8*(((x/d0 + 1)/2 - 2)*((x/d0 + 1)/2 - 3)/2) + 6*((x/d0 + 1)/2 - 2)^2
# Общее колличество атомов
NE(x) := 0.417*(x/d0)^3 + 0.583*x/d0
# Доля поверхностных атомов
N(x) := Ns(x)/NE(x)
N(d_кр(T1)) = 0.296278
