# металл: | Ru
# Свойства
# Температура плавления макроскоптческой частицы | Молярная масса
T_пл := 2607 K
M := 101*gm/mol
# Поверхностное натяжение | Плотность
σ := 3.05*J/m^2 = 3.05 N/m
ρ := 12.364*gm/cm^3
# Размеры частицы
# Энтальпия плавления
Dmin := 2.71
ΔH_пл := 38590*J/mol
i := 0 .. 10000
d0 := Dmin*Angstrom
d[i] := d0*(i + 3)
# Температура плавления частицы от диаметра d
T(d) := T_пл*(1 - 4*σ*M/(ρ*d*ΔH_пл))
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# Критическая температура при комнатной температуре и 0K
d_кр(t) := root(T(d0) - t, d0)
T1 := 25 °C = 298.15 K
T2 := 0 K
d_кр(T2) = 25.8254 Angstrom
d_кр(T1) = 29.1604 Angstrom
# Влияние d на температуру
dT(d) := d/dd(T(d))
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dT(d[i]) = [
    1018.61; 572.967; 366.699; 254.652; 187.091; 143.242; 113.179; 91.6748; 75.7643; 63.663
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] K/Angstrom
# Удельная поверхность для частицы, имеющей размер, равный критическому при комнатной температуре
as(x) := 6/(ρ*x)
as(d_кр(T1)) = 166.418 m^2/gm
# Доля поверхностных атомов для ГПУ
# Количество поверхностных атомов
Ns(x) := 12 + 24*((x/d0 + 1)/2 - 2) + 8*(((x/d0 + 1)/2 - 2)*((x/d0 + 1)/2 - 3)/2) + 6*((x/d0 + 1)/2 - 2)^2
# Общее колличество атомов
NE(x) := 0.417*(x/d0)^3 + 0.583*x/d0
# Доля поверхностных атомов
N(x) := Ns(x)/NE(x)
N(d_кр(T1)) = 0.456748
