Fe
КЧ := 8
# Диаметр частицы: | Плотность
i := 0 .. 400
ρ := 7.874*gm/cm^3
d0 := 61.155
d[i] := (d0 + 2.71*i)*Angstrom
R := d/2
# Объём сферической частицы
V := 4/3*π*R^3
# Ковалентный радиус
r := 2.71/2*Angstrom
# Площадь контакта
h := r*R/(r + R)
S := 2*π*vectorize(R*h)
# Удельная поверхность контактов
S_уд := S/(ρ*V)*КЧ
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S_уд = [
    21.149; 19.4272; 17.9075; 16.5594; 15.3579; 14.2827; 13.3166; 12.4452; 11.6567; 10.9409
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] m^2/gm
h = [
    1.2975; 1.29984; 1.302; 1.304; 1.30585; 1.30757; 1.30917; 1.31067; 1.31207; 1.31339
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] Angstrom
R = [
    30.5775; 31.9325; 33.2875; 34.6425; 35.9975; 37.3525; 38.7075; 40.0625; 41.4175; 42.7725
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] Angstrom
S = [
    249.282; 260.798; 272.315; 283.835; 295.355; 306.876; 318.399; 329.922; 341.446; 352.971
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] Angstrom^2
