Ni
КЧ := 12
# Диаметр частицы: | Плотность
i := 0 .. 400
ρ := 8.907*gm/cm^3
d0 := 44.881
d[i] := (d0 + 2.71*i)*Angstrom
R := d/2
# Объём сферической частицы
V := 4/3*π*R^3
# Ковалентный радиус
r := 2.71/2*Angstrom
# Площадь контакта
h := r*R/(r + R)
S := 2*π*vectorize(R*h)
# Удельная поверхность контактов
S_уд := S/(ρ*V)*КЧ
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S_уд = [
    51.2806; 45.755; 41.0769; 37.0813; 33.6417; 30.6595; 28.0569; 25.7723; 23.7558; 21.967
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] m^2/gm
h = [
    1.27784; 1.282; 1.28573; 1.2891; 1.29216; 1.29494; 1.29749; 1.29983; 1.30199; 1.30399
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] Angstrom
R = [
    22.4405; 23.7955; 25.1505; 26.5055; 27.8605; 29.2155; 30.5705; 31.9255; 33.2805; 34.6355
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] Angstrom
S = [
    180.173; 191.674; 203.178; 214.685; 226.195; 237.708; 249.222; 260.738; 272.256; 283.775
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] Angstrom^2
