Ru
КЧ := 12
# Диаметр частицы: | Плотность
i := 0 .. 400
ρ := 12.364*gm/cm^3
d0 := 29.097
d[i] := (d0 + 2.71*i)*Angstrom
R := d/2
# Объём сферической частицы
V := 4/3*π*R^3
# Ковалентный радиус
r := 2.71/2*Angstrom
# Площадь контакта
h := r*R/(r + R)
S := 2*π*vectorize(R*h)
# Удельная поверхность контактов
S_уд := S/(ρ*V)*КЧ
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S_уд = [
    85.2593; 71.8716; 61.4075; 53.0737; 46.3286; 40.7925; 36.1927; 32.3295; 29.0534; 26.2513
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] m^2/gm
h = [
    1.23955; 1.24862; 1.25636; 1.26305; 1.2689; 1.27404; 1.27861; 1.28268; 1.28635; 1.28966
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] Angstrom
R = [
    14.5485; 15.9035; 17.2585; 18.6135; 19.9685; 21.3235; 22.6785; 24.0335; 25.3885; 26.7435
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] Angstrom
S = [
    113.309; 124.768; 136.238; 147.717; 159.203; 170.695; 182.193; 193.694; 205.199; 216.707
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] Angstrom^2
