# Ввод эксперементальных данных
d := [10, 20, 30, 50, 70, 100]
d := transpose(d)
ms := [0.509, 0.651, 0.763, 0.807, 0.822, 0.783]
ms := transpose(ms)
# Параметры для апроксимации
F(x) := [x; 1]
# График эксперементальных данных
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# Вычисление параметров линейной функции
S := linfit(d^-1, ms^(1/3), F) = [-1.54935; 0.953503]
f(x) := F(x)*S
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x := 1
MS_inf := f(0)^3*A*10^6/m
h := root(f(x), x)^-1/2*nm
MS_inf = 866896 A/m
h = 0.812449 nm
i := 0 .. 10000
d1[i] := (1 + i)*Angstrom
Ms(d1) := MS_inf*(1 - 2*h/d1)^3
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x := 1 nm
root(Ms(x), x) = 1.62456 nm
