# Ввод данных
ε_w := 0.1*10^-3*J/m^2
k_B := 1.380649*10^-23*J/K
Ms := 1.081*10^6*A/m
T := 25 °C = 298.15 K
# Расчёт критических размеров
# Критический диаметр однодоменной частицы
eV := 1.602*10^-19*J
d_1 := 18*ε_w/(μ_0*Ms^2) = 12.2578 Angstrom
# Критический диаметр супермагнитной частицы
d_2 := (36*k_B*T/(π*μ_0*Ms^2))^(1/3) = 31.7885 Angstrom
# Зависимость энергии доменных стенок, магнитного поля и теплового движения атомов от диаметра частицы
i := 0 .. 100
d[i] := i*nm
d1 := 3 nm
E_T := k_B*T = 0.0256954 eV
E_w(d) := ε_w*π*d^2/2
E_m(d) := μ_0*Ms^2*π*d^3/36
E_Tline(d) := E_T + 0*d
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E_w(d) = [
    0; 0.000980522; 0.00392209; 0.0088247; 0.0156884; 0.0245131; 0.0352988; 0.0480456; 0.0627534; 0.0794223
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] eV
E_m(d) = [
    0; 0.000799919; 0.00639935; 0.0215978; 0.0511948; 0.0999899; 0.172783; 0.274372; 0.409559; 0.583141
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] eV
TOL := 10^-11
d := 0
# Проверка критический размеров
d_01 := root(E_w(d) - E_m(d), d, 10 Angstrom, 100 Angstrom) = 12.1782 Angstrom
d_02 := root(E_m(d) - E_T, d, 10 Angstrom, 100 Angstrom) = 31.7875 Angstrom
