# Ввод данных
ε_w := 0.3*10^-3*J/m^2
k_B := 1.380649*10^-23*J/K
Ms := 1.145*10^6*A/m
T := 25 °C = 298.15 K
# Расчёт критических размеров
# Критический диаметр однодоменной частицы
eV := 1.602*10^-19*J
d_1 := 18*ε_w/(μ_0*Ms^2) = 32.7773 Angstrom
# Критический диаметр супермагнитной частицы
d_2 := (36*k_B*T/(π*μ_0*Ms^2))^(1/3) = 30.5926 Angstrom
# Зависимость энергии доменных стенок, магнитного поля и теплового движения атомов от диаметра частицы
i := 0 .. 100
d[i] := i*nm
d1 := 3 nm
E_T := k_B*T = 0.0256954 eV
E_w(d) := ε_w*π*d^2/2
E_m(d) := μ_0*Ms^2*π*d^3/36
E_Tline(d) := E_T + 0*d
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E_w(d) = [
    0; 0.00294157; 0.0117663; 0.0264741; 0.0470651; 0.0735392; 0.105896; 0.144137; 0.18826; 0.238267
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] eV
E_m(d) = [
    0; 0.000897441; 0.00717952; 0.0242309; 0.0574362; 0.11218; 0.193847; 0.307822; 0.45949; 0.654234
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] eV
TOL := 10^-11
d := 0
# Проверка критический размеров
d_01 := root(E_w(d) - E_m(d), d, 10 Angstrom, 100 Angstrom) = 32.775 Angstrom
d_02 := root(E_m(d) - E_T, d, 10 Angstrom, 100 Angstrom) = 30.5911 Angstrom
