# Ввод данных
ε_w := 0.4*10^-3*J/m^2
k_B := 1.380649*10^-23*J/K
Ms := 0.867*10^6*A/m
T := 25 °C = 298.15 K
# Расчёт критических размеров
# Критический диаметр однодоменной частицы
eV := 1.602*10^-19*J
d_1 := 18*ε_w/(μ_0*Ms^2) = 76.2227 Angstrom
# Критический диаметр супермагнитной частицы
d_2 := (36*k_B*T/(π*μ_0*Ms^2))^(1/3) = 36.8248 Angstrom
# Зависимость энергии доменных стенок, магнитного поля и теплового движения атомов от диаметра частицы
i := 0 .. 100
d[i] := i*nm
d1 := 3 nm
E_T := k_B*T = 0.0256954 eV
E_w(d) := ε_w*π*d^2/2
E_m(d) := μ_0*Ms^2*π*d^3/36
E_Tline(d) := E_T + 0*d
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E_w(d) = [
    0; 0.00392209; 0.0156884; 0.0352988; 0.0627534; 0.0980522; 0.141195; 0.192182; 0.251014; 0.317689
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] eV
E_m(d) = [
    0; 0.000514556; 0.00411645; 0.013893; 0.0329316; 0.0643195; 0.111144; 0.176493; 0.263453; 0.375112
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] eV
TOL := 10^-11
d := 0
# Проверка критический размеров
d_01 := root(E_w(d) - E_m(d), d, 10 Angstrom, 100 Angstrom) = 76.2228 Angstrom
d_02 := root(E_m(d) - E_T, d, 10 Angstrom, 100 Angstrom) = 36.7734 Angstrom
