Ru
Свойства
ρ := 12.364*gm/cm^3
M := 101*gm/mol
Z_e := 1
d := 1 nm, 1.1 nm .. 10^4*nm
eV := 1.602*10^-19*J
N_A := 6.022*10^23*1/mol
h := 1.054*10^-34*J*s
m_e := 9.109*10^-31*kg
k_B := 1.381*10^-23*J/K
T := 25 °C = 298.15 K
E_F := (ρ*N_A*Z_e*3*h^3*π^2/M)^(2/3)*1/(2*m_e) = 6.40498 eV
N_At(d) := ρ*π*d^3*N_A/(6*M)
δ(d) := 2*E_F/(3*N_At(d)*Z_e)
E_T := k_B*T = 0.0257019 eV
δ(1 nm) = 0.110624 eV
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# Критический размер:
TOL := 10^-20
d_x := 1.1 nm
d_кр := root(δ(d_x)*eV^-1 - E_T*eV^-1, d_x) = 1.62665 nm
N_кр := N_At(d_кр) = 166.135
