# Ni
# Прямая решетка - ГЦК
# Обратная решетка - ОЦК
# Зона Брилюэна: кубооктаэдр
ρ := 8.907*gm/cm^3
M := 59*gm/mol
Z_e := 2
a := 3.52 Angstrom
# базисные векторы
a_1 := transpose([1/2*a, 0, 1/2*a])
a_1 = [1.76; 0; 1.76] Angstrom
a_2 := transpose([1/2*a, 1/2*a, 0])
a_2 = [1.76; 1.76; 0] Angstrom
a_3 := transpose([0, 1/2*a, 1/2*a])
a_3 = [0; 1.76; 1.76] Angstrom
b_1 := 2*π*a_2×a_3/(a_1*(a_2×a_3))
b_2 := 2*π*a_1×a_3/(a_2*(a_1×a_3))
b_3 := 2*π*a_1×a_2/(a_3*(a_1×a_2))
b_1 = [1.785; -1.785; 1.785] 1/Angstrom
b_2 = [1.785; 1.785; -1.785] 1/Angstrom
b_3 = [-1.785; 1.785; 1.785] 1/Angstrom
# Константы
eV := 1.602*10^-19*J
h_пр := 1.054*10^-34*J*s
N_A := 6.022*10^23*1/mol
m_e := 9.109*10^-31*kg
Ef := (ρ*N_A*Z_e*3*h_пр^3*π^2/M)^(2/3)*1/(2*m_e) = 11.6923 eV
E := 0*eV, 0.001*eV .. Ef
f(E) := sqrt(2*m_e^3*E/(π^4*h_пр^6))
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f(E) = [
    0; 0.215721; 0.305076; 0.37364; 0.431443; 0.482368; 0.528407; 0.570745; 0.610152; 0.647164
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] 1/(eV*nm^3)
