# Ru
# Прямая решетка - ГПУ
# Обратная решетка - ГПУ
# Зона Брилюэна: шестигранная призма
ρ := 12.364*gm/cm^3
M := 101*gm/mol
Z_e := 1
a := 2.71 Angstrom
c := 4.28 Angstrom
# базисные векторы
a_1 := transpose([a, 0, 0])
a_1 = [2.71; 0; 0] Angstrom
a_2 := transpose([-a/2, a*sqrt(3)/2, 0])
a_2 = [-1.355; 2.34693; 0] Angstrom
a_3 := transpose([0, 0, c])
a_3 = [0; 0; 4.28] Angstrom
b_1 := 2*π*a_2×a_3/(a_1*(a_2×a_3))
b_2 := 2*π*a_1×a_3/(a_2*(a_1×a_3))
b_3 := 2*π*a_1×a_2/(a_3*(a_1×a_2))
b_1 = [2.31852; 1.3386; 0] 1/Angstrom
b_2 = [0; 2.67719; 0] 1/Angstrom
b_3 = [0; 0; 1.46803] 1/Angstrom
# Константы
N_A := 6.022*10^23*1/mol
m_e := 9.109*10^-31*kg
eV := 1.602*10^-19*J
h_пр := 1.054*10^-34*J*s
Ef := (ρ*N_A*Z_e*3*h_пр^3*π^2/M)^(2/3)*1/(2*m_e) = 6.40498 eV
E := 0*eV, 0.001*eV .. Ef
f(E) := sqrt(2*m_e^3*E/(π^4*h_пр^6))
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f(E) = [
    0; 0.215721; 0.305076; 0.37364; 0.431443; 0.482368; 0.528407; 0.570745; 0.610152; 0.647164
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] 1/(eV*nm^3)
