N_A := 6.022*10^23*1/mol
h := 6.626*10^-34*J*s
h_пр := h/(2*π)
eV := 1.602*10^-19*J
m_e := 9.109*10^-31*kg
k_B := 1.381*10^-23*J/K
q := 1.602*10^-19*C
GaAs
E_g := 1.43*eV
m_n := 0.067*m_e
m_p := 0.45*m_e
f(m, E) := sqrt(2*m^3*E/(π^4*h_пр^6))
# Зона проводимости | Валентная зона
E_1n := E_g, E_g + 0.01*eV .. 10*eV
E_1p := -10*eV, -9.99*eV .. 0*eV  # '
f_1n(E) := f(m_n, E - E_g)
f_1p(E) := f(m_p, -E)
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f_1n(E_1n) = [
    0; 0.0118117; 0.0167043; 0.0204585; 0.0236234; 0.0264118; 0.0289326; 0.0312508; 0.0334085; 0.0354351
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] 1/(eV*nm^3)
f_1p(E_1p) = [
    6.50158; 6.49833; 6.49508; 6.49182; 6.48857; 6.48531; 6.48205; 6.47879; 6.47553; 6.47226
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] 1/(eV*nm^3)
# Зона проводимости | Валентная зона
f_2n(E, E_f, T) := 1/(1 + e^((E - E_f)/(k_B*T)))
f_2p(E, E_f, T) := 1/(1 + e^((E_f - E)/(k_B*T)))
n(E_f, T) := integral(f_1n(E)*f_2n(E, E_f, T), E = E_g .. 2*eV)
p(E_f, T) := integral(f_1p(E)*f_2p(E, E_f, T), E = -1*eV .. 0)
# Первичное приближение
E_f1 := E_g/2
T := 25 °C  # n = p
Given
(p(E_f1, T) - n(E_f1, T))/(p(E_f1, T) + n(E_f1, T)) == 0
E_f(T) := Find(E_f1)
T1 := 50 K, 60 K .. 300 K
E_f(T1) = [0.721165; 0.722396; 0.723627; 0.724858; 0.726089; 0.72732; 0.728551; 0.729782; 0.731013; 0.732239; 0.73347; 0.734702; 0.735933; 0.737165; 0.738396; 0.739627; 0.740859; 0.74209; 0.743321; 0.744553; 0.745784; 0.747015; 0.748247; 0.749478; 0.75071; 0.751941] eV
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ρ(T) := (p(E_f(T), T) + n(E_f(T), T))*q
ρ(T1) = [0; 0; 0; 0; 0; 0; 0; 0; 0; 0; 1.99135e-19; 6.95149e-18; 1.60651e-16; 2.63199e-15; 3.22671e-14; 3.09103e-13; 2.39628e-12; 1.54712e-11; 8.51852e-11; 4.07989e-10; 1.72821e-9; 6.56629e-9; 2.2648e-8; 7.16462e-8; 2.09732e-7; 5.72516e-7] C/m^3
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# Добавление примеси
E_D := E_g - 0.25*eV
N_D0 := 10^16*1/cm^3
N_D(N_D0, E_f, T) := N_D0*f_2p(E_D, E_f, T)
Given
(p(E_f1, T) + N_D(N_D0, E_f1, T) - n(E_f1, T))/(p(E_f1, T) + n(E_f1, T) + N_D(N_D0, E_f1, T)) == 0
E_f(E_f1, T, N_D0) := Find(E_f1)
E_g/2 = 0.715 eV
j := 0 .. 19
i := 0 .. 20
ND0[j] := 10^(j + 1)*1/cm^3
T2[i] := 50 K + 25*i*K
E_f(1.2*eV, 50 K, 10^1*1/cm^3) = 1.22822 eV
pE_f[i, j] :=
    try
        try
            E_f(1.2*eV, T2[i], ND0[j])
        on error
            E_f(pE_f[i, j - 1], T2[i], ND0[j])
    on error
        E_f(pE_f[i - 1, j], T2[i], ND0[j])
NA0 =  # error: Эта переменная неопределена.
pE_f = [
    1.22822, 1.23319, 1.23815, 1.24311, 1.24807, 1.25304, 1.258, 1.26296, 1.26792, 1.27289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;
    1.18692, 1.19501, 1.20266, 1.21017, 1.21764, 1.22509, 1.23253, 1.23998, 1.24742, 1.25486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;
    1.11393, 1.13374, 1.15326, 1.17091, 1.18469, 1.19596, 1.20632, 1.21638, 1.22635, 1.23628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;
    1.03131, 1.05612, 1.08093, 1.10574, 1.13045, 1.15441, 1.17495, 1.19081, 1.20437, 1.21714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;
    0.948039, 0.977813, 1.00759, 1.03736, 1.06713, 1.09689, 1.12648, 1.15474, 1.17816, 1.1964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;
    0.864223, 0.89896, 0.933696, 0.968433, 1.00317, 1.0379, 1.07263, 1.10726, 1.14102, 1.17043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;
    0.780103, 0.819645, 0.859342, 0.899041, 0.93874, 0.978438, 1.01814, 1.05782, 1.09739, 1.13594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;
    0.743546, 0.750865, 0.784837, 0.829247, 0.873906, 0.918567, 0.963227, 1.00789, 1.05252, 1.09694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;
    0.745804, 0.745984, 0.747779, 0.763645, 0.808774, 0.858335, 0.907958, 0.957581, 1.0072, 1.05676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;
    0.748863, 0.748872, 0.748956, 0.749795, 0.757969, 0.798153, 0.852369, 0.90695, 0.961534, 1.0161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;
    0.751941, 0.751942, 0.751948, 0.752013, 0.752664, 0.759086, 0.797266, 0.856034, 0.915573, 0.975112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;
    0.755019, 0.755019, 0.75502, 0.755028, 0.755102, 0.755848, 0.763192, 0.805598, 0.869348, 0.933847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;
    0.758098, 0.758098, 0.758098, 0.758099, 0.758111, 0.758227, 0.759388, 0.770638, 0.823263, 0.892334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;
    0.761176, 0.761176, 0.761176, 0.761176, 0.761179, 0.761202, 0.761433, 0.763742, 0.784722, 0.850708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;
    0.764255, 0.764255, 0.764255, 0.764255, 0.764255, 0.764261, 0.764317, 0.764879, 0.770462, 0.810988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;
    0.767333, 0.767333, 0.767333, 0.767333, 0.767333, 0.767335, 0.767351, 0.767512, 0.76912, 0.784571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;
    0.770411, 0.770411, 0.770411, 0.770411, 0.770411, 0.770412, 0.770417, 0.77047, 0.770999, 0.776265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;
    0.77349, 0.77349, 0.77349, 0.77349, 0.77349, 0.77349, 0.773492, 0.773511, 0.773707, 0.775657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;
    0.776568, 0.776568, 0.776568, 0.776568, 0.776568, 0.776568, 0.776569, 0.776577, 0.776657, 0.777451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;
    0.779647, 0.779647, 0.779647, 0.779647, 0.779647, 0.779647, 0.779647, 0.779651, 0.779686, 0.780038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;
    0.782726, 0.782726, 0.782726, 0.782726, 0.782726, 0.782726, 0.782726, 0.782727, 0.782744, 0.782912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] eV
T3[i, j] := T2[i]
ND1[i, j] := ND0[j]
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ρ(E_f1, T, N_d0) := (p(E_f1, T) + N_D(N_D0, E_f1, T) + n(E_f1, T))*q
ρ1[i, j] := ρ(pE_f[i, j], T2[i], ND0[j])
ρ1 = [
    0.022162, 0.00700827, 0.00221621, 0.000700829, 0.000221622, 7.00829e-5, 2.21622e-5, 7.00829e-6, 2.21622e-6, 7.0083e-7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;
    409.186, 143.102, 46.7238, 14.9257, 4.73503, 1.49887, 0.474135, 0.14995, 0.0474198, 0.0149956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;
    1601.25, 1594.55, 1533.11, 1188.19, 588.129, 217.346, 72.2425, 23.2083, 7.37582, 2.33612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;
    1602, 1601.98, 1601.84, 1600.37, 1586.03, 1465.62, 985.448, 429.703, 151.167, 49.4507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;
    1602, 1602, 1602, 1601.97, 1601.74, 1599.41, 1576.87, 1403.04, 857.989, 351.719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;
    1602, 1602, 1602, 1602, 1601.99, 1601.87, 1600.7, 1589.2, 1489.59, 1046.82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;
    1602, 1602, 1602, 1602, 1602, 1601.99, 1601.87, 1600.66, 1588.81, 1486.54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;
    1602, 1602, 1602, 1602, 1602, 1602, 1601.98, 1601.78, 1599.76, 1580.17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;
    1602, 1602, 1602, 1602, 1602, 1602, 1601.99, 1601.95, 1601.47, 1596.76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;
    1602, 1602, 1602, 1602, 1602, 1602, 1602, 1601.98, 1601.84, 1600.41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;
    1602, 1602, 1602, 1602, 1602, 1602, 1602, 1601.99, 1601.94, 1601.42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;
    1602, 1602, 1602, 1602, 1602, 1602, 1602, 1602, 1601.98, 1601.76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;
    1602, 1602, 1602, 1602, 1602, 1602, 1602, 1602, 1601.99, 1601.89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;
    1602, 1602, 1602, 1602, 1602, 1602, 1602, 1602, 1601.99, 1601.94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;
    1601.99, 1601.99, 1601.99, 1601.99, 1601.99, 1601.99, 1601.99, 1601.99, 1601.99, 1601.97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;
    1601.98, 1601.98, 1601.98, 1601.98, 1601.98, 1601.98, 1601.98, 1601.98, 1601.98, 1601.97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;
    1601.97, 1601.97, 1601.97, 1601.97, 1601.97, 1601.97, 1601.97, 1601.97, 1601.97, 1601.96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;
    1601.95, 1601.95, 1601.95, 1601.95, 1601.95, 1601.95, 1601.95, 1601.95, 1601.95, 1601.95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;
    1601.94, 1601.94, 1601.94, 1601.94, 1601.94, 1601.94, 1601.94, 1601.94, 1601.94, 1601.94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;
    1601.95, 1601.95, 1601.95, 1601.95, 1601.95, 1601.95, 1601.95, 1601.95, 1601.95, 1601.95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;
    1602.04, 1602.04, 1602.04, 1602.04, 1602.04, 1602.04, 1602.04, 1602.04, 1602.04, 1602.04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] C/m^3
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