N_A := 6.022*10^23*1/mol
h := 6.626*10^-34*J*s
h_пр := h/(2*π)
eV := 1.602*10^-19*J
m_e := 9.109*10^-31*kg
k_B := 1.381*10^-23*J/K
q := 1.602*10^-19*C
Si
E_g := 1.12*eV
m_n := 1.09*m_e
m_p := 1.15*m_e
f(m, E) := sqrt(2*m^3*E/(π^4*h_пр^6))
# Зона проводимости | Валентная зона
E_1n := E_g, E_g + 0.01*eV .. 10*eV
E_1p := -10*eV, -9.99*eV .. 0*eV  # '
f_1n(E) := f(m_n, E - E_g)
f_1p(E) := f(m_p, -E)
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f_1n(E_1n) = [
    0; 0.775069; 1.09611; 1.34246; 1.55014; 1.73311; 1.89852; 2.05064; 2.19222; 2.32521
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] 1/(eV*nm^3)
f_1p(E_1p) = [
    26.5612; 26.5479; 26.5346; 26.5213; 26.508; 26.4947; 26.4814; 26.468; 26.4547; 26.4414
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] 1/(eV*nm^3)
# Зона проводимости | Валентная зона
f_2n(E, E_f, T) := 1/(1 + e^((E - E_f)/(k_B*T)))
f_2p(E, E_f, T) := 1/(1 + e^((E_f - E)/(k_B*T)))
n(E_f, T) := integral(f_1n(E)*f_2n(E, E_f, T), E = E_g .. 2*eV)
p(E_f, T) := integral(f_1p(E)*f_2p(E, E_f, T), E = -2*eV .. 0)
# Первичное приближение
E_f1 := E_g/2
T := 25 °C  # n = p
Given
(p(E_f1, T) - n(E_f1, T))/(p(E_f1, T) + n(E_f1, T)) == 0
E_f(T) := Find(E_f1)
T1 := 50 K, 60 K .. 300 K
E_f(T1) = [0.560208; 0.560233; 0.560265; 0.560299; 0.560333; 0.560367; 0.560381; 0.560416; 0.56045; 0.560485; 0.56052; 0.560554; 0.560589; 0.560624; 0.560658; 0.560693; 0.560728; 0.560762; 0.560797; 0.560831; 0.560866; 0.560901; 0.560935; 0.56097; 0.561005; 0.561039] eV
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ρ(T) := (p(E_f(T), T) + n(E_f(T), T))*q
ρ(T1) = [0; 0; 0; 0; 0; 0; 0; 0; 5.39933e-16; 2.14167e-14; 5.2378e-13; 8.64394e-12; 1.03141e-10; 9.38944e-10; 6.80437e-9; 4.06103e-8; 2.05185e-7; 8.97656e-7; 3.46439e-6; 1.19797e-5; 3.76052e-5; 0.000108352; 0.000289274; 0.000721409; 0.00169233; 0.00375709] C/m^3
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# Добавление примеси
E_A := 0.05*eV
N_A0 := 10^16*1/cm^3
N_A(N_A0, E_f, T) := N_A0*f_2n(E_A, E_f, T)
Given
(p(E_f1, T) - n(E_f1, T) - N_A(N_A0, E_f1, T))/(p(E_f1, T) + n(E_f1, T) + N_A(N_A0, E_f1, T)) == 0
E_f(E_f1, T, N_A0) := Find(E_f1)
j := 0 .. 19
i := 0 .. 20
NA0[j] := 10^(j + 1)*1/cm^3
T2[i] := 50 K + 25*i*K
pE_f[i, j] :=
    try
        try
            E_f(0.1*eV, T2[i], NA0[j])
        on error
            E_f(pE_f[i, j - 1], T2[i], NA0[j])
    on error
        E_f(pE_f[i - 1, j], T2[i], NA0[j])
E_f(0.1*eV, 50 K, 10*1/cm^3) = 0.171931 eV
NA0 = [10000; 100000; 1e6; 1e7; 1e8; 1e9; 1e10; 1e11; 1e12; 1e13; 1e14; 1e15; 1e16; 1e17; 1e18; 1e19; 1e20; 1e21; 1e22; 1e23] 1/L
pE_f = [
    0.171931, 0.162006, 0.152081, 0.142157, 0.132232, 0.122307, 0.112383, 0.102458, 0.0925335, 0.0826108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;
    0.261828, 0.246941, 0.232054, 0.217167, 0.20228, 0.187393, 0.172506, 0.157619, 0.142732, 0.127845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;
    0.352824, 0.332975, 0.313126, 0.293276, 0.273427, 0.253578, 0.233728, 0.213879, 0.194029, 0.17418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;
    0.444637, 0.419826, 0.395014, 0.370202, 0.34539, 0.320579, 0.295767, 0.270955, 0.246144, 0.221332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;
    0.536769, 0.507324, 0.477553, 0.447779, 0.418005, 0.388231, 0.358457, 0.328683, 0.298909, 0.269134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;
    0.560531, 0.559854, 0.553359, 0.525748, 0.491159, 0.456424, 0.421688, 0.386951, 0.352215, 0.317478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;
    0.560692, 0.560686, 0.560625, 0.560013, 0.554057, 0.52481, 0.485379, 0.445683, 0.405985, 0.366286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;
    0.560779, 0.560779, 0.560778, 0.560762, 0.560606, 0.559045, 0.545159, 0.50476, 0.460159, 0.415498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;
    0.560866, 0.560866, 0.560866, 0.560865, 0.560857, 0.560774, 0.559948, 0.551942, 0.514403, 0.465068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;
    0.560953, 0.560953, 0.560953, 0.560953, 0.560952, 0.560944, 0.56087, 0.560128, 0.552864, 0.514492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;
    0.561039, 0.561039, 0.561039, 0.561039, 0.561039, 0.561038, 0.561028, 0.560929, 0.559937, 0.550322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;
    0.561126, 0.561126, 0.561126, 0.561126, 0.561126, 0.561126, 0.561124, 0.561106, 0.560926, 0.559125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;
    0.561213, 0.561213, 0.561213, 0.561213, 0.561213, 0.561212, 0.561212, 0.561208, 0.561166, 0.56075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;
    0.561299, 0.561299, 0.561299, 0.561299, 0.561299, 0.561299, 0.561299, 0.561298, 0.561286, 0.561169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;
    0.561386, 0.561386, 0.561386, 0.561386, 0.561386, 0.561386, 0.561386, 0.561385, 0.561382, 0.561343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;
    0.561472, 0.561472, 0.561472, 0.561472, 0.561472, 0.561472, 0.561472, 0.561472, 0.561471, 0.561456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;
    0.561559, 0.561559, 0.561559, 0.561559, 0.561559, 0.561559, 0.561559, 0.561559, 0.561558, 0.561552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;
    0.561646, 0.561646, 0.561646, 0.561646, 0.561646, 0.561646, 0.561646, 0.561646, 0.561645, 0.561643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;
    0.561732, 0.561732, 0.561732, 0.561732, 0.561732, 0.561732, 0.561732, 0.561732, 0.561732, 0.561731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;
    0.561819, 0.561819, 0.561819, 0.561819, 0.561819, 0.561819, 0.561819, 0.561819, 0.561819, 0.561818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;
    0.561905, 0.561905, 0.561905, 0.561905, 0.561905, 0.561905, 0.561905, 0.561905, 0.561905, 0.561905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] eV
T3[i, j] := T2[i]
NA1[i, j] := NA0[j]
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ρ(E_f1, T, N_d0) := (p(E_f1, T) + N_A(N_A0, E_f1, T) + n(E_f1, T))*q
ρ1[i, j] := ρ(pE_f[i, j], T2[i], NA0[j])
ρ1 = [
    1602, 1602, 1602, 1602, 1602, 1602, 1602, 1601.99, 1601.92, 1601.17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;
    1602, 1602, 1602, 1602, 1602, 1602, 1602, 1602, 1602, 1601.99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;
    1602, 1602, 1602, 1602, 1602, 1602, 1602, 1602, 1602, 1602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;
    1602, 1602, 1602, 1602, 1602, 1602, 1602, 1602, 1602, 1602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;
    1602, 1602, 1602, 1602, 1602, 1602, 1602, 1602, 1602, 1602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;
    1602, 1602, 1602, 1602, 1602, 1602, 1602, 1602, 1602, 1602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;
    1602, 1602, 1602, 1602, 1602, 1602, 1602, 1602, 1602, 1602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;
    1602, 1602, 1602, 1602, 1602, 1602, 1602, 1602, 1602, 1602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;
    1602, 1602, 1602, 1602, 1602, 1602, 1602, 1602, 1602, 1602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;
    1602, 1602, 1602, 1602, 1602, 1602, 1602, 1602, 1602, 1602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;
    1602, 1602, 1602, 1602, 1602, 1602, 1602, 1602, 1602, 1602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;
    1602.02, 1602.02, 1602.02, 1602.02, 1602.02, 1602.02, 1602.02, 1602.02, 1602.02, 1602.02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;
    1602.1, 1602.1, 1602.1, 1602.1, 1602.1, 1602.1, 1602.1, 1602.1, 1602.1, 1602.1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;
    1602.4, 1602.4, 1602.4, 1602.4, 1602.4, 1602.4, 1602.4, 1602.4, 1602.4, 1602.4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;
    1603.3, 1603.3, 1603.3, 1603.3, 1603.3, 1603.3, 1603.3, 1603.3, 1603.3, 1603.3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;
    1605.69, 1605.69, 1605.69, 1605.69, 1605.69, 1605.69, 1605.69, 1605.69, 1605.69, 1605.69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;
    1611.41, 1611.41, 1611.41, 1611.41, 1611.41, 1611.41, 1611.41, 1611.41, 1611.41, 1611.41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;
    1623.82, 1623.82, 1623.82, 1623.82, 1623.82, 1623.82, 1623.82, 1623.82, 1623.82, 1623.82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;
    1648.69, 1648.69, 1648.69, 1648.69, 1648.69, 1648.69, 1648.69, 1648.69, 1648.69, 1648.69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;
    1695.25, 1695.25, 1695.25, 1695.25, 1695.25, 1695.25, 1695.25, 1695.25, 1695.25, 1695.25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;
    1777.49, 1777.49, 1777.49, 1777.49, 1777.49, 1777.49, 1777.49, 1777.49, 1777.49, 1777.49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] C/m^3
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