N_A := 6.022*10^23*1/mol
h := 6.626*10^-34*J*s
h_пр := h/(2*π)
eV := 1.602*10^-19*J
m_e := 9.109*10^-31*kg
k_B := 1.381*10^-23*J/K
q := 1.602*10^-19*C
Ge
E_g := 0.67*eV
m_n := 0.55*m_e
m_p := 0.37*m_e
f(m, E) := sqrt(2*m^3*E/(π^4*h_пр^6))
# Зона проводимости | Валентная зона
E_1n := E_g, E_g + 0.01*eV .. 10*eV
E_1p := -10*eV, -9.99*eV .. 0*eV  # '
f_1n(E) := f(m_n, E - E_g)
f_1p(E) := f(m_p, -E)
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f_1n(E_1n) = [
    0; 0.277808; 0.39288; 0.481177; 0.555616; 0.621197; 0.680487; 0.73501; 0.785759; 0.833423
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] 1/(eV*nm^3)
f_1p(E_1p) = [
    4.84733; 4.84491; 4.84248; 4.84006; 4.83763; 4.8352; 4.83277; 4.83034; 4.82791; 4.82547
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] 1/(eV*nm^3)
# Зона проводимости | Валентная зона
f_2n(E, E_f, T) := 1/(1 + e^((E - E_f)/(k_B*T)))
f_2p(E, E_f, T) := 1/(1 + e^((E_f - E)/(k_B*T)))
n(E_f, T) := integral(f_1n(E)*f_2n(E, E_f, T), E = E_g .. 2*eV)
p(E_f, T) := integral(f_1p(E)*f_2p(E, E_f, T), E = -2*eV .. 0)
# Первичное приближение
E_f1 := E_g/2
T := 25 °C  # n = p
Given
(p(E_f1, T) - n(E_f1, T))/(p(E_f1, T) + n(E_f1, T)) == 0
E_f(T) := Find(E_f1)
T1 := 50 K, 60 K .. 300 K
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E_f(T1) = [0.333744; 0.333478; 0.333206; 0.33295; 0.332693; 0.332437; 0.332181; 0.331924; 0.331668; 0.331412; 0.331156; 0.330899; 0.330643; 0.330387; 0.33013; 0.329874; 0.329618; 0.329361; 0.329105; 0.328849; 0.328593; 0.328336; 0.32808; 0.327824; 0.327567; 0.327311] eV
ρ(T) := (p(E_f(T), T) + n(E_f(T), T))*q
ρ(T1) = [0; 0; 0; 0; 7.08244e-14; 6.22377e-12; 2.45711e-10; 5.31711e-9; 7.2391e-8; 6.84345e-7; 4.82938e-6; 2.68626e-5; 0.000122779; 0.000476318; 0.00160917; 0.00483226; 0.0131151; 0.0326122; 0.0751412; 0.161938; 0.329023; 0.634488; 1.16795; 2.06233; 3.50803; 5.76949] C/m^3
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# Добавление примеси
E_d := E_g - 0.1*eV
N_d0 := 10^16*1/cm^3
N_d(N_d0, E_f, T) := N_d0*f_2p(E_d, E_f, T)
Given
(p(E_f1, T) + N_d(N_d0, E_f1, T) - n(E_f1, T))/(p(E_f1, T) + n(E_f1, T) + N_d(N_d0, E_f1, T)) == 0
E_f(E_f1, T, N_d0) := Find(E_f1)
j := 0 .. 19
k := 0 .. 30
i := 0 .. 20
E[k] := 0 + 0.05*k*eV
T2[i] := 50 K + 25*i*K
Nd0[j] := 10^(j + 1)*1/cm^3
# Поиск 1 приближения:
E_f2[k] :=
    try
        E_f(E[k], 50 K, 10*1/cm^3)
    on error
        0*eV
max(E_f2) = 0.502838 eV
pE_f[i, j] :=
    try
        try
            E_f(0.5*eV, T2[i], Nd0[j])
        on error
            E_f(pE_f[i, j - 1], T2[i], Nd0[j])
    on error
        E_f(pE_f[i - 1, j], T2[i], Nd0[j])
pE_f = eV
T3[i, j] := T2[i]
Nd1[i, j] := Nd0[j]
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ρ(E_f1, T, N_d0) := (p(E_f1, T) + N_d(N_d0, E_f1, T) + n(E_f1, T))*q
ρ1[i, j] := ρ(pE_f[i, j], T2[i], Nd0[j])
ρ1 = C/m^3
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# Задача 3
