N_A := 6.022*10^23*1/mol
h := 6.626*10^-34*J*s
h_пр := h/(2*π)
eV := 1.602*10^-19*J
m_e := 9.109*10^-31*kg
k_B := 1.381*10^-23*J/K
q_0 := 1.602*10^-19*C
GaAs
E_g := 1.43*eV
m_n := 0.067*m_e
m_p := 0.45*m_e
f(m, E) := sqrt(2*m^3*E/(π^4*h_пр^6))
# Зона проводимости | Валентная зона
E_1n := E_g, E_g + 0.01*eV .. 10*eV
E_1p := -10*eV, -9.99*eV .. 0*eV  # '
f_1n(E) := f(m_n, E - E_g)
f_1p(E) := f(m_p, -E)
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f_1n(E_1n) = [
    0; 0.0118117; 0.0167043; 0.0204585; 0.0236234; 0.0264118; 0.0289326; 0.0312508; 0.0334085; 0.0354351
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] 1/(eV*nm^3)
f_1p(E_1p) = [
    6.50158; 6.49833; 6.49508; 6.49182; 6.48857; 6.48531; 6.48205; 6.47879; 6.47553; 6.47226
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] 1/(eV*nm^3)
# Зона проводимости | Валентная зона
f_2n(E, E_f, T) := 1/(1 + e^((E - E_f)/(k_B*T)))
f_2p(E, E_f, T) := 1/(1 + e^((E_f - E)/(k_B*T)))
n(E_f, T) := integral(f_1n(E)*f_2n(E, E_f, T), E = E_g .. 2*E_g)
p(E_f, T) := integral(f_1p(E)*f_2p(E, E_f, T), E = -E_g .. 0)
# n = p
E_f1 := E_g/2 = 0.715 eV
F(T, E_f) := (p(E_f, T) - n(E_f, T))/(p(E_f, T) + n(E_f, T))
E_f(T) := root(F(T, E_f), E_f, E_f1 - 0.5*eV, E_f1 + 0.5*eV)
T1 := 50 K, 60 K .. 300 K
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E_f(T1) = [0.721157; 0.722386; 0.723618; 0.72485; 0.726082; 0.727306; 0.728543; 0.729776; 0.731008; 0.732239; 0.73347; 0.734697; 0.735932; 0.737165; 0.738396; 0.739628; 0.740863; 0.742099; 0.743338; 0.744553; 0.745784; 0.747016; 0.748247; 0.749479; 0.75071; 0.751941] eV
ρ(T) := (p(E_f(T), T) + n(E_f(T), T))*q_0
ρ(T1) = [0; 0; 0; 0; 0; 0; 0; 0; 0; 0; 1.99135e-19; 6.95149e-18; 1.60651e-16; 2.63199e-15; 3.22671e-14; 3.09103e-13; 2.39628e-12; 1.54712e-11; 8.51852e-11; 4.07989e-10; 1.72821e-9; 6.56629e-9; 2.2648e-8; 7.16462e-8; 2.09732e-7; 5.72516e-7] C/m^3
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# Добавление примеси
# Тип примеси:
S := 1
# s =  1 - Донор
# s = -1 - Акцептор
# Глубина залегания:
ΔE := 0.1*eV
E_пр := (1 + S)/2*(E_g - ΔE) + (1 - S)/2*ΔE
# Концентрация:
N_0 := 1/cm^3
N_пр(N_0, E_f, T) := N_0*((1 + S)/2*f_2p(E_пр, E_f, T) + (1 - S)/2*f_2n(E_пр, E_f, T))
# Расчёт энергии Ферми:
F(T, N_0, E_f) := (p(E_f, T) - n(E_f, T) + S*N_пр(N_0, E_f, T))/(p(E_f, T) + n(E_f, T) + N_пр(N_0, E_f, T))
# Ширина окна поиска
E_Δ := 0.2*eV
E_f(T, N_0, x) := root(F(T, N_0, E_f1), E_f1, x - E_Δ, x + E_Δ)
# Ввод температур, концентраций
i := 0 .. 20
j := 0 .. 19
T2[i] := 50 K + 25*i*K
N_пр0[j] := 10^(j + 1)*1/cm^3
# Поиск 1 приближения:
# Шаг поиска
Δ_scan := 0.05*eV
k := 0 .. round(E_f1/Δ_scan)
E[k] := E_f1 + S*k*Δ_scan
E_f2(T, N) :=
    E_err ← -100*eV
    k ← 0
    while k ≤ last(E)
        err ← 0
        try
            E_res ← E_f(T, N, E[k])
        on error
            err ← 1
        k ← last(E) + 1 if err == 0
        k ← k + 1 otherwise
    E_res
E_f2(T2[0], N_пр0[0]) = 1.27645 eV
E_f3[i, j] :=
    try
        try
            E_f(T2[i], N_пр0[j], E_f2(T2[0], N_пр0[0]))
        on error
            E_f(T2[i], N_пр0[j], E_f3[i, j - 1])
    on error
        try
            E_f(T2[i], N_пр0[j], E_f3[i - 1, j])
        on error
            "error"
E_f3 = [
    1.27645, 1.28638, 1.29631, 1.30621, 1.31598, 1.32492, 1.33194, 1.33762, 1.34281, 1.34785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;
    1.19574, 1.21063, 1.22551, 1.2404, 1.25529, 1.27018, 1.28506, 1.29988, 1.31429, 1.32669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;
    1.11394, 1.1338, 1.15362, 1.17348, 1.19333, 1.21317, 1.23304, 1.25288, 1.27272, 1.29247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;
    1.03132, 1.05612, 1.08093, 1.10575, 1.13056, 1.15537, 1.18018, 1.20499, 1.22981, 1.25461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;
    0.948039, 0.977812, 1.00759, 1.03736, 1.06713, 1.09691, 1.12669, 1.15646, 1.18623, 1.216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;
    0.864223, 0.89895, 0.933686, 0.968423, 1.00316, 1.0379, 1.07263, 1.10738, 1.14212, 1.17684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;
    0.780103, 0.819643, 0.85934, 0.899039, 0.938738, 0.978437, 1.01814, 1.05783, 1.09753, 1.13723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;
    0.743546, 0.750864, 0.784835, 0.829247, 0.873905, 0.918566, 0.963227, 1.00789, 1.05255, 1.09721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;
    0.7458, 0.745984, 0.747778, 0.763644, 0.808774, 0.858335, 0.907958, 0.957582, 1.00721, 1.05683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;
    0.748856, 0.748872, 0.748956, 0.749788, 0.757943, 0.798152, 0.852355, 0.906938, 0.961524, 1.01611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;
    0.751937, 0.751972, 0.751948, 0.752013, 0.752662, 0.759075, 0.797266, 0.856032, 0.915573, 0.975121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;
    0.755017, 0.755032, 0.75502, 0.755073, 0.755102, 0.755846, 0.763183, 0.805575, 0.869349, 0.933851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;
    0.758097, 0.758104, 0.758064, 0.758099, 0.758176, 0.758227, 0.759382, 0.770625, 0.823261, 0.892338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;
    0.761176, 0.761179, 0.761161, 0.761176, 0.761191, 0.761259, 0.761433, 0.763713, 0.784706, 0.85071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;
    0.764254, 0.764256, 0.764247, 0.76429, 0.764255, 0.764288, 0.764317, 0.764878, 0.770461, 0.810984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;
    0.767333, 0.767334, 0.767329, 0.767349, 0.767263, 0.767335, 0.767423, 0.767512, 0.769114, 0.784565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;
    0.770411, 0.770412, 0.77041, 0.770419, 0.770381, 0.770412, 0.770439, 0.77047, 0.770999, 0.776265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;
    0.773458, 0.77349, 0.77349, 0.77349, 0.77349, 0.77349, 0.773497, 0.773566, 0.773707, 0.77565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;
    0.776543, 0.77666, 0.776568, 0.776568, 0.776568, 0.776568, 0.776571, 0.776598, 0.776656, 0.77745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;
    0.779627, 0.779714, 0.779647, 0.779647, 0.779647, 0.779647, 0.779648, 0.779659, 0.779775, 0.780037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;
    0.78271, 0.782775, 0.782725, 0.782725, 0.782725, 0.782725, 0.782726, 0.782731, 0.782784, 0.782911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] eV
T3[i, j] := T2[i]
N_пр2[i, j] := N_пр0[j]
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ρ_0(E_f1, T) := (p(E_f1, T) + n(E_f1, T))*q_0
ρ_1[i, j] := ρ_0(E_f3[i, j], T2[i])
ρ_1 = [
    0, 0, 0, 0, 1.54234e-8, 1.22494e-7, 6.24672e-7, 2.33691e-6, 7.78911e-6, 2.50629e-5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;
    0, 0, 0, 0, 1.60249e-8, 1.6018e-7, 1.60071e-6, 1.58503e-5, 0.00014723, 0.00100173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;
    0, 0, 0, 0, 1.60201e-8, 1.59978e-7, 1.6027e-6, 1.60272e-5, 0.000160041, 0.00158126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;
    0, 0, 0, 0, 1.60265e-8, 1.6016e-7, 1.60174e-6, 1.60208e-5, 0.000160188, 0.00160078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;
    0, 0, 0, 0, 1.60197e-8, 1.60196e-7, 1.60234e-6, 1.60175e-5, 0.000160198, 0.00160174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;
    0, 0, 0, 0, 1.60093e-8, 1.60093e-7, 1.60093e-6, 1.60266e-5, 0.000160217, 0.00160116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;
    0, 0, 0, 0, 1.60181e-8, 1.60181e-7, 1.60181e-6, 1.60181e-5, 0.0001602, 0.001602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;
    0, 0, 0, 0, 1.60197e-8, 1.60197e-7, 1.60197e-6, 1.60197e-5, 0.000160197, 0.001602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;
    0, 0, 0, 0, 1.61128e-8, 1.60209e-7, 1.602e-6, 1.602e-5, 0.0001602, 0.00160199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;
    4.06959e-8, 4.06959e-8, 4.06962e-8, 4.07269e-8, 4.3718e-8, 1.65287e-7, 1.60159e-6, 1.60115e-5, 0.000160115, 0.00160114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;
    5.72516e-7, 5.72516e-7, 5.72516e-7, 5.72518e-7, 5.72738e-7, 5.94439e-7, 1.70122e-6, 1.60294e-5, 0.000160195, 0.00160194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;
    5.41444e-6, 5.41444e-6, 5.41444e-6, 5.41445e-6, 5.41446e-6, 5.41679e-6, 5.64593e-6, 1.68971e-5, 0.000160291, 0.00160201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;
    3.74547e-5, 3.74547e-5, 3.74548e-5, 3.74547e-5, 3.74549e-5, 3.74551e-5, 3.74887e-5, 4.073e-5, 0.00016451, 0.00160252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;
    0.000201638, 0.000201638, 0.000201638, 0.000201638, 0.000201638, 0.000201638, 0.000201644, 0.000202259, 0.00025745, 0.00161467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;
    0.000885053, 0.000885053, 0.000885053, 0.000885053, 0.000885053, 0.000885053, 0.000885054, 0.000885197, 0.000899429, 0.00183002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;
    0.00328237, 0.00328237, 0.00328237, 0.00328237, 0.00328237, 0.00328237, 0.00328238, 0.00328241, 0.00328625, 0.00365218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;
    0.0105752, 0.0105752, 0.0105752, 0.0105752, 0.0105752, 0.0105752, 0.0105752, 0.0105752, 0.0105764, 0.0106959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;
    0.0302561, 0.0302561, 0.0302561, 0.0302561, 0.0302561, 0.0302561, 0.0302561, 0.0302561, 0.0302565, 0.0302982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;
    0.0782345, 0.0782347, 0.0782345, 0.0782345, 0.0782345, 0.0782345, 0.0782345, 0.0782345, 0.0782347, 0.0782509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;
    0.185457, 0.185457, 0.185457, 0.185457, 0.185457, 0.185457, 0.185457, 0.185457, 0.185457, 0.185463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;
    0.407774, 0.407774, 0.407774, 0.407774, 0.407774, 0.407774, 0.407774, 0.407774, 0.407774, 0.407777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] C/m^3
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T3 := 0
N_0 := 0
E_f := 0
j := 0
ε := 0
# Задача 3
T3 := 25 °C = 298.15 K
j := 0 .. 2
N_0[j] := 10^(16 + j)*1/cm^3
N_0 = [1e16; 1e17; 1e18] 1/cm^3
ΔE_s := 0.3*eV
ε := 12.9
E_f0[j] := E_f2(T3, N_0[j])
E_f0 = [1.32005; 1.35772; 1.39055] eV
# Ширина ОПЗ
l[j] := sqrt(2*ε*ε_0*ΔE_s/(q_0^2*N_0[j]))
l = [206.83; 65.4054; 20.683] nm
# 1 Способ
# координата x
x := 1 nm, 2 nm .. 500 nm
# Профиль распределения заряда
n_1 := 0
p_1 := 0
N_пр1(j, x) :=
    N_0[j] if 0 < x ≤ l[j]
    0 otherwise
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# Объёмная плотность заряда и проекция  напряженности электрического поля
q_v(j, x) :=
    S*q_0*N_0[j] if 0 < x ≤ l[j]
    0 otherwise
E_x(j, x) :=
    (-q_0*N_0[j]/(ε*ε_0)*(l[j] - x)) if 0 < x ≤ l[j]
    0 otherwise
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# Зонная диаграмма
W(j, x) :=
    ΔE_s*(1 - x/l[j])^2 if 0 < x ≤ l[j]
    0 otherwise
φ(j, x) :=
    -W(j, x)/q_0 if 0 < x ≤ l[j]
    0 otherwise
E_v(j, x) := S*W(j, x)
E_c(j, x) := E_g + S*W(j, x)
E_пр1(j, x) := E_пр + S*W(j, x)
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# 2 Способ
E_Fs[j] := E_f0[j] - S*ΔE_s
k := 0 .. 19
u[k] := k/20
E_F[j, k] := E_Fs[j] + S*u[k]*ΔE_s
E_F = [
    1.02005, 1.03505, 1.05005, 1.06505, 1.08005, 1.09505, 1.11005, 1.12505, 1.14005, 1.15505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;
    1.05772, 1.07272, 1.08772, 1.10272, 1.11772, 1.13272, 1.14772, 1.16272, 1.17772, 1.19272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;
    1.09055, 1.10555, 1.12055, 1.13555, 1.15055, 1.16555, 1.18055, 1.19555, 1.21055, 1.22555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] eV
q_v2(Ef, j) := q_0*(-n(Ef, T3) + p(Ef, T3) + S*N_пр(N_0[j], Ef, T3))
E_fmax[j] := max(E_Fs[j], E_f0[j])
E_fmax = [1.32005; 1.35772; 1.39055] eV
E_f0 = [1.32005; 1.35772; 1.39055] eV
E_fmin[j] := min(E_Fs[j], E_f0[j])
E_fmin = [1.02005; 1.05772; 1.09055] eV
C1[j] := 2*q_0/(ε*ε_0)*integral(q_v2(E1, j), E1 = E_Fs[j] .. E_f0[j])
D(j, Ef) := sqrt(C1[j] - 2*q_0/(ε*ε_0)*integral(q_v2(E1, j), E1 = E_Fs[j] .. Ef))
x2(j, Ef) := S*integral(1/D(j, E2), E2 = E_Fs[j] .. Ef)
x2[j, k] := x2(j, E_F[j, k])
x2 = [
    0, 5.51431, 11.1925, 17.05, 23.105, 29.379, 35.8975, 42.6916, 49.7993, 57.2684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;
    0, 1.78902, 3.63412, 5.54093, 7.51609, 9.5675, 11.7047, 13.9395, 16.2864, 18.7641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;
    0, 0.594094, 1.20883, 1.8465, 2.5099, 3.20238, 3.92814, 4.69241, 5.50196, 6.36566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] nm
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n_2[j, k] := n(E_F[j, k], T3)
p_2[j, k] := p(E_F[j, k], T3)
N_пр2[j, k] := N_пр(N_0[j], E_F[j, k], T3)
q_v2m[j, k] := q_v2(E_F[j, k], j)
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# Зонная диаграмма
W2[j, k] := S*(E_f0[j] - E_F[j, k])
W2 = [
    0.3, 0.285, 0.27, 0.255, 0.24, 0.225, 0.21, 0.195, 0.18, 0.165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;
    0.3, 0.285, 0.27, 0.255, 0.24, 0.225, 0.21, 0.195, 0.18, 0.165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;
    0.3, 0.285, 0.27, 0.255, 0.24, 0.225, 0.21, 0.195, 0.18, 0.165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] eV
E_v2[j, k] := S*W2[j, k]
E_c2[j, k] := E_g + S*W2[j, k]
E_пр2[j, k] := E_пр + S*W2[j, k]
E_Fline[j, k] := E_f0[j]
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