N_A := 6.022*10^23*1/mol
h := 6.626*10^-34*J*s
h_пр := h/(2*π)
eV := 1.602*10^-19*J
m_e := 9.109*10^-31*kg
k_B := 1.381*10^-23*J/K
q_0 := 1.602*10^-19*C
Si
E_g := 1.12*eV
m_n := 1.09*m_e
m_p := 1.15*m_e
f(m, E) := sqrt(2*m^3*E/(π^4*h_пр^6))
# Зона проводимости | Валентная зона
E_1n := E_g, E_g + 0.01*eV .. 10*eV
E_1p := -10*eV, -9.99*eV .. 0*eV  # '
f_1n(E) := f(m_n, E - E_g)
f_1p(E) := f(m_p, -E)
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f_1n(E_1n) = [
    0; 0.775069; 1.09611; 1.34246; 1.55014; 1.73311; 1.89852; 2.05064; 2.19222; 2.32521
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] 1/(eV*nm^3)
f_1p(E_1p) = [
    26.5612; 26.5479; 26.5346; 26.5213; 26.508; 26.4947; 26.4814; 26.468; 26.4547; 26.4414
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] 1/(eV*nm^3)
# Зона проводимости | Валентная зона
f_2n(E, E_f, T) := 1/(1 + e^((E - E_f)/(k_B*T)))
f_2p(E, E_f, T) := 1/(1 + e^((E_f - E)/(k_B*T)))
n(E_f, T) := integral(f_1n(E)*f_2n(E, E_f, T), E = E_g .. 2*E_g)
p(E_f, T) := integral(f_1p(E)*f_2p(E, E_f, T), E = -E_g .. 0)
# n = p
E_f1 := E_g/2 = 0.56 eV
F(T, E_f) := (p(E_f, T) - n(E_f, T))/(p(E_f, T) + n(E_f, T))
E_f(T) := root(F(T, E_f), E_f, E_f1 - 0.5*eV, E_f1 + 0.5*eV)
T1 := 50 K, 60 K .. 300 K
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E_f(T1) = [0.560173; 0.560208; 0.56024; 0.560272; 0.560305; 0.560339; 0.560374; 0.560409; 0.560444; 0.560479; 0.560514; 0.560549; 0.560584; 0.560619; 0.560654; 0.560689; 0.560724; 0.560759; 0.560794; 0.560829; 0.560864; 0.560899; 0.560934; 0.560968; 0.561003; 0.561038] eV
ρ(T) := (p(E_f(T), T) + n(E_f(T), T))*q_0
ρ(T1) = [0; 0; 0; 0; 0; 0; 0; 0; 5.39933e-16; 2.14167e-14; 5.2378e-13; 8.64394e-12; 1.0314e-10; 9.38945e-10; 6.80437e-9; 4.06103e-8; 2.05185e-7; 8.97656e-7; 3.46439e-6; 1.19797e-5; 3.76052e-5; 0.000108352; 0.000289274; 0.000721409; 0.00169233; 0.00375709] C/m^3
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# Добавление примеси
# Тип примеси:
S := 1
# s =  1 - Донор
# s = -1 - Акцептор
# Глубина залегания:
ΔE := 0.1*eV
E_пр := (1 + S)/2*(E_g - ΔE) + (1 - S)/2*ΔE
# Концентрация:
N_0 := 1/cm^3
N_пр(N_0, E_f, T) := N_0*((1 + S)/2*f_2p(E_пр, E_f, T) + (1 - S)/2*f_2n(E_пр, E_f, T))
# Расчёт энергии Ферми:
F(T, N_0, E_f) := (p(E_f, T) - n(E_f, T) + S*N_пр(N_0, E_f, T))/(p(E_f, T) + n(E_f, T) + N_пр(N_0, E_f, T))
# Ширина окна поиска
E_Δ := 0.2*eV
E_f(T, N_0, x) := root(F(T, N_0, E_f1), E_f1, x - E_Δ, x + E_Δ)
# Ввод температур, концентраций
i := 0 .. 20
j := 0 .. 19
T2[i] := 50 K + 25*i*K
N_пр0[j] := 10^(j + 1)*1/cm^3
# Поиск 1 приближения:
# Шаг поиска
Δ_scan := 0.05*eV
k := 0 .. round(E_f1/Δ_scan)
E[k] := E_f1 + S*k*Δ_scan
E_f2(T, N) :=
    E_err ← -100*eV
    k ← 0
    while k ≤ last(E)
        err ← 0
        try
            E_res ← E_f(T, N, E[k])
        on error
            err ← 1
        k ← last(E) + 1 if err == 0
        k ← k + 1 otherwise
    E_res
E_f2(T2[0], N_пр0[0]) = 0.948416 eV
E_f3[i, j] :=
    try
        try
            E_f(T2[i], N_пр0[j], E_f2(T2[0], N_пр0[0]))
        on error
            E_f(T2[i], N_пр0[j], E_f3[i, j - 1])
    on error
        try
            E_f(T2[i], N_пр0[j], E_f3[i - 1, j])
        on error
            "error"
E_f3 = [
    0.948403, 0.958343, 0.968274, 0.978189, 0.988112, 0.998013, 1.00772, 1.01635, 1.02304, 1.02859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;
    0.858691, 0.873578, 0.888464, 0.903352, 0.918251, 0.933119, 0.948025, 0.962907, 0.977766, 0.990892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;
    0.767868, 0.787718, 0.808212, 0.827414, 0.847266, 0.867115, 0.886965, 0.906827, 0.926668, 0.946521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;
    0.676229, 0.701039, 0.725851, 0.750664, 0.775476, 0.800293, 0.825098, 0.849904, 0.874723, 0.899534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;
    0.584271, 0.613716, 0.643486, 0.67326, 0.703034, 0.732808, 0.76258, 0.792358, 0.822107, 0.851902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;
    0.560689, 0.561359, 0.567852, 0.595447, 0.630043, 0.664778, 0.699515, 0.734251, 0.768969, 0.803758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;
    0.560694, 0.5607, 0.560761, 0.561362, 0.567328, 0.596568, 0.636004, 0.6757, 0.715399, 0.755068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;
    0.560779, 0.560781, 0.56078, 0.560797, 0.560953, 0.562513, 0.576398, 0.616798, 0.6614, 0.70606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;
    0.560866, 0.560866, 0.560865, 0.560881, 0.560829, 0.560958, 0.561774, 0.569789, 0.607328, 0.656664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;
    0.560953, 0.560953, 0.560952, 0.560957, 0.560928, 0.560961, 0.561035, 0.561772, 0.56902, 0.607413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;
    0.561039, 0.561039, 0.561039, 0.561041, 0.561027, 0.56104, 0.56105, 0.56115, 0.562134, 0.571734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;
    0.561126, 0.561126, 0.561126, 0.561127, 0.56112, 0.561165, 0.561128, 0.561146, 0.561326, 0.5631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;
    0.561213, 0.561213, 0.561212, 0.561213, 0.561209, 0.56123, 0.561213, 0.561241, 0.561259, 0.561675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;
    0.561299, 0.561299, 0.561299, 0.561299, 0.561298, 0.561308, 0.561256, 0.5613, 0.561373, 0.561429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;
    0.561386, 0.561386, 0.561386, 0.561386, 0.561385, 0.56139, 0.561366, 0.561386, 0.561408, 0.561428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;
    0.561472, 0.561472, 0.561472, 0.561472, 0.561472, 0.561475, 0.561463, 0.561517, 0.561474, 0.561552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;
    0.561559, 0.561559, 0.561559, 0.561559, 0.561559, 0.56156, 0.561554, 0.561579, 0.561477, 0.561566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;
    0.561646, 0.561646, 0.561646, 0.561646, 0.561645, 0.561646, 0.561643, 0.561655, 0.561609, 0.561649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;
    0.561732, 0.561732, 0.561732, 0.561732, 0.561732, 0.561733, 0.561731, 0.561737, 0.561715, 0.5618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;
    0.561819, 0.561819, 0.561819, 0.561819, 0.561819, 0.561819, 0.561818, 0.561821, 0.561811, 0.561849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;
    0.561905, 0.561905, 0.561905, 0.561905, 0.561905, 0.561906, 0.561905, 0.561907, 0.561902, 0.56192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] eV
T3[i, j] := T2[i]
N_пр2[i, j] := N_пр0[j]
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ρ_0(E_f1, T) := (p(E_f1, T) + n(E_f1, T))*q_0
ρ_1[i, j] := ρ_0(E_f3[i, j], T2[i])
ρ_1 = [
    0, 0, 0, 0, 0, 1.59223e-7, 1.51435e-6, 1.12151e-5, 5.29594e-5, 0.000192003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;
    0, 0, 0, 0, 0, 1.6002e-7, 1.60486e-6, 1.60352e-5, 0.000159661, 0.00121603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;
    0, 0, 0, 0, 0, 1.60202e-7, 1.60199e-6, 1.60444e-5, 0.000160279, 0.00160346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;
    0, 0, 0, 0, 0, 1.60281e-7, 1.60176e-6, 1.60093e-5, 0.0001602, 0.00160198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;
    0, 0, 0, 0, 0, 1.60197e-7, 1.60173e-6, 1.60215e-5, 0.000159906, 0.00160167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;
    0, 0, 0, 0, 0, 1.60093e-7, 1.60093e-6, 1.60093e-5, 0.000159897, 0.00160457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;
    4.06103e-8, 4.06103e-8, 4.06106e-8, 4.06409e-8, 4.3655e-8, 1.652e-7, 1.60231e-6, 1.60181e-5, 0.000160181, 0.00159904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;
    1.78947e-6, 1.78947e-6, 1.78947e-6, 1.78947e-6, 1.78954e-6, 1.79662e-6, 2.40164e-6, 1.61189e-5, 0.000160207, 0.00160197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;
    3.76052e-5, 3.76052e-5, 3.76052e-5, 3.76052e-5, 3.76053e-5, 3.76056e-5, 3.76386e-5, 4.0875e-5, 0.000164549, 0.00160244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;
    0.000460517, 0.000460517, 0.000460517, 0.000460517, 0.000460517, 0.000460517, 0.00046052, 0.000460792, 0.000487442, 0.00166686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;
    0.00375709, 0.00375709, 0.00375709, 0.00375709, 0.00375709, 0.00375709, 0.00375709, 0.00375713, 0.00376046, 0.00408298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;
    0.0224074, 0.0224074, 0.0224074, 0.0224074, 0.0224074, 0.0224074, 0.0224074, 0.0224074, 0.022408, 0.022463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;
    0.104405, 0.104405, 0.104405, 0.104405, 0.104405, 0.104405, 0.104405, 0.104405, 0.104406, 0.104418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;
    0.399069, 0.399069, 0.399069, 0.399069, 0.399069, 0.399069, 0.39907, 0.399069, 0.39907, 0.399073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;
    1.29807, 1.29807, 1.29807, 1.29807, 1.29807, 1.29807, 1.29807, 1.29807, 1.29807, 1.29807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;
    3.69558, 3.69558, 3.69558, 3.69558, 3.69558, 3.69558, 3.69558, 3.69558, 3.69558, 3.69558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;
    9.41256, 9.41256, 9.41256, 9.41256, 9.41256, 9.41256, 9.41256, 9.41256, 9.41258, 9.41256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;
    21.8223, 21.8223, 21.8223, 21.8223, 21.8223, 21.8223, 21.8223, 21.8223, 21.8223, 21.8223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;
    46.6969, 46.6969, 46.6969, 46.6969, 46.6969, 46.6969, 46.6969, 46.6969, 46.6969, 46.6969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;
    93.2742, 93.2742, 93.2742, 93.2742, 93.2742, 93.2742, 93.2742, 93.2742, 93.2742, 93.2742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;
    175.521, 175.521, 175.521, 175.521, 175.521, 175.521, 175.521, 175.521, 175.521, 175.521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] C/m^3
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T3 := 0
N_0 := 0
E_f := 0
j := 0
ε := 0
# Задача 3
T3 := 25 °C = 298.15 K
j := 0 .. 2
N_0[j] := 10^(16 + j)*1/cm^3
N_0 = [1e16; 1e17; 1e18] 1/cm^3
ΔE_s := 0.3*eV
ε := 11.7
E_f0[j] := E_f2(T3, N_0[j])
E_f0 = [0.91528; 0.971311; 1.0176] eV
# Ширина ОПЗ
l[j] := sqrt(2*ε*ε_0*ΔE_s/(q_0^2*N_0[j]))
l = [196.975; 62.289; 19.6975] nm
# 1 Способ
# координата x
x := 1 nm, 2 nm .. 500 nm
# Профиль распределения заряда
n_1 := 0
p_1 := 0
N_пр1(j, x) :=
    N_0[j] if 0 < x ≤ l[j]
    0 otherwise
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# Объёмная плотность заряда и проекция  напряженности электрического поля
q_v(j, x) :=
    S*q_0*N_0[j] if 0 < x ≤ l[j]
    0 otherwise
E_x(j, x) :=
    (-q_0*N_0[j]/(ε*ε_0)*(l[j] - x)) if 0 < x ≤ l[j]
    0 otherwise
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# Зонная диаграмма
W(j, x) :=
    ΔE_s*(1 - x/l[j])^2 if 0 < x ≤ l[j]
    0 otherwise
φ(j, x) :=
    -W(j, x)/q_0 if 0 < x ≤ l[j]
    0 otherwise
E_v(j, x) := S*W(j, x)
E_c(j, x) := E_g + S*W(j, x)
E_пр1(j, x) := E_пр + S*W(j, x)
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# 2 Способ
E_Fs[j] := E_f0[j] - S*ΔE_s
k := 0 .. 19
u[k] := k/20
E_F[j, k] := E_Fs[j] + S*u[k]*ΔE_s
E_F = [
    0.61528, 0.63028, 0.64528, 0.66028, 0.67528, 0.69028, 0.70528, 0.72028, 0.73528, 0.75028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;
    0.671311, 0.686311, 0.701311, 0.716311, 0.731311, 0.746311, 0.761311, 0.776311, 0.791311, 0.806311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;
    0.717602, 0.732602, 0.747602, 0.762602, 0.777602, 0.792602, 0.807602, 0.822602, 0.837602, 0.852602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] eV
q_v2(Ef, j) := q_0*(-n(Ef, T3) + p(Ef, T3) + S*N_пр(N_0[j], Ef, T3))
E_fmax[j] := max(E_Fs[j], E_f0[j])
E_fmax = [0.91528; 0.971311; 1.0176] eV
E_f0 = [0.91528; 0.971311; 1.0176] eV
E_fmin[j] := min(E_Fs[j], E_f0[j])
E_fmin = [0.61528; 0.671311; 0.717602] eV
C1[j] := 2*q_0/(ε*ε_0)*integral(q_v2(E1, j), E1 = E_Fs[j] .. E_f0[j])
D(j, Ef) := sqrt(C1[j] - 2*q_0/(ε*ε_0)*integral(q_v2(E1, j), E1 = E_Fs[j] .. Ef))
x2(j, Ef) := S*integral(1/D(j, E2), E2 = E_Fs[j] .. Ef)
x2[j, k] := x2(j, E_F[j, k])
x2 = [
    0, 5.2223, 10.598, 16.1414, 21.8692, 27.8013, 33.961, 40.3769, 47.0837, 54.1249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;
    0, 1.65219, 3.35295, 5.10682, 6.91912, 8.79611, 10.7452, 12.7755, 14.898, 17.1264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;
    0, 0.52663, 1.069, 1.62861, 2.20721, 2.80689, 3.43012, 4.07992, 4.75998, 5.47497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] nm
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n_2[j, k] := n(E_F[j, k], T3)
p_2[j, k] := p(E_F[j, k], T3)
N_пр2[j, k] := N_пр(N_0[j], E_F[j, k], T3)
q_v2m[j, k] := q_v2(E_F[j, k], j)
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# Зонная диаграмма
W2[j, k] := S*(E_f0[j] - E_F[j, k])
W2 = [
    0.3, 0.285, 0.27, 0.255, 0.24, 0.225, 0.21, 0.195, 0.18, 0.165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;
    0.3, 0.285, 0.27, 0.255, 0.24, 0.225, 0.21, 0.195, 0.18, 0.165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;
    0.3, 0.285, 0.27, 0.255, 0.24, 0.225, 0.21, 0.195, 0.18, 0.165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] eV
E_v2[j, k] := S*W2[j, k]
E_c2[j, k] := E_g + S*W2[j, k]
E_пр2[j, k] := E_пр + S*W2[j, k]
E_Fline[j, k] := E_f0[j]
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