N_A := 6.022*10^23*1/mol
h := 6.626*10^-34*J*s
h_пр := h/(2*π)
eV := 1.602*10^-19*J
m_e := 9.109*10^-31*kg
k_B := 1.381*10^-23*J/K
q_0 := 1.602*10^-19*C
Ge
E_g := 0.67*eV
m_n := 0.55*m_e
m_p := 0.37*m_e
f(m, E) := sqrt(2*m^3*E/(π^4*h_пр^6))
# Зона проводимости | Валентная зона
E_1n := E_g, E_g + 0.01*eV .. 10*eV
E_1p := -10*eV, -9.99*eV .. 0*eV  # '
f_1n(E) := f(m_n, E - E_g)
f_1p(E) := f(m_p, -E)
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f_1n(E_1n) = [
    0; 0.277808; 0.39288; 0.481177; 0.555616; 0.621197; 0.680487; 0.73501; 0.785759; 0.833423
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] 1/(eV*nm^3)
f_1p(E_1p) = [
    4.84733; 4.84491; 4.84248; 4.84006; 4.83763; 4.8352; 4.83277; 4.83034; 4.82791; 4.82547
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] 1/(eV*nm^3)
# Зона проводимости | Валентная зона
f_2n(E, E_f, T) := 1/(1 + e^((E - E_f)/(k_B*T)))
f_2p(E, E_f, T) := 1/(1 + e^((E_f - E)/(k_B*T)))
n(E_f, T) := integral(f_1n(E)*f_2n(E, E_f, T), E = E_g .. 2*E_g)
p(E_f, T) := integral(f_1p(E)*f_2p(E, E_f, T), E = -E_g .. 0)
# n = p
E_f1 := E_g/2 = 0.335 eV
F(T, E_f) := (p(E_f, T) - n(E_f, T))/(p(E_f, T) + n(E_f, T))
E_f(T) := root(F(T, E_f), E_f, E_f1 - 0.5*eV, E_f1 + 0.5*eV)
T1 := 50 K, 60 K .. 300 K
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E_f(T1) = [0.333719; 0.333462; 0.33321; 0.332952; 0.332694; 0.332438; 0.332181; 0.331925; 0.331668; 0.331412; 0.331165; 0.3309; 0.330637; 0.330376; 0.330115; 0.329874; 0.329618; 0.329361; 0.329105; 0.328829; 0.328573; 0.328318; 0.328063; 0.327809; 0.327555; 0.327301] eV
ρ(T) := (p(E_f(T), T) + n(E_f(T), T))*q_0
ρ(T1) = [0; 0; 0; 0; 7.08244e-14; 6.22376e-12; 2.45711e-10; 5.31711e-9; 7.2391e-8; 6.84345e-7; 4.82938e-6; 2.68626e-5; 0.000122779; 0.000476318; 0.00160917; 0.00483226; 0.0131151; 0.0326122; 0.0751412; 0.161938; 0.329023; 0.634489; 1.16795; 2.06233; 3.50803; 5.76949] C/m^3
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# Добавление примеси
# Тип примеси:
S := 1
# s =  1 - Донор
# s = -1 - Акцептор
# Глубина залегания:
ΔE := 0.1*eV
E_пр := (1 + S)/2*(E_g - ΔE) + (1 - S)/2*ΔE
# Концентрация:
N_0 := 1/cm^3
N_пр(N_0, E_f, T) := N_0*((1 + S)/2*f_2p(E_пр, E_f, T) + (1 - S)/2*f_2n(E_пр, E_f, T))
# Расчёт энергии Ферми:
F(T, N_0, E_f) := (p(E_f, T) - n(E_f, T) + S*N_пр(N_0, E_f, T))/(p(E_f, T) + n(E_f, T) + N_пр(N_0, E_f, T))
# Ширина окна поиска
E_Δ := 0.2*eV
E_f(T, N_0, x) := root(F(T, N_0, E_f1), E_f1, x - E_Δ, x + E_Δ)
# Ввод температур, концентраций
i := 0 .. 20
j := 0 .. 19
T2[i] := 50 K + 25*i*K
N_пр0[j] := 10^(j + 1)*1/cm^3
# Поиск 1 приближения:
# Шаг поиска
Δ_scan := 0.05*eV
k := 0 .. round(E_f1/Δ_scan)
E[k] := E_f1 + S*k*Δ_scan
E_f2(T, N) :=
    E_err ← -100*eV
    k ← 0
    while k ≤ last(E)
        err ← 0
        try
            E_res ← E_f(T, N, E[k])
        on error
            err ← 1
        k ← last(E) + 1 if err == 0
        k ← k + 1 otherwise
    E_res
E_f2(T2[0], N_пр0[0]) = 0.502839 eV
E_f3[i, j] :=
    try
        try
            E_f(T2[i], N_пр0[j], E_f2(T2[0], N_пр0[0]))
        on error
            E_f(T2[i], N_пр0[j], E_f3[i, j - 1])
    on error
        try
            E_f(T2[i], N_пр0[j], E_f3[i - 1, j])
        on error
            "error"
E_f3 = [
    0.502824, 0.512765, 0.522696, 0.532611, 0.54253, 0.552389, 0.561788, 0.569544, 0.575597, 0.580915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;
    0.415325, 0.430213, 0.445098, 0.459989, 0.474873, 0.489754, 0.504646, 0.519537, 0.534387, 0.549409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;
    0.334632, 0.346876, 0.366431, 0.386255, 0.406109, 0.425967, 0.445809, 0.465659, 0.48551, 0.505352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;
    0.331797, 0.331805, 0.33188, 0.332631, 0.339488, 0.361388, 0.386152, 0.410967, 0.435778, 0.460596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;
    0.331156, 0.331156, 0.331156, 0.33116, 0.331198, 0.331455, 0.335374, 0.355911, 0.385399, 0.415172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;
    0.32982, 0.32982, 0.32982, 0.329821, 0.329822, 0.32984, 0.330017, 0.331712, 0.339737, 0.369302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;
    0.329874, 0.329874, 0.329874, 0.329874, 0.329874, 0.329875, 0.32988, 0.329931, 0.330446, 0.335499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;
    0.329233, 0.329233, 0.329233, 0.329233, 0.329233, 0.329233, 0.329234, 0.32924, 0.329296, 0.329843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;
    0.328593, 0.328593, 0.328593, 0.328593, 0.328593, 0.328593, 0.328593, 0.328594, 0.328603, 0.328698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;
    0.327935, 0.327935, 0.327935, 0.327935, 0.327935, 0.327935, 0.327935, 0.327936, 0.327938, 0.327967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;
    0.327311, 0.327311, 0.327311, 0.327311, 0.327311, 0.327311, 0.327311, 0.327311, 0.327312, 0.327318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;
    0.32667, 0.32667, 0.32667, 0.32667, 0.32667, 0.32667, 0.32667, 0.32667, 0.326671, 0.326673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;
    0.32603, 0.32603, 0.32603, 0.32603, 0.32603, 0.32603, 0.32603, 0.32603, 0.32603, 0.326031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;
    0.325389, 0.325389, 0.325389, 0.325389, 0.325389, 0.325389, 0.325389, 0.325389, 0.325389, 0.325389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;
    0.324748, 0.324748, 0.324748, 0.324748, 0.324748, 0.324748, 0.324748, 0.324748, 0.324748, 0.324748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;
    0.324107, 0.324107, 0.324107, 0.324107, 0.324107, 0.324107, 0.324107, 0.324107, 0.324107, 0.324107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;
    0.323466, 0.323466, 0.323466, 0.323466, 0.323466, 0.323466, 0.323466, 0.323466, 0.323466, 0.323466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;
    0.322825, 0.322825, 0.322825, 0.322825, 0.322825, 0.322825, 0.322825, 0.322825, 0.322825, 0.322825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;
    0.322183, 0.322183, 0.322183, 0.322183, 0.322183, 0.322183, 0.322183, 0.322183, 0.322183, 0.322183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;
    0.321542, 0.321542, 0.321542, 0.321542, 0.321542, 0.321542, 0.321542, 0.321542, 0.321542, 0.321542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;
    0.320899, 0.320899, 0.320899, 0.320899, 0.320899, 0.320899, 0.320899, 0.320899, 0.320899, 0.320899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] eV
T3[i, j] := T2[i]
N_пр2[i, j] := N_пр0[j]
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ρ_0(E_f1, T) := (p(E_f1, T) + n(E_f1, T))*q_0
ρ_1[i, j] := ρ_0(E_f3[i, j], T2[i])
ρ_1 = [
    0, 0, 0, 0, 0, 1.57544e-7, 1.39455e-6, 8.43185e-6, 3.43366e-5, 0.000117912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;
    0, 0, 0, 0, 0, 1.60059e-7, 1.60168e-6, 1.60266e-5, 0.000159346, 0.00162716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;
    0, 0, 0, 0, 0, 1.60332e-7, 1.60199e-6, 1.60204e-5, 0.000160234, 0.00160103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;
    0, 0, 0, 0, 2.61325e-8, 1.61525e-7, 1.60163e-6, 1.602e-5, 0.000160198, 0.00160287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;
    4.82938e-6, 4.82938e-6, 4.82938e-6, 4.82938e-6, 4.82941e-6, 4.83068e-6, 5.08868e-6, 1.67362e-5, 0.00016025, 0.001602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;
    0.000246669, 0.000246669, 0.000246669, 0.000246669, 0.000246668, 0.000246655, 0.000246542, 0.000247184, 0.000293907, 0.00162098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;
    0.00483226, 0.00483226, 0.00483226, 0.00483226, 0.00483226, 0.00483226, 0.00483226, 0.00483229, 0.00483492, 0.00509171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;
    0.0499455, 0.0499455, 0.0499455, 0.0499455, 0.0499455, 0.0499455, 0.0499455, 0.0499455, 0.0499457, 0.0499702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;
    0.329023, 0.329023, 0.329023, 0.329023, 0.329023, 0.329023, 0.329023, 0.329023, 0.329023, 0.329027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;
    1.55965, 1.55965, 1.55965, 1.55965, 1.55965, 1.55965, 1.55965, 1.55965, 1.55965, 1.55965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;
    5.76949, 5.76949, 5.76949, 5.76949, 5.76949, 5.76949, 5.76949, 5.76949, 5.76949, 5.76949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;
    17.6208, 17.6208, 17.6208, 17.6208, 17.6208, 17.6208, 17.6208, 17.6208, 17.6208, 17.6208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;
    46.2623, 46.2623, 46.2623, 46.2623, 46.2623, 46.2623, 46.2623, 46.2623, 46.2623, 46.2623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;
    107.557, 107.557, 107.557, 107.557, 107.557, 107.557, 107.557, 107.557, 107.557, 107.557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;
    226.445, 226.445, 226.445, 226.445, 226.445, 226.445, 226.445, 226.445, 226.445, 226.445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;
    439.178, 439.178, 439.178, 439.178, 439.178, 439.178, 439.178, 439.178, 439.178, 439.178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;
    795.207, 795.207, 795.207, 795.207, 795.207, 795.207, 795.207, 795.207, 795.207, 795.207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;
    1358.56, 1358.56, 1358.56, 1358.56, 1358.56, 1358.56, 1358.56, 1358.56, 1358.56, 1358.56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;
    2208.64, 2208.64, 2208.64, 2208.64, 2208.64, 2208.64, 2208.64, 2208.64, 2208.64, 2208.64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;
    3440.42, 3440.42, 3440.42, 3440.42, 3440.42, 3440.42, 3440.42, 3440.42, 3440.42, 3440.42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;
    5164.15, 5164.15, 5164.15, 5164.15, 5164.15, 5164.15, 5164.15, 5164.15, 5164.15, 5164.15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] C/m^3
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T3 := 0
N_0 := 0
E_f := 0
j := 0
ε := 0
# Задача 3
T3 := 25 °C = 298.15 K
j := 0 .. 2
N_0[j] := 10^(16 + j)*1/cm^3
N_0 = [1e16; 1e17; 1e18] 1/cm^3
ΔE_s := 0.3*eV
ε := 16.2
E_f0[j] := E_f2(T3, N_0[j])
E_f0 = [0.490927; 0.543468; 0.584622] eV
# Ширина ОПЗ
l[j] := sqrt(2*ε*ε_0*ΔE_s/(q_0^2*N_0[j]))
l = [231.78; 73.2953; 23.178] nm
# 1 Способ
# координата x
x := 1 nm, 2 nm .. 500 nm
# Профиль распределения заряда
n_1 := 0
p_1 := 0
N_пр1(j, x) :=
    N_0[j] if 0 < x ≤ l[j]
    0 otherwise
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# Объёмная плотность заряда и проекция  напряженности электрического поля
q_v(j, x) :=
    S*q_0*N_0[j] if 0 < x ≤ l[j]
    0 otherwise
E_x(j, x) :=
    (-q_0*N_0[j]/(ε*ε_0)*(l[j] - x)) if 0 < x ≤ l[j]
    0 otherwise
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# Зонная диаграмма
W(j, x) :=
    ΔE_s*(1 - x/l[j])^2 if 0 < x ≤ l[j]
    0 otherwise
φ(j, x) :=
    -W(j, x)/q_0 if 0 < x ≤ l[j]
    0 otherwise
E_v(j, x) := S*W(j, x)
E_c(j, x) := E_g + S*W(j, x)
E_пр1(j, x) := E_пр + S*W(j, x)
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# 2 Способ
E_Fs[j] := E_f0[j] - S*ΔE_s
k := 0 .. 19
u[k] := k/20
E_F[j, k] := E_Fs[j] + S*u[k]*ΔE_s
E_F = [
    0.190927, 0.205927, 0.220927, 0.235927, 0.250927, 0.265927, 0.280927, 0.295927, 0.310927, 0.325927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;
    0.243468, 0.258468, 0.273468, 0.288468, 0.303468, 0.318468, 0.333468, 0.348468, 0.363468, 0.378468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;
    0.284622, 0.299622, 0.314622, 0.329622, 0.344622, 0.359622, 0.374622, 0.389622, 0.404622, 0.419622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] eV
q_v2(Ef, j) := q_0*(-n(Ef, T3) + p(Ef, T3) + S*N_пр(N_0[j], Ef, T3))
E_fmax[j] := max(E_Fs[j], E_f0[j])
E_fmax = [0.490927; 0.543468; 0.584622] eV
E_f0 = [0.490927; 0.543468; 0.584622] eV
E_fmin[j] := min(E_Fs[j], E_f0[j])
E_fmin = [0.190927; 0.243468; 0.284622] eV
C1[j] := 2*q_0/(ε*ε_0)*integral(q_v2(E1, j), E1 = E_Fs[j] .. E_f0[j])
D(j, Ef) := sqrt(C1[j] - 2*q_0/(ε*ε_0)*integral(q_v2(E1, j), E1 = E_Fs[j] .. Ef))
x2(j, Ef) := S*integral(1/D(j, E2), E2 = E_Fs[j] .. Ef)
x2[j, k] := x2(j, E_F[j, k])
x2 = [
    0, 6.07238, 12.3535, 18.8492, 25.5725, 32.5426, 39.7847, 47.3305, 55.2203, 63.5045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;
    0, 1.94688, 3.95131, 6.01863, 8.15513, 10.3682, 12.6668, 15.0614, 17.5654, 20.1951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;
    0, 0.626118, 1.27136, 1.93758, 2.62699, 3.34217, 4.08625, 4.86304, 5.67725, 6.53483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] nm
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n_2[j, k] := n(E_F[j, k], T3)
p_2[j, k] := p(E_F[j, k], T3)
N_пр2[j, k] := N_пр(N_0[j], E_F[j, k], T3)
q_v2m[j, k] := q_v2(E_F[j, k], j)
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# Зонная диаграмма
W2[j, k] := S*(E_f0[j] - E_F[j, k])
W2 = [
    0.3, 0.285, 0.27, 0.255, 0.24, 0.225, 0.21, 0.195, 0.18, 0.165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;
    0.3, 0.285, 0.27, 0.255, 0.24, 0.225, 0.21, 0.195, 0.18, 0.165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;
    0.3, 0.285, 0.27, 0.255, 0.24, 0.225, 0.21, 0.195, 0.18, 0.165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] eV
E_v2[j, k] := S*W2[j, k]
E_c2[j, k] := E_g + S*W2[j, k]
E_пр2[j, k] := E_пр + S*W2[j, k]
E_Fline[j, k] := E_f0[j]
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