T1 := 873
T2 := 1073
t1 := 600
t2 := 3600
D0 := 0.45
Eg := 2.41
C01 := 3*10^19
k := 8.617*10^-5
# 1)
D1 := D0*e^(-Eg/(k*T1)) = 5.49395e-15
D2 := D0*e^(-Eg/(k*T2)) = 2.15395e-12
# 2)
N := 2*C01*sqrt(D1*t1/π) = 6.14602e13
# 3)
xj := 6*sqrt(D2*t2) = 0.000528348
# 4)
C1(x) := C01*exp(-(x/(2*sqrt(D1*t1)) + 0.3)^2)
C2(x) := N/sqrt(π*D2*t2)*exp(-(x^2/(4*D2*t2)))
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