T1 := 1273
T2 := 1473
t1 := 600
t2 := 4800
D0 := 10.5
Eg := 3.66
C01 := 1*10^21
k := 8.617*10^-5
# 1)
D1 := D0*e^(-Eg/(k*T1)) = 3.39447e-14
D2 := D0*e^(-Eg/(k*T2)) = 3.1495e-12
# 2)
N := 2*C01*sqrt(D1*t1/π) = 5.09233e15
# 3)
xj := 6*sqrt(D2*t2) = 0.000737722
xj/(2*sqrt(D1*t1)) = 81.7337
# 4)
C1(x) := C01*exp(-(x/(2*sqrt(D1*t1)) + 0.3)^2)
C2(x) := N/sqrt(π*D2*t2)*exp(-(x^2/(4*D2*t2)))
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