E1 := 3.0*10^4
C := 0.45
E2 := 7.0*10^4
d := 0.3
E3 := 1.7*10^5
Nα := 10^16
z1 := 33
z2 := 14
M1 := 74.92
M2 := 28.09
d1 := 2.33
Na := 6.023*10^23
# 1)
N2 := Na*d1/M2 = 4.99594e22
# 2)
a := 4.7*10^-9/(z1^(2/3) + z2^(2/3))^(1/2) = 1.17145e-9
# 3)
γ := 4*M1*M2/(M1 + M2)^2 = 0.793324
# 4)
K := 2.47*10^11*z1^(2/3)*sqrt(z2/M2)*(a*(1 + M1/M2))^(3/2) = 0.505133
# 5)
F := 6.9*10^6*a*M2/(z1*z2*(M1 + M2)) = 4.77094e-6
L := π*a^2*γ*N2 = 170870
# 6)
ε1 := E1*F = 0.143128
ε2 := E2*F = 0.333966
ε3 := E3*F = 0.81106
# 7)
β := 6.16*10^3*z2*M1*F = 30.8255
# 8)
ρ1 := 2/K*sqrt(ε1)*(1 + K*ε1/(3*β)) - 2*C/K/(K*sqrt(C/K + d))*atan(sqrt(ε1/(C/K + d))) = 0.420435
R1 := ρ1/L = 2.46055e-6
ρ2 := 2/K*sqrt(ε2)*(1 + K*ε2/(3*β)) - 2*C/K/(K*sqrt(C/K + d))*atan(sqrt(ε2/(C/K + d))) = 0.718113
R2 := ρ2/L = 4.20268e-6
ρ3 := 2/K*sqrt(ε3)*(1 + K*ε3/(3*β)) - 2*C/K/(K*sqrt(C/K + d))*atan(sqrt(ε3/(C/K + d))) = 1.35143
R3 := ρ3/L = 7.90911e-6
# 9)
εn1 := C/K*ln(1 + ε1/(C/K + d)) = 0.10111
εn2 := C/K*ln(1 + ε2/(C/K + d)) = 0.220224
εn3 := C/K*ln(1 + ε3/(C/K + d)) = 0.462739
# 10)
f1 := (1 + M2/(3*M1)*sqrt(εn1/ε1))^-1 = 0.904942
f2 := (1 + M2/(3*M1)*sqrt(εn2/ε2))^-1 = 0.907863
f3 := (1 + M2/(3*M1)*sqrt(εn3/ε3))^-1 = 0.913742
# 11)
Rp1 := f1*R1*10^4 = 0.0222666
Rp2 := f2*R2*10^4 = 0.0381545
Rp3 := f3*R3*10^4 = 0.0722689
# 12)
Sn1 := C*sqrt(ε1)/(d + ε1) = 0.38419
Sn2 := C*sqrt(ε2)/(d + ε2) = 0.410202
Sn3 := C*sqrt(ε3)/(d + ε3) = 0.364755
# 13)
ΔRp1 := Rp1*sqrt(ρ1/(9*ε1)*(γ + M2/M1)*Sn1) = 0.00852239
ΔRp2 := Rp2*sqrt(ρ2/(9*ε2)*(γ + M2/M1)*Sn2) = 0.0129104
ΔRp3 := Rp3*sqrt(ρ3/(9*ε3)*(γ + M2/M1)*Sn3) = 0.0202988
C1(x) := Nα/sqrt(2*π)*exp(-1/2*((x - Rp1)/ΔRp1)^2)
C2(x) := Nα/sqrt(2*π)*exp(-1/2*((x - Rp2)/ΔRp2)^2)
C3(x) := Nα/sqrt(2*π)*exp(-1/2*((x - Rp3)/ΔRp3)^2)
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