E1 := 3.0*10^4
C := 0.45
E2 := 7.0*10^4
d := 0.3
E3 := 1.7*10^5
Nα := 10^16
z1 := 78
z2 := 14
M1 := 195.084
M2 := 28.09
d1 := 2.33
Na := 6.023*10^23
# 1)
N2 := Na*d1/M2 = 4.99594e22
# 2)
a := 4.7*10^-9/(z1^(2/3) + z2^(2/3))^(1/2) = 9.58099e-10
# 3)
γ := 4*M1*M2/(M1 + M2)^2 = 0.440095
# 4)
K := 2.47*10^11*z1^(2/3)*sqrt(z2/M2)*(a*(1 + M1/M2))^(3/2) = 2.11415
# 5)
F := 6.9*10^6*a*M2/(z1*z2*(M1 + M2)) = 7.61982e-7
L := π*a^2*γ*N2 = 63406.5
# 6)
ε1 := E1*F = 0.0228595
ε2 := E2*F = 0.0533388
ε3 := E3*F = 0.129537
# 7)
β := 6.16*10^3*z2*M1*F = 12.8196
# 8)
ρ1 := 2/K*sqrt(ε1)*(1 + K*ε1/(3*β)) - 2*C/K/(K*sqrt(C/K + d))*atan(sqrt(ε1/(C/K + d))) = 0.0847065
R1 := ρ1/L = 1.33593e-6
ρ2 := 2/K*sqrt(ε2)*(1 + K*ε2/(3*β)) - 2*C/K/(K*sqrt(C/K + d))*atan(sqrt(ε2/(C/K + d))) = 0.131406
R2 := ρ2/L = 2.07244e-6
ρ3 := 2/K*sqrt(ε3)*(1 + K*ε3/(3*β)) - 2*C/K/(K*sqrt(C/K + d))*atan(sqrt(ε3/(C/K + d))) = 0.21196
R3 := ρ3/L = 3.34288e-6
# 9)
εn1 := C/K*ln(1 + ε1/(C/K + d)) = 0.00928214
εn2 := C/K*ln(1 + ε2/(C/K + d)) = 0.0210604
εn3 := C/K*ln(1 + ε3/(C/K + d)) = 0.0479357
# 10)
f1 := (1 + M2/(3*M1)*sqrt(εn1/ε1))^-1 = 0.970323
f2 := (1 + M2/(3*M1)*sqrt(εn2/ε2))^-1 = 0.970724
f3 := (1 + M2/(3*M1)*sqrt(εn3/ε3))^-1 = 0.971631
# 11)
Rp1 := f1*R1*10^4 = 0.0129628
Rp2 := f2*R2*10^4 = 0.0201176
Rp3 := f3*R3*10^4 = 0.0324804
# 12)
Sn1 := C*sqrt(ε1)/(d + ε1) = 0.210733
Sn2 := C*sqrt(ε2)/(d + ε2) = 0.294132
Sn3 := C*sqrt(ε3)/(d + ε3) = 0.377059
# 13)
ΔRp1 := Rp1*sqrt(ρ1/(9*ε1)*(γ + M2/M1)*Sn1) = 0.00291815
ΔRp2 := Rp2*sqrt(ρ2/(9*ε2)*(γ + M2/M1)*Sn2) = 0.00436265
ΔRp3 := Rp3*sqrt(ρ3/(9*ε3)*(γ + M2/M1)*Sn3) = 0.00649939
C1(x) := Nα/(sqrt(2*π)*ΔRp1)*exp(-1/2*((x - Rp1)/ΔRp1)^2)
C2(x) := Nα/(sqrt(2*π)*ΔRp2)*exp(-1/2*((x - Rp2)/ΔRp2)^2)
C3(x) := Nα/sqrt(2*π*ΔRp3)*exp(-1/2*((x - Rp3)/ΔRp3)^2)
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