xj := 1.5*10^-4
Eg := 1.4
D0 := 0.1
C02 := 5*10^16
CB := 4.5*10^14
# t2 = 1 час
t2 := 3600
k := 8.617*10^-5
D2 := xj^2/(4*t2*ln(C02/CB)) = 3.31704e-13
T := Eg/(k*ln(D0/D2)) = 614.671
N := C02*sqrt(π*D2*t2) = 3.06247e12
