F1 := 30
F2 := 40
F3 := 20
M1 := 10
M2 := 40
M3 := 80
q1 := 20
q2 := 30
q3 := 15
l1 := 2
l2 := 2.5
l3 := 0.5
x := 0, 0.1 .. l1 + l2 + l3
L1 := l1
m1 := 0
f1 := F1
q_1 := 0
m2 := M1
f2 := 0
q_2 := 0 - q1
L2 := l2
m3 := 0
f3 := 0
q_3 := 0
L3 := 0
m4 := 0
f4 := 0
Ya := -(f1 + f2 + f3 + f4 + q_1*l1 + q_2*l2 + q_3*l3)
Ya = 20
# Если стенка слева
MaLeft := -(m1 + m2 + m3 + m4 + f1*0 + f2*L1 + f3*(L1 + L2) + f4*(L1 + L2 + L3) + q_1*L1*L1/2 + q_2*L2*(L1 + L2/2) + q_3*L3*(L1 + L2 + L3/2))
MaLeft = 152.5
# Если стенка спарва
MaRigt := -(m1 + m2 + m3 + m4 - f1*(L1 + L2 + L3) - f2*(L2 + L3) - f3*L3 - f4*0 - q_1*L1*(L1/2 + L2 + L3) - q_2*L2*(L2/2 + L3) - q_3*L3*L3/2)
MaRigt = 62.5
# Если стенка слева
QLeft(x) :=
    (Ya + f1 + q_1*x) if 0 ≤ x ≤ L1
    (Ya + f1 + f2 + q_1*x + q_2*(x - L1)) if L1 ≤ x ≤ (L1 + L2)
    (Ya + f1 + f2 + f3 + q_1*x + q_2*(x - L1) + q_3*(x - L1 - L2)) if (L1 + L2) ≤ x ≤ (L1 + L2 + L3)
QRigt(x) :=
    (f1 + q_1*x) if 0 < x ≤ L1
    (f1 + f2 + q_1*x + q_2*(x - L1)) if L1 < x ≤ (L1 + L2)
    f1 + f2 + f3 + f4 + Ya + q_1*x + q_2*(x - L1) + q_3*(x - L1 - L2) if L1 + L2 < x ≤ (L1 + L2 + L3)
    0 if L1 + L2 + L3 < x
