# 3 задача
x1 := 1
x2 := 1
x3 := 2
x4 := 0
σд := 160*10^6
τд := 100*10^6
Mm := -160*10^3
Qm := 80*10^3
E := 2*10^11
# а)
Wz_тр := |Mm|/σд = 0.001
b := nthroot(3*Wz_тр/2, 3) = 0.114471
b := 0.12  # Τ
h := 2*b = 0.24
Aп := b*h = 0.0288
Wz := b*h^2/6 = 0.001152
# двутавр 45
h_ст := 0.45
b_ст := 0.16
s_ст := 8.6*10^-3
t_ст := 14.2*10^-3
Aд := 8.3*10^-3
Iz_д := 2.745*10^-4
Wz_д := 1.22*10^-3
Sz_д := 6.99*10^-4
# Сравнение по массе балок прямоугольного и
# двутаврового поперечных сечений
Э := Aп/Aд = 3.46988
# поскольку коэффициент экономичности больше единицы,
# следовательно, балка двутаврового поперечного сечения в 3,06 раза экономичнее,
# чем балка прямоугольного сечения.
Iz := b*h^3/12 = 0.00013824
# Определение нормальных напряжений по высоте опасного
# сечения балки прямоугольного и двутаврового сечений
# прямоугольник
σ_max := |Mm|/(Wz*10^6) = 138.889
двутавр
σ_д.max := |Mm|/(Wz_д*10^6) = 131.148
# Определение касательных напряжений по высоте
# опасного сечения балки прямоугольного и
# двутаврового сеченийСравнение по массе балок прямоугольного и двутаврового сечений
# а) балка прямоугольного сечения
y := -h/2
τ := 6*Qm/(b*h^3)*(h^2/4 - y^2) = 0
y := -h/4
6*Qm/(b*h^3)*(h^2/4 - y^2) = 3125000
y := 0
6*Qm/(b*h^3)*(h^2/4 - y^2) = 4166667
y := h/4
6*Qm/(b*h^3)*(h^2/4 - y^2) = 3125000
y := h/2
τ := 6*Qm/(b*h^3)*(h^2/4 - y^2) = 0
# б) балка двутаврового сечения
S_1 := 0
S_7 := 0
S_2 := b_ст*t_ст*(h_ст - t_ст)/2 = 0.000495069
S_3 := S_2
S_5 := S_2
S_6 := S_2
S_4 := Sz_д = 0.000699
τ_1 := Qm*S_1/(b_ст*Iz_д) = 0
τ_7 := Qm*S_7/(b_ст*Iz_д) = 0
τ_2 := Qm*S_2/(b_ст*Iz_д) = 901765
τ_6 := Qm*S_6/(b_ст*Iz_д) = 901765
τ_3 := Qm*S_3/(s_ст*Iz_д) = 16777017
τ_5 := Qm*S_5/(s_ст*Iz_д) = 16777017
τ_4 := Qm*S_4/(s_ст*Iz_д) = 23687889
# Проверка на прочность по касательным напряжениям балок
# прямоугольного и двутаврового сечений
|τ_max| ≤ τд
# Прямоугольник | 4.1667*10^6 | 100*10^6
# Двутавр
τ_4 = 23687889
100*10^6
# Построение эпюр углов поворота у' и
# прогибов y для двутавровой балки
# Ввод значений начального модуля продольного упругости E, осевого момента Iz
E := 2*10^11  # Н/м^2
I_z := 2.745*10^-4  # м^4
x := 0, 0.5 .. 4
# Ввод координат границ участков и силоввых факторов, входящих в уравнение учатков
# Силовые факторы на левой границе 1 участка
M_i := -70*10^3
F_i := -35*10^3
q_i := 0
# Силовые факторы на левой границе 2 участка
M_j := 0
F_j := 0*10^3
q_j := -40*10^3
# компенсирующая нагрузка на 2 участке
q_I := 0
# левая граница 2 участка
a_j := 1
# Силовые факторы на левой границей 3 участка
M_k := 0
F_k := 155*10^3
q_k := 0
# компенсирующая нагрузка на 3 участке
q_J := 40*10^3
# левая граница 3 участка
a_k := a_j + 1
# Силовые факторы на левой границей 4 участка
M_m := 0
F_m := 0*10^3
q_m := 0
# левая граница 4 участка
a_m := a_k + 0
# компенсирующая нагрузка на 4 участке
q_N := 0
a_1(x) := 1/2*M_i*x^2 + 1/6*F_i*x^3 + 1/24*q_i*x^4
a_2(x) := 1/2*M_j*(x - a_j)^2 + 1/6*F_j*(x - a_j)^3 + 1/24*q_j*(x - a_j)^4 + 1/24*q_I*(x - a_j)^4
a_3(x) := 1/2*M_k*(x - a_k)^2 + 1/6*F_k*(x - a_k)^3 + 1/24*q_k*(x - a_k)^4 + 1/24*q_J*(x - a_k)^4
a_4(x) := 1/2*M_m*(x - a_m)^2 + 1/6*F_m*(x - a_m)^3 + 1/24*q_m*(x - a_m)^4 + 1/24*q_N*(x - a_m)^4
z1 := 0
z2 := 2
θ_0 := 0
y_0 := 0
Given
(E*I_z*y_0 + E*I_z*θ_0*z1 + a_1(z1))/(E*I_z) == 0
(E*I_z*y_0 + E*I_z*θ_0*z2 + a_1(z2) + a_2(z2) + a_3(z2) + a_4(z2))/(E*I_z) == 0
k := Find(y_0, θ_0)
y_0 := k[0] = 0
θ_0 := k[1] = 0.00171524
# Начальные параметры
y(x) :=
    (E*I_z*y_0 + E*I_z*θ_0*x + a_1(x))/(E*I_z) if x ≤ a_j
    (E*I_z*y_0 + E*I_z*θ_0*x + a_1(x) + a_2(x))/(E*I_z) if a_j < x ≤ a_k
    (E*I_z*y_0 + E*I_z*θ_0*x + a_1(x) + a_2(x) + a_3(x))/(E*I_z) if a_k < x ≤ a_m
    (E*I_z*y_0 + E*I_z*θ_0*x + a_1(x) + a_2(x) + a_3(x) + a_4(x))/(E*I_z) if x > a_m
θ(x) := d/dx(y(x))
y(x) = [0; 0.000684957; 0.000971463; 0.00077793; 0; -0.00144961; -0.00344566; -0.00580601; -0.00834851]
x = [0; 0.5; 1; 1.5; 2; 2.5; 3; 3.5; 4]
θ(x) = [0.00171524; 0.000998027; 0.000121433; -0.000929721; -0.00223133; -0.00350638; -0.00441712; -0.00496357; -0.00514572]
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