# 3 задача
x1 := 0.6
x2 := 3
x3 := 2
x4 := 0.6
σд := 160*10^6
τд := 100*10^6
Mm := 113*10^3
Qm := 93.04*10^3
E := 2*10^11
# а)
Wz_тр := |Mm|/σд = 0.00070625
b := nthroot(3*Wz_тр/2, 3) = 0.101941
b := 0.11  # Τ
h := 2*b = 0.22
Aп := b*h*10^4 = 242
Wz := b*h^2/6 = 0.000887333
# двутавр 36
h_ст := 0.36
b_ст := 0.145
s_ст := 0.0075
t_ст := 0.0123
Aд := 61.9
Iz_д := 1.338*10^-4
Wz_д := 7.43*10^-4
Sz_д := 4.23*10^-4
# Сравнение по массе балок прямоугольного и
# двутаврового поперечных сечений
Э := Aп/Aд = 3.90953
# поскольку коэффициент экономичности больше единицы,
# следовательно, балка двутаврового поперечного сечения в 3,06 раза экономичнее,
# чем балка прямоугольного сечения.
Iz := b*h^3/12 = 9.76067e-5
# Определение нормальных напряжений по высоте опасного
# сечения балки прямоугольного и двутаврового сечений
# прямоугольник
σ_max := |Mm|/(Wz*10^6) = 127.348
двутавр
σ_д.max := |Mm|/(Wz_д*10^6) = 152.086
# Определение касательных напряжений по высоте
# опасного сечения балки прямоугольного и
# двутаврового сеченийСравнение по массе балок прямоугольного и двутаврового сечений
# а) балка прямоугольного сечения
y := -h/2
τ := 6*Qm/(b*h^3)*(h^2/4 - y^2) = 0
y := -h/4
6*Qm/(b*h^3)*(h^2/4 - y^2) = 4325207
y := 0
6*Qm/(b*h^3)*(h^2/4 - y^2) = 5766942
y := h/4
6*Qm/(b*h^3)*(h^2/4 - y^2) = 4325207
y := h/2
τ := 6*Qm/(b*h^3)*(h^2/4 - y^2) = 0
# б) балка двутаврового сечения
S_1 := 0
S_7 := 0
S_2 := b_ст*t_ст*(h_ст - t_ст)/2 = 0.000310061
S_3 := S_2
S_5 := S_2
S_6 := S_2
S_4 := Sz_д = 0.000423
τ_1 := Qm*S_1/(b_ст*Iz_д) = 0
τ_7 := Qm*S_7/(b_ст*Iz_д) = 0
τ_2 := Qm*S_2/(b_ст*Iz_д) = 1486940
τ_6 := Qm*S_6/(b_ст*Iz_д) = 1486940
τ_3 := Qm*S_3/(s_ст*Iz_д) = 28747503
τ_5 := Qm*S_5/(s_ст*Iz_д) = 28747503
τ_4 := Qm*S_4/(s_ст*Iz_д) = 39218655
# Проверка на прочность по касательным напряжениям балок
# прямоугольного и двутаврового сечений
|τ_max| ≤ τд
# Прямоугольник | 5.7669*10^6 | 100*10^6
# Двутавр
τ_4 = 39218655
100*10^6
# Построение эпюр углов поворота у' и
# прогибов y для двутавровой балки
# Ввод значений начального модуля продольного упругости E, осевого момента Iz
E := 2*10^11  # Н/м^2
I_z := 13380*10^-8  # м^4
x := 0, 0.2 .. 6.2
# Ввод координат границ участков и силоввых факторов, входящих в уравнение учатков
# Силовые факторы на левой границе 1 участка
M_i := 0
F_i := 20*10^3
q_i := -40*10^3
# Силовые факторы на левой границе 2 участка
M_j := 0
F_j := 97.04*10^3
q_j := 0
# компенсирующая нагрузка на 2 участке
q_I := 0
# левая граница 2 участка
a_j := 0.6
# Силовые факторы на левой границей 3 участка
M_k := 0
F_k := -40*10^3
q_k := 0
# компенсирующая нагрузка на 3 участке
q_J := 40*10^3
# левая граница 3 участка
a_k := a_j + 3
# Силовые факторы на левой границей 4 участка
M_m := 0
F_m := 66.96*10^3
q_m := 0
# левая граница 4 участка
a_m := a_k + 2
# компенсирующая нагрузка на 4 участке
q_N := 0
a_1(x) := 1/2*M_i*x^2 + 1/6*F_i*x^3 + 1/24*q_i*x^4
a_2(x) := 1/2*M_j*(x - a_j)^2 + 1/6*F_j*(x - a_j)^3 + 1/24*q_j*(x - a_j)^4 + 1/24*q_I*(x - a_j)^4
a_3(x) := 1/2*M_k*(x - a_k)^2 + 1/6*F_k*(x - a_k)^3 + 1/24*q_k*(x - a_k)^4 + 1/24*q_J*(x - a_k)^4
a_4(x) := 1/2*M_m*(x - a_m)^2 + 1/6*F_m*(x - a_m)^3 + 1/24*q_m*(x - a_m)^4 + 1/24*q_N*(x - a_m)^4
z1 := 0.6
z2 := 5.6
θ_0 := 0
y_0 := 0
Given
(E*I_z*y_0 + E*I_z*θ_0*z1 + a_1(z1))/(E*I_z) == 0
(E*I_z*y_0 + E*I_z*θ_0*z2 + a_1(z2) + a_2(z2) + a_3(z2) + a_4(z2))/(E*I_z) == 0
Find(y_0, θ_0) = [0.0042; -0.00703139]
y_0 := 4.2*10^-3
θ_0 := -7.03139*10^-3
# Начальные параметры
y(x) :=
    (E*I_z*y_0 + E*I_z*θ_0*x + a_1(x))/(E*I_z) if x ≤ a_j
    (E*I_z*y_0 + E*I_z*θ_0*x + a_1(x) + a_2(x))/(E*I_z) if a_j < x ≤ a_k
    (E*I_z*y_0 + E*I_z*θ_0*x + a_1(x) + a_2(x) + a_3(x))/(E*I_z) if a_k < x ≤ a_m
    (E*I_z*y_0 + E*I_z*θ_0*x + a_1(x) + a_2(x) + a_3(x) + a_4(x))/(E*I_z) if x > a_m
θ(x) := d/dx(y(x))
y(x) = [
    0.0042; 0.00279462; 0.00139382; 8.07175e-11; -0.00138201; -0.00273043; -0.00402102; -0.00523196; -0.0063438; -0.00733948
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]
x = [
    0; 0.2; 0.4; 0.6; 0.8; 1; 1.2; 1.4; 1.6; 1.8
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]
θ(x) = [
    -0.00703139; -0.00701844; -0.00698754; -0.00695067; -0.00684725; -0.00661672; -0.00627103; -0.00582214; -0.00528201; -0.0046626
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]
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