# РГР 2
# 3 задача
x1 := 1
x2 := 2
x3 := 1
x4 := 0
σд := 160*10^6
# 2 задача
x1 := 1
x2 := 2
x3 := 1
x4 := 0
τ := 85*10^6
α := 0.8
x1 := 1
x2 := 2
x3 := 1
x4 := 0
σ := 170*10^6
τд := 100*10^6
# 1 задача
T1 := 40*10^3
T2 := 10*10^3
T3 := -10*10^3
T4 := 0*10^3
Tm := T1
E := 2*10^11
G := 8*10^10
Q1 := 22.5*10^3
Q2 := -17.5*10^3
Q3 := 32.5*10^3
Q4 := 12.5*10^3
Qm := Q3
N1 := 0*10^3
N2 := 40*10^3
N3 := -10*10^3
N4 := 0*10^3
Nm := N2
E := 2*10^11
M1 := -10*10^3
M2 := 12.5*10^3
M3 := -22.5*10^3
M4 := 0*10^3
Mm := M3
# а)
W := |Tm|/τ = 0.000470588
Фд := 1.2*10^-2
yд := □  # error: Эта метка - заполнитель пуста.
# а)
A := |Nm|/σ = 0.000235294
# а)
Wz_тр := |Mm|/σд = 0.000140625
a_тр := sqrt(A) = 0.0153393
a := 0.016
d := nthroot(W*16/π, 3) = 0.133825
d := 0.135
b := nthroot(3*Wz_тр/2, 3) = 0.0595275
b := 0.064
A := a^2 = 0.000256
Wp_с := π*d^3/16 = 0.000483094
0.2*0.135^3 = 0.000492075
h := 2*b = 0.128
Aп := b*h*10^4 = 81.92
# б)
σ := |Nm|/(A*10^6) = 156.25
170
# б)
d_н := nthroot(W*16/(π*(1 - α^4)), 3) = 0.159522
Wz := b*h^2/6 = 0.000174763
# в)
# Δl(x,i)=Δl(x,i-1)+(N(x,i)*xi)/(E*A)
d_н := 0.160
# двутавр 20
# 1 участок
h_ст := 0.2
b_ст := 0.1
s_ст := 0.0052
t_ст := 0.0084
d_в := α*d_н = 0.128
Δl_1.0 := N1*0/(E*A) = 0
Aд := 26.8
Iz_д := 1.84*10^-5
Wz_д := 1.84*10^-4
Sz_д := 1.04*10^-4
Wp_к := π*d_н^3/16*(1 - α^4) = 0.000474828
Δl_1.x1 := N1*x1/(E*A) = 0
# Сравнение по массе балок прямоугольного и
# двутаврового поперечных сечений
# 2 участок
# в)
Э := d^2/(d_н^2 - d_в^2) = 1.97754
Э := Aп/Aд = 3.05672
Δl_2.0 := Δl_1.x1 + N2*0/(E*A) = 0
# Вывод: поскольку коэффициент экономичности больше единицы, следовательно стержень кольцевого поперечного сечения в 1.98 раз экономичнее, чем стержень сплошного сечения
# поскольку коэффициент экономичности больше единицы,
# следовательно, балка двутаврового поперечного сечения в 3,06 раза экономичнее,
# чем балка прямоугольного сечения.
Δl_2.x2 := Δl_1.x1 + N2*x2/(E*A) = 0.0015625
# г)
Ip_с := π*d^4/32 = 3.26088e-5
# 3 участок
Iz := b*h^3/12 = 1.11848e-5
Δl_3.0 := Δl_2.x2 + N3*0/(E*A) = 0.0015625
Ip_к := π*d_н^4/32*(1 - α^4) = 3.79862e-5
# Определение нормальных напряжений по высоте опасного
# сечения балки прямоугольного и двутаврового сечений
Δl_3.x3 := Δl_2.x2 + N3*x3/(E*A) = 0.00136719
τmax_с := Tm/Wp_с = 82799706  # прямоугольник
# 4 участок(если есть)
σ_max := |Mm|/(Wz*10^6) = 128.746
τmax_к := Tm/Wp_к = 84241056
Δl_4.0 := Δl_3.x3 + N4*0/(E*A) = 0.00136719
двутавр
Δl_4.x4 := Δl_3.x3 + N4*x4/(E*A) = 0.00136719  # д)  # ϕ(x,i)=ϕ(x,i-1)+(T(x,i)*xi)/(G*Ip)
σ_д.max := |Mm|/(Wz_д*10^6) = 122.283
Δl := x1 + x2 + x3 + x4 = 4  # 1 участок
# Определение касательных напряжений по высоте
# опасного сечения балки прямоугольного и
# двутаврового сеченийСравнение по массе балок прямоугольного и двутаврового сечений
ϕ_1.0 := T1*0/(G*Ip_с) = 0
Δl_max := Δl_2.x2*10^4 = 15.625
ϕ_1.x1 := T1*x1/(G*Ip_с) = 0.0153333
# а) балка прямоугольного сечения
A_тр := A*|Δl_max|/Δl = 0.001
a_тр := sqrt(A_тр) = 0.0316228
# 2 участок
y := -h/2
τ := 6*Qm/(b*h^3)*(h^2/4 - y^2) = 0
# Ответ: а = 0.032м или 32мм
ϕ_2.0 := ϕ_1.x1 + T2*0/(G*Ip_с) = 0.0153333
ϕ_2.x2 := ϕ_1.x1 + T2*x2/(G*Ip_с) = 0.0229999
y := -h/4
τ := 6*Qm/(b*h^3)*(h^2/4 - y^2) = 4463196
# 3 участок
ϕ_3.0 := ϕ_2.x2 + T3*0/(G*Ip_с) = 0.0229999
y := 0
τ := 6*Qm/(b*h^3)*(h^2/4 - y^2) = 5950928
ϕ_3.x3 := ϕ_2.x2 + T3*x3/(G*Ip_с) = 0.0191666
# 4 участок(если есть)
y := h/4
τ := 6*Qm/(b*h^3)*(h^2/4 - y^2) = 4463196
ϕ_4.0 := ϕ_3.x3 + T3*0/(G*Ip_с) = 0.0191666
y := h/2
τ := 6*Qm/(b*h^3)*(h^2/4 - y^2) = 0
ϕ_4.x4 := ϕ_3.x3 + T3*x4/(G*Ip_с) = 0.0191666  # б) балка двутаврового сечения
S_1 := 0
S_7 := 0
Ф := |Tm|/(G*Ip_с) = 0.0153333
S_2 := b_ст*t_ст*(h_ст - t_ст)/2 = 8.0472e-5
# Если Ф больше Фд(1.2*10^2)
S_3 := S_2
S_5 := S_2
S_6 := S_2
Ip_тр := Ip_с*Ф/Фд = 4.16667e-5
S_4 := Sz_д = 0.000104
d_тр := nthroot(Ip_тр/0.1, 4) = 0.142872
τ_1 := Qm*S_1/(b_ст*Iz_д) = 0
τ_7 := Qm*S_7/(b_ст*Iz_д) = 0
# Ответ: dтр = 0.145м или 145мм
τ_2 := Qm*S_2/(b_ст*Iz_д) = 1421380
τ_6 := Qm*S_6/(b_ст*Iz_д) = 1421380
τ_3 := Qm*S_3/(s_ст*Iz_д) = 27334239
τ_5 := Qm*S_5/(s_ст*Iz_д) = 27334239
τ_4 := Qm*S_4/(s_ст*Iz_д) = 35326087
# Проверка на прочность по касательным напряжениям балок
# прямоугольного и двутаврового сечений
|τ_max| ≤ τд
# Прямоугольник | 1.190186*10^7 | 100*10^6
# Двутавр | 3.532609*10^7 | 100*10^6
# Построение эпюр углов поворота у' и
# прогибов y для двутавровой балки
# Ввод значений начального модуля продольного упругости E, осевого момента Iz
E := 2*10^8  # кН/м^2
I_z := 1840*10^-8  # м^4
x := 0, 0.5 .. 4
# Ввод координат границ участков и силоввых факторов, входящих в уравнение учатков
# Силовые факторы на левой границе 1 участка
M_i := -10
F_i := 22.5
q_i := 0
# Силовые факторы на левой границе 2 участка
M_j := 0
F_j := -40
q_j := 0
# компенсирующая нагрузка на 2 участке
q_I := 0
# левая граница 2 участка
a_j := 1
# Силовые факторы на левой границей 3 участка
M_k := 0
F_k := 50
q_k := -20
# компенсирующая нагрузка на 3 участке
q_J := 0
# левая граница 3 участка
a_k := a_j + 2
# Силовые факторы на левой границей 4 участка
M_m := 0
F_m := 0
q_m := 0
# левая граница 3 участка
a_m := a_k + 0
# компенсирующая нагрузка на 4 участке
q_N := 0
a_1(x) := 1/2*M_i*x^2 + 1/6*F_i*x^3 + 1/24*q_i*x^4
a_2(x) := 1/2*M_j*(x - a_j)^2 + 1/6*F_j*(x - a_j)^3 + 1/24*q_j*(x - a_j)^4 + 1/24*q_I*(x - a_j)^4
a_3(x) := 1/2*M_k*(x - a_k)^2 + 1/6*F_k*(x - a_k)^3 + 1/24*q_k*(x - a_k)^4 + 1/24*q_J*(x - a_k)^4
a_4(x) := 1/2*M_m*(x - a_m)^2 + 1/6*F_m*(x - a_m)^3 + 1/24*q_m*(x - a_m)^4 + 1/24*q_N*(x - a_m)^4
z := 4
θ_0 := -(a_1(z) + a_2(z) + a_3(z) + a_4(z))/(E*I_z*z)  # z
# Начальные параметры
y_0 := 0
θ_0 = 0.000849185
y(x) :=
    (E*I_z*y_0 + E*I_z*θ_0*x + a_1(x))/(E*I_z) if x ≤ a_j
    (E*I_z*y_0 + E*I_z*θ_0*x + a_1(x) + a_2(x))/(E*I_z) if a_j < x ≤ a_k
    (E*I_z*y_0 + E*I_z*θ_0*x + a_1(x) + a_2(x) + a_3(x))/(E*I_z) if a_k < x ≤ a_m
    (E*I_z*y_0 + E*I_z*θ_0*x + a_1(x) + a_2(x) + a_3(x) + a_4(x))/(E*I_z) if x > a_m
θ(x) := d/dx(y(x))
x = [0; 0.5; 1; 1.5; 2; 2.5; 3; 3.5; 4]
θ(x) = [0.000849185; 0.000254755; 0.00118886; 0.0022928; 0.00220788; 0.000934103; -0.00152853; -0.00359488; -0.0041327]
y(x) = [0; 0.000212296; 0.000509511; 0.00142946; 0.00260417; 0.0034392; 0.00334013; 0.00198143; 0]
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