# 3 задача
x1 := 0.6
x2 := 3
x3 := 2
x4 := 0.6
σд := 160*10^6
τд := 100*10^6
Mm := 57.84*10^3
Qm := 21.08*10^3
E := 2*10^11
# а)
Wz_тр := |Mm|/σд = 0.0003615
b := nthroot(3*Wz_тр/2, 3) = 0.0815455
b := 0.09  # Τ
h := 2*b = 0.18
Aп := b*h = 0.0162
Wz := b*h^2/6 = 0.000486
# двутавр 27
h_ст := 0.27
b_ст := 0.125
s_ст := 6*10^-3
t_ст := 9.8*10^-3
Aд := 4.2*10^-3
Iz_д := 5.01*10^-5
Wz_д := 3.71*10^-4
Sz_д := 1.78*10^-4
# Сравнение по массе балок прямоугольного и
# двутаврового поперечных сечений
Э := Aп/Aд = 3.85714
# поскольку коэффициент экономичности больше единицы,
# следовательно, балка двутаврового поперечного сечения в 3,06 раза экономичнее,
# чем балка прямоугольного сечения.
Iz := b*h^3/12 = 4.374e-5
# Определение нормальных напряжений по высоте опасного
# сечения балки прямоугольного и двутаврового сечений
# прямоугольник
σ_max := |Mm|/(Wz*10^6) = 119.012
двутавр
σ_д.max := |Mm|/(Wz_д*10^6) = 155.903
# Определение касательных напряжений по высоте
# опасного сечения балки прямоугольного и
# двутаврового сеченийСравнение по массе балок прямоугольного и двутаврового сечений
# а) балка прямоугольного сечения
y := -h/2
τ := 6*Qm/(b*h^3)*(h^2/4 - y^2) = 0
y := -h/4
6*Qm/(b*h^3)*(h^2/4 - y^2) = 1463889
y := 0
6*Qm/(b*h^3)*(h^2/4 - y^2) = 1951852
y := h/4
6*Qm/(b*h^3)*(h^2/4 - y^2) = 1463889
y := h/2
τ := 6*Qm/(b*h^3)*(h^2/4 - y^2) = 0
# б) балка двутаврового сечения
S_1 := 0
S_7 := 0
S_2 := b_ст*t_ст*(h_ст - t_ст)/2 = 0.000159373
S_3 := S_2
S_5 := S_2
S_6 := S_2
S_4 := Sz_д = 0.000178
τ_1 := Qm*S_1/(b_ст*Iz_д) = 0
τ_7 := Qm*S_7/(b_ст*Iz_д) = 0
τ_2 := Qm*S_2/(b_ст*Iz_д) = 536459
τ_6 := Qm*S_6/(b_ст*Iz_д) = 536459
τ_3 := Qm*S_3/(s_ст*Iz_д) = 11176222
τ_5 := Qm*S_5/(s_ст*Iz_д) = 11176222
τ_4 := Qm*S_4/(s_ст*Iz_д) = 12482502
# Проверка на прочность по касательным напряжениям балок
# прямоугольного и двутаврового сечений
|τ_max| ≤ τд
# Прямоугольник | 6.2947*10^6 | 100*10^6
# Двутавр
τ_4 = 12482502
100*10^6
# Построение эпюр углов поворота у' и
# прогибов y для двутавровой балки
# Ввод значений начального модуля продольного упругости E, осевого момента Iz
E := 2*10^11  # Н/м^2
I_z := 5.01*10^-5  # м^4
x := 0, 0.2 .. 5.6
# Ввод координат границ участков и силоввых факторов, входящих в уравнение учатков
# Силовые факторы на левой границе 1 участка
M_i := 0*10^3
F_i := 0*10^3
q_i := -30*10^3
# Силовые факторы на левой границе 2 участка
M_j := 0
F_j := 39.08*10^3
q_j := 0*10^3
# компенсирующая нагрузка на 2 участке
q_I := 30*10^3
# левая граница 2 участка
a_j := 0.6
# Силовые факторы на левой границей 3 участка
M_k := 0
F_k := -40*10^3
q_k := 0
# компенсирующая нагрузка на 3 участке
q_J := 0
# левая граница 3 участка
a_k := a_j + 3
# Силовые факторы на левой границей 4 участка
M_m := 0
F_m := 0*10^3
q_m := 0
# левая граница 4 участка
a_m := a_k + 0
# компенсирующая нагрузка на 4 участке
q_N := 0
a_1(x) := 1/2*M_i*x^2 + 1/6*F_i*x^3 + 1/24*q_i*x^4
a_2(x) := 1/2*M_j*(x - a_j)^2 + 1/6*F_j*(x - a_j)^3 + 1/24*q_j*(x - a_j)^4 + 1/24*q_I*(x - a_j)^4
a_3(x) := 1/2*M_k*(x - a_k)^2 + 1/6*F_k*(x - a_k)^3 + 1/24*q_k*(x - a_k)^4 + 1/24*q_J*(x - a_k)^4
a_4(x) := 1/2*M_m*(x - a_m)^2 + 1/6*F_m*(x - a_m)^3 + 1/24*q_m*(x - a_m)^4 + 1/24*q_N*(x - a_m)^4
z1 := 0.6
z2 := 5.6
θ_0 := 0
y_0 := 0
Given
(E*I_z*y_0 + E*I_z*θ_0*z1 + a_1(z1))/(E*I_z) == 0
(E*I_z*y_0 + E*I_z*θ_0*z2 + a_1(z2) + a_2(z2) + a_3(z2) + a_4(z2))/(E*I_z) == 0
k := Find(y_0, θ_0) = [0.00376387; -0.00624617]
y_0 := k[0] = 0.00376387
θ_0 := k[1] = -0.00624617
# Начальные параметры
y(x) :=
    (E*I_z*y_0 + E*I_z*θ_0*x + a_1(x))/(E*I_z) if x ≤ a_j
    (E*I_z*y_0 + E*I_z*θ_0*x + a_1(x) + a_2(x))/(E*I_z) if a_j < x ≤ a_k
    (E*I_z*y_0 + E*I_z*θ_0*x + a_1(x) + a_2(x) + a_3(x))/(E*I_z) if a_k < x ≤ a_m
    (E*I_z*y_0 + E*I_z*θ_0*x + a_1(x) + a_2(x) + a_3(x) + a_4(x))/(E*I_z) if x > a_m
θ(x) := d/dx(y(x))
θ(x) = [-0.00624617; -0.00625017; -0.00627811; -0.00635396; -0.00641967; -0.00640122; -0.00629863; -0.00611188; -0.00584098; -0.00548593; -0.00504673; -0.00452338; -0.00391587; -0.00322422; -0.00244841; -0.00158845; -0.000644338; 0.000383925; 0.00149634; 0.00261307; 0.00365426; 0.00461993; 0.00551007; 0.00632468; 0.00706377; 0.00772732; 0.00831534; 0.00882784; 0.0092648]
y(x) = [0.00376387; 0.00251444; 0.00126221; 0; -0.00127877; -0.00256226; -0.00383364; -0.0050761; -0.00627279; -0.00740688; -0.00846155; -0.00941997; -0.0102653; -0.0109807; -0.0115494; -0.0119545; -0.0121791; -0.0122066; -0.01202; -0.0116078; -0.0109798; -0.0101511; -0.00913683; -0.0079521; -0.00661199; -0.00513162; -0.0035261; -0.00181052; 0]
x = [0; 0.2; 0.4; 0.6; 0.8; 1; 1.2; 1.4; 1.6; 1.8; 2; 2.2; 2.4; 2.6; 2.8; 3; 3.2; 3.4; 3.6; 3.8; 4; 4.2; 4.4; 4.6; 4.8; 5; 5.2; 5.4; 5.6]
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n := 10
θ(0.6 + 0.5*n) = 0.0092648
y(0.6 + 0.5*n) = -3.63072e-18
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