# РГР 2
x1 := 4
x2 := 3
x3 := 1
x4 := 3
# 3 задача
x1 := 3
x2 := 4
x3 := 1
x4 := 0
σд := 160*10^6
τ := 85*10^6
α := 0.8
x1 := 1
x2 := 4
x3 := 4
x4 := 3
σ := 170*10^6  # 2 задача
τд := 100*10^6
# 1 задача
T1 := -40*10^3
T2 := 0*10^3
T3 := 80*10^3
T4 := 30*10^3
Tm := T3
E := 2*10^11
G := 8*10^10
Q1 := 51.25*10^3
Q2 := -28.75*10^3
Q3 := 11.25*10^3
Q4 := -28.75*10^3
Qm := Q1
N1 := -170*10^3
N2 := -200*10^3
N3 := -160*10^3
N4 := -80*10^3
Nm := N2
E := 2*10^11
M1 := -30*10^3
M2 := 123.75*10^3
M3 := 8.75*10^3
M4 := 0*10^3
Mm := M2
# а)
W := |Tm|/τ = 0.000941176
Фд := 1.2*10^-2
# а)
A := |Nm|/σ = 0.00117647
# а)
Wz_тр := |Mm|/σд = 0.000773438
a_тр := sqrt(A) = 0.0342997
a := 0.035
d := nthroot(W*16/π, 3) = 0.168609
d := 0.170
b := nthroot(3*Wz_тр/2, 3) = 0.105076
b := 0.110
A := a^2 = 0.001225
Wp_с := π*d^3/16 = 0.000964665
h := 2*b = 0.22
Aп := b*h*10^4 = 242
# б)
σ := |Nm|/(A*10^6) = 163.265
170
# б)
d_н := nthroot(W*16/(π*(1 - α^4)), 3) = 0.200986
Wz := b*h^2/6 = 0.000887333
# в)
# Δl(x,i)=Δl(x,i-1)+(N(x,i)*xi)/(E*A)
d_н := 0.2
# двутавр 40
# 1 участок
h_ст := 0.4
b_ст := 0.155
s_ст := 0.008
t_ст := 0.013
d_в := α*d_н = 0.16
Δl_1.0 := N1*0/(E*A) = 0
Aд := 71.4
Iz_д := 18.93*10^-5
Wz_д := 9.47*10^-4
Sz_д := 5.4*10^-4
Wp_к := 0.2*d_н^3*(1 - α^4) = 0.00094464
Δl_1.x1 := N1*x1/(E*A) = -0.000693878
# Сравнение по массе балок прямоугольного и
# двутаврового поперечных сечений
# 2 участок
# в)
Э := d^2/(d_н^2 - d_в^2) = 2.00694
Э := Aп/Aд = 3.38936
Δl_2.0 := Δl_1.x1 + N2*0/(E*A) = -0.000693878
# Вывод: поскольку коэффициент экономичности больше единицы, следовательно стержень кольцевого поперечного сечения в 2 раз экономичнее, чем стержень сплошного сечения
# поскольку коэффициент экономичности больше единицы,
# следовательно, балка двутаврового поперечного сечения в 3,39 раза экономичнее,
# чем балка прямоугольного сечения.
Δl_2.x2 := Δl_1.x1 + N2*x2/(E*A) = -0.00395918
# г)
Ip_с := π*d^4/32 = 8.19966e-5
# 3 участок
Iz := b*h^3/12 = 9.76067e-5
Δl_3.0 := Δl_2.x2 + N3*0/(E*A) = -0.00395918
Ip_к := π*d_н^4/32*(1 - α^4) = 9.27398e-5
# Определение нормальных напряжений по высоте опасного
# сечения балки прямоугольного и двутаврового сечений
Δl_3.x3 := Δl_2.x2 + N3*x3/(E*A) = -0.00657143
τmax_с := Tm/Wp_с = 82930318  # прямоугольник
# 4 участок(если есть)
σ_max := |Mm|/(Wz*10^6) = 139.463
τmax_к := Tm/Wp_к = 84688347
Δl_4.0 := Δl_3.x3 + N4*0/(E*A) = -0.00657143
двутавр
Δl_4.x4 := Δl_3.x3 + N4*x4/(E*A) = -0.00755102  # д)  # ϕ(x,i)=ϕ(x,i-1)+(T(x,i)*xi)/(G*Ip)
σ_д.max := |Mm|/(Wz_д*10^6) = 130.676
Δl := x1 + x2 + x3 + x4 = 12  # 1 участок
# Определение касательных напряжений по высоте
# опасного сечения балки прямоугольного и
# двутаврового сеченийСравнение по массе балок прямоугольного и двутаврового сечений
ϕ_1.0 := T1*0/(G*Ip_с) = 0
Δl_max := Δl_4.x4*10^4 = -75.5102
ϕ_1.x1 := T1*x1/(G*Ip_с) = -0.00609782
# а) балка прямоугольного сечения
A_тр := A*|Δl_max|/Δl = 0.00770833
a_тр := sqrt(A_тр) = 0.0877971
# 2 участок
y := -h/2
τ := 6*Qm/(b*h^3)*(h^2/4 - y^2) = 0
# Ответ: а = 0.090м или 90мм
ϕ_2.0 := ϕ_1.x1 + T2*0/(G*Ip_с) = -0.00609782
ϕ_2.x2 := ϕ_1.x1 + T2*x2/(G*Ip_с) = -0.00609782
y := -h/4
τ := 6*Qm/(b*h^3)*(h^2/4 - y^2) = 2382490
# 3 участок
ϕ_3.0 := T3*0/(G*Ip_с) = 0
y := 0
τ := 6*Qm/(b*h^3)*(h^2/4 - y^2) = 3176653
ϕ_3.x3 := T3*x3/(G*Ip_с) = 0.0487825
# 4 участок(если есть)
y := h/4
τ := 6*Qm/(b*h^3)*(h^2/4 - y^2) = 2382490
ϕ_4.0 := ϕ_3.x3 + T4*0/(G*Ip_с) = 0.0487825
y := h/2
τ := 6*Qm/(b*h^3)*(h^2/4 - y^2) = 0
ϕ_4.x4 := ϕ_3.x3 + T4*x4/(G*Ip_с) = 0.0625026  # б) балка двутаврового сечения
S_1 := 0
S_7 := 0
Ф := |Tm|/(G*Ip_с) = 0.0121956
S_2 := b_ст*t_ст*(h_ст - t_ст)/2 = 0.000389902
# Если Ф больше Фд(1.2*10^2)
S_3 := S_2
S_5 := S_2
S_6 := S_2
Ip_тр := Ip_с*Ф/Фд = 8.33333e-5
S_4 := Sz_д = 0.00054
d_тр := nthroot(Ip_тр/0.1, 4) = 0.169904
τ_1 := Qm*S_1/(b_ст*Iz_д) = 0
τ_7 := Qm*S_7/(b_ст*Iz_д) = 0
# Ответ: dтр = 0.145м или 145мм
τ_2 := Qm*S_2/(b_ст*Iz_д) = 681032
τ_6 := Qm*S_6/(b_ст*Iz_д) = 681032
τ_3 := Qm*S_3/(s_ст*Iz_д) = 13194997
τ_5 := Qm*S_5/(s_ст*Iz_д) = 13194997
τ_4 := Qm*S_4/(s_ст*Iz_д) = 18274564
# Проверка на прочность по касательным напряжениям балок
# прямоугольного и двутаврового сечений
|τ_max| ≤ τд
# Прямоугольник | 3.1767*10^6 | 100*10^6
# Двутавр | 1.8275*10^7 | 100*10^6
# Построение эпюр углов поворота у' и
# прогибов y для двутавровой балки
# Ввод значений начального модуля продольного упругости E, осевого момента Iz
E := 2*10^8  # кН/м^2
I_z := 18930*10^-8  # м^4
x := 0, 0.5 .. 8
# Ввод координат границ участков и силоввых факторов, входящих в уравнение учатков
# Силовые факторы на левой границе 1 участка
M_i := -30
F_i := 51.25
q_i := 0
# Силовые факторы на левой границе 2 участка
M_j := 0
F_j := -80
q_j := 0
# компенсирующая нагрузка на 2 участке
q_I := 0
# левая граница 2 участка
a_j := 3
# Силовые факторы на левой границей 3 участка
M_k := 0
F_k := 40
q_k := -40
# компенсирующая нагрузка на 3 участке
q_J := 0
# левая граница 3 участка
a_k := a_j + 4
# Силовые факторы на левой границей 4 участка
M_m := 0
F_m := 0
q_m := 0
# левая граница 3 участка
a_m := a_k + 0
# компенсирующая нагрузка на 4 участке
q_N := 0
a_1(x) := 1/2*M_i*x^2 + 1/6*F_i*x^3 + 1/24*q_i*x^4
a_2(x) := 1/2*M_j*(x - a_j)^2 + 1/6*F_j*(x - a_j)^3 + 1/24*q_j*(x - a_j)^4 + 1/24*q_I*(x - a_j)^4
a_3(x) := 1/2*M_k*(x - a_k)^2 + 1/6*F_k*(x - a_k)^3 + 1/24*q_k*(x - a_k)^4 + 1/24*q_J*(x - a_k)^4
a_4(x) := 1/2*M_m*(x - a_m)^2 + 1/6*F_m*(x - a_m)^3 + 1/24*q_m*(x - a_m)^4 + 1/24*q_N*(x - a_m)^4
z := 8
θ_0 := -(a_1(z) + a_2(z) + a_3(z) + a_4(z))/(E*I_z*z)  # z
# Начальные параметры
y_0 := 0
θ_0 = -0.00578337
y(x) :=
    (E*I_z*y_0 + E*I_z*θ_0*x + a_1(x))/(E*I_z) if x ≤ a_j
    (E*I_z*y_0 + E*I_z*θ_0*x + a_1(x) + a_2(x))/(E*I_z) if a_j < x ≤ a_k
    (E*I_z*y_0 + E*I_z*θ_0*x + a_1(x) + a_2(x) + a_3(x))/(E*I_z) if a_k < x ≤ a_m
    (E*I_z*y_0 + E*I_z*θ_0*x + a_1(x) + a_2(x) + a_3(x) + a_4(x))/(E*I_z) if x > a_m
θ(x) := d/dx(y(x))
x = [0; 0.5; 1; 1.5; 2; 2.5; 3; 3.5; 4; 4.5; 5; 5.5; 6; 6.5; 7; 7.5; 8]
θ(x) = [-0.00578337; -0.00601036; -0.00589893; -0.00544908; -0.00466081; -0.00353413; -0.00206903; -0.000529638; 0.000819907; 0.00197961; 0.00294946; 0.00372947; 0.00431964; 0.00471997; 0.00493045; 0.00506114; 0.00513405]
y(x) = [0; -0.00296253; -0.00595395; -0.00880505; -0.0113466; -0.0134095; -0.0148244; -0.0154661; -0.0153856; -0.0146778; -0.0134377; -0.01176; -0.00973983; -0.00747202; -0.00505151; -0.00255395; 0]
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