x1 := 1
x2 := 1
x3 := 1
x4 := 1
σ := 170*10^6
# 3 задача
σд := 160*10^6
# РГР 2
# 2 задача
τ := 85*10^6
α := 0.8
# 1 задача
E := 2*10^11
τд := 100*10^6
T1 := 20*10^3
T2 := -40*10^3
T3 := -20*10^3
T4 := 0*10^3
Tm := T2
Qm := -16.67*10^3
Mm := 18.33*10^3
N1 := -20*10^3
N2 := 0
N3 := -10*10^3
N4 := 10*10^3
Nm := N1
E := 2*10^11
# а)
W := |Tm|/τ = 0.000470588
G := 8*10^10
# а)
A := |Nm|/σ = 0.000117647
Фд := 1.2*10^-2
# а)
Wz_тр := |Mm|/σд = 0.000114562
a_тр := sqrt(A) = 0.0108465
a := 0.011
d := nthroot(W*16/π, 3) = 0.133825
d := 0.135
b := nthroot(3*Wz_тр/2, 3) = 0.0555961
b := 0.06
A := a^2 = 0.000121
Wp_с := π*d^3/16 = 0.000483094
h := 2*b = 0.12
Aп := b*h = 0.0072
# б)
σ := |Nm|/(A*10^6) = 165.289
170
# б)
d_н := nthroot(W*16/(π*(1 - α^4)), 3) = 0.159522
Wz := b*h^2/6 = 0.000144
# в)
# Δl(x,i)=Δl(x,i-1)+(N(x,i)*xi)/(E*A)
d_н := 0.16
# двутавр 38
# 1 участок
d_в := α*d_н = 0.128
h_ст := 180*10^-3
b_ст := 100*10^-3
s_ст := 5.1*10^-3
t_ст := 8.3*10^-3
Δl_1.0 := N1*0/(E*A) = 0
Wp_к := 0.2*d_н^3*(1 - α^4) = 0.000483656
Aд := 25.4*10^-4
Iz_д := 1430*10^-8
Wz_д := 159*10^-6
Sz_д := 89.8*10^-6
Δl_1.x1 := N1*x1/(E*A) = -0.000826446
# Сравнение по массе балок прямоугольного и
# двутаврового поперечных сечений
# 2 участок
# в)
Э := d^2/(d_н^2 - d_в^2) = 1.97754
# Вывод: поскольку коэффициент экономичности больше единицы, следовательно стержень кольцевого поперечного сечения в 1,98 раз экономичнее, чем стержень сплошного сечения
Э := Aп/Aд = 2.83465
Δl_2.0 := Δl_1.x1 + N2*0/(E*A) = -0.000826446
# поскольку коэффициент экономичности больше единицы,
# следовательно, балка двутаврового поперечного сечения в 2,83 раза экономичнее,
# чем балка прямоугольного сечения.
Δl_2.x2 := Δl_1.x1 + N2*x2/(E*A) = -0.000826446
# г)
Ip_с := π*d^4/32 = 3.26088e-5
# 3 участок
Iz := b*h^3/12 = 8.64e-6
Δl_3.0 := Δl_2.x2 + N3*0/(E*A) = -0.000826446
Ip_к := π*d_н^4/32*(1 - α^4) = 3.79862e-5
# Определение нормальных напряжений по высоте опасного
# сечения балки прямоугольного и двутаврового сечений
Δl_3.x3 := Δl_2.x2 + N3*x3/(E*A) = -0.00123967
τmax_с := Tm/Wp_с = -82799706  # прямоугольник
# 4 участок(если есть)
σ_max := |Mm|/(Wz*10^6) = 127.292
τmax_к := Tm/Wp_к = -82703464
Δl_4.0 := Δl_3.x3 + N4*0/(E*A) = -0.00123967
двутавр
Δl_4.x4 := Δl_3.x3 + N4*x4/(E*A) = -0.000826446  # д)  # ϕ(x,i)=ϕ(x,i-1)+(T(x,i)*xi)/(G*Ip)
σ_д.max := |Mm|/(Wz_д*10^6) = 115.283
Δl := x1 + x2 + x3 + x4 = 4  # 1 участок
# Определение касательных напряжений по высоте
# опасного сечения балки прямоугольного и
# двутаврового сеченийСравнение по массе балок прямоугольного и двутаврового сечений
ϕ_1.0 := T1*0/(G*Ip_с) = 0
Δl_max := Δl_3.x3*10^4 = -12.3967
ϕ_1.x1 := T1*x1/(G*Ip_с) = 0.00766664
# а) балка прямоугольного сечения
A_тр := A*|Δl_max|/Δl = 0.000375
a_тр := sqrt(A_тр) = 0.0193649
# 2 участок
y := -h/2
τ := 6*Qm/(b*h^3)*(h^2/4 - y^2) = 0
# Ответ: а = 0.020м или 20мм
ϕ_2.0 := ϕ_1.x1 + T2*0/(G*Ip_с) = 0.00766664
ϕ_2.x2 := ϕ_1.x1 + T2*x2/(G*Ip_с) = -0.00766664
y := -h/4
τ := 6*Qm/(b*h^3)*(h^2/4 - y^2) = -2604688
# 3 участок
ϕ_3.0 := ϕ_2.x2 + T3*0/(G*Ip_с) = -0.00766664
y := 0
τ := 6*Qm/(b*h^3)*(h^2/4 - y^2) = -3472917
ϕ_3.x3 := ϕ_2.x2 + T3*x3/(G*Ip_с) = -0.0153333
# 4 участок(если есть)
y := h/4
τ := 6*Qm/(b*h^3)*(h^2/4 - y^2) = -2604688
ϕ_4.0 := ϕ_3.x3 + T4*0/(G*Ip_с) = -0.0153333
y := h/2
τ := 6*Qm/(b*h^3)*(h^2/4 - y^2) = 0
ϕ_4.x4 := ϕ_3.x3 + T4*x4/(G*Ip_с) = -0.0153333  # б) балка двутаврового сечения
S_1 := 0
S_7 := 0
Ф := |Tm|/(G*Ip_с) = 0.0153333
S_2 := b_ст*t_ст*(h_ст - t_ст)/2 = 7.12555e-5
# Если Ф больше Фд(1.2*10^2)
S_3 := S_2
S_5 := S_2
S_6 := S_2
Ip_тр := Ip_с*Ф/Фд = 4.16667e-5
S_4 := Sz_д = 8.98e-5
d_тр := nthroot(Ip_тр/0.1, 4) = 0.142872
τ_1 := Qm*S_1/(b_ст*Iz_д) = 0
τ_7 := Qm*S_7/(b_ст*Iz_д) = 0
# Ответ: dтр = 0.145м или 145мм
τ_2 := Qm*S_2/(b_ст*Iz_д) = -830650
τ_6 := Qm*S_6/(b_ст*Iz_д) = -830650
τ_3 := Qm*S_3/(s_ст*Iz_д) = -16287251
τ_5 := Qm*S_5/(s_ст*Iz_д) = -16287251
τ_4 := Qm*S_4/(s_ст*Iz_д) = -20526066
# Проверка на прочность по касательным напряжениям балок
# прямоугольного и двутаврового сечений
|τ_max| ≤ τд
# Прямоугольник | 3.4729*10^6 | 100*10^6
# Двутавр | 20.526*10^6 | 100*10^6
# Построение эпюр углов поворота у' и
# прогибов y для двутавровой балки
# Ввод значений начального модуля продольного упругости E, осевого момента Iz
E := 2*10^8  # кН/м^2
I_z := 1430*10^-8  # м^4
x := 0, 0.5 .. 3
# Ввод координат границ участков и силоввых факторов, входящих в уравнение учатков
# Силовые факторы на левой границе 1 участка
M_i := 0
F_i := 3.33
q_i := -10
# Силовые факторы на левой границе 2 участка
M_j := 20
F_j := 0
q_j := 0
# компенсирующая нагрузка на 2 участке
q_I := 0
# левая граница 2 участка
a_j := 1
# Силовые факторы на левой границей 3 участка
M_k := 0
F_k := 10
q_k := 0
# компенсирующая нагрузка на 3 участке
q_J := 10
# левая граница 3 участка
a_k := a_j + 1
# Силовые факторы на левой границей 4 участка
M_m := 0
F_m := 0
q_m := 0
# левая граница 3 участка
a_m := a_k + 0
# компенсирующая нагрузка на 4 участке
q_N := 0
a_1(x) := 1/2*M_i*x^2 + 1/6*F_i*x^3 + 1/24*q_i*x^4
a_2(x) := 1/2*M_j*(x - a_j)^2 + 1/6*F_j*(x - a_j)^3 + 1/24*q_j*(x - a_j)^4 + 1/24*q_I*(x - a_j)^4
a_3(x) := 1/2*M_k*(x - a_k)^2 + 1/6*F_k*(x - a_k)^3 + 1/24*q_k*(x - a_k)^4 + 1/24*q_J*(x - a_k)^4
a_4(x) := 1/2*M_m*(x - a_m)^2 + 1/6*F_m*(x - a_m)^3 + 1/24*q_m*(x - a_m)^4 + 1/24*q_N*(x - a_m)^4
z := 3
θ_0 := -(a_1(z) + a_2(z) + a_3(z) + a_4(z))/(E*I_z*z)  # z
# Начальные параметры
y_0 := 0
θ_0 = -0.00271775
y(x) :=
    (E*I_z*y_0 + E*I_z*θ_0*x + a_1(x))/(E*I_z) if x ≤ a_j
    (E*I_z*y_0 + E*I_z*θ_0*x + a_1(x) + a_2(x))/(E*I_z) if a_j < x ≤ a_k
    (E*I_z*y_0 + E*I_z*θ_0*x + a_1(x) + a_2(x) + a_3(x))/(E*I_z) if a_k < x ≤ a_m
    (E*I_z*y_0 + E*I_z*θ_0*x + a_1(x) + a_2(x) + a_3(x) + a_4(x))/(E*I_z) if x > a_m
θ(x) := d/dx(y(x))
x = [0; 0.5; 1; 1.5; 2; 2.5; 3]
θ(x) = [-0.00271775; -0.00264506; -0.00271834; 0.000121843; 0.00194192; 0.00281473; 0.00310451]
y(x) = [0; -0.00134373; -0.00266939; -0.00328511; -0.00271756; -0.0015041; 0]
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