# РГР 2
# 3 задача
x1 := 3
x2 := 4
x3 := 1
x4 := 0
σд := 160*10^6
# 2 задача
x1 := 3
x2 := 4
x3 := 1
x4 := 0
τ := 85*10^6
α := 0.8
x1 := 3
x2 := 4
x3 := 1
x4 := 0
σ := 170*10^6
τд := 100*10^6
# 1 задача
T1 := -30*10^3
T2 := -80*10^3
T3 := -70*10^3
T4 := 0*10^3
Tm := T2
E := 2*10^11
G := 8*10^10
Q1 := -4.64*10^3
Q2 := -49.64*10^3
Q3 := 32.5*10^3
Q4 := 12.5*10^3
Qm := Q3
N1 := -60*10^3
N2 := -20*10^3
N3 := 10*10^3
N4 := 0*10^3
Nm := N1
E := 2*10^11
M1 := -10*10^3
M2 := 12.5*10^3
M3 := -22.5*10^3
M4 := 0*10^3
# а)
W := |Tm|/τ = 0.000941176
Фд := 1.2*10^-2
Mm := -81.43*10^3
# а)
A := |Nm|/σ = 0.000352941
# а)
Wz_тр := |Mm|/σд = 0.000508937
a_тр := sqrt(A) = 0.0187867
a := 0.019
d := nthroot(W*16/π, 3) = 0.168609
d := 0.170
b := nthroot(3*Wz_тр/2, 3) = 0.0913942
b := 0.1
A := a^2 = 0.000361
Wp_с := π*d^3/16 = 0.000964665
0.2*0.135^3 = 0.000492075
h := 2*b = 0.2
Aп := b*h*10^4 = 200
# б)
σ := |Nm|/(A*10^6) = 166.205
170
# б)
d_н := nthroot(W*16/(π*(1 - α^4)), 3) = 0.200986
Wz := b*h^2/6 = 0.000666667
# в)
# Δl(x,i)=Δl(x,i-1)+(N(x,i)*xi)/(E*A)
d_н := 0.2
# двутавр 36
# 1 участок
h_ст := 0.36
b_ст := 0.145
s_ст := 0.0075
t_ст := 0.0123
d_в := α*d_н = 0.16
Δl_1.0 := N1*0/(E*A) = 0
Aд := 61.9
Iz_д := 13.380*10^-5
Wz_д := 7.43*10^-4
Sz_д := 4.23*10^-4
Wp_к := 0.2*d_н^3*(1 - α^4) = 0.00094464
Δl_1.x1 := N1*x1/(E*A) = -0.00249307
# Сравнение по массе балок прямоугольного и
# двутаврового поперечных сечений
# 2 участок
# в)
Э := d^2/(d_н^2 - d_в^2) = 2.00694
Э := Aп/Aд = 3.23102
Δl_2.0 := Δl_1.x1 + N2*0/(E*A) = -0.00249307
# Вывод: поскольку коэффициент экономичности больше единицы, следовательно стержень кольцевого поперечного сечения в 2 раз экономичнее, чем стержень сплошного сечения
# поскольку коэффициент экономичности больше единицы,
# следовательно, балка двутаврового поперечного сечения в 3,231 раза экономичнее,
# чем балка прямоугольного сечения.
Δl_2.x2 := Δl_1.x1 + N2*x2/(E*A) = -0.00360111
# г)
Ip_с := π*d^4/32 = 8.19966e-5
# 3 участок
Iz := b*h^3/12 = 6.66667e-5
Δl_3.0 := Δl_2.x2 + N3*0/(E*A) = -0.00360111
Ip_к := π*d_н^4/32*(1 - α^4) = 9.27398e-5
# Определение нормальных напряжений по высоте опасного
# сечения балки прямоугольного и двутаврового сечений
Δl_3.x3 := Δl_2.x2 + N3*x3/(E*A) = -0.0034626
τmax_с := Tm/Wp_с = -82930318  # прямоугольник
# 4 участок(если есть)
σ_max := |Mm|/(Wz*10^6) = 122.145
τmax_к := Tm/Wp_к = -84688347
Δl_4.0 := Δl_3.x3 + N4*0/(E*A) = -0.0034626
двутавр
Δl_4.x4 := Δl_3.x3 + N4*x4/(E*A) = -0.0034626  # д)  # ϕ(x,i)=ϕ(x,i-1)+(T(x,i)*xi)/(G*Ip)
σ_д.max := |Mm|/(Wz_д*10^6) = 109.596
Δl := x1 + x2 + x3 + x4 = 8  # 1 участок
# Определение касательных напряжений по высоте
# опасного сечения балки прямоугольного и
# двутаврового сеченийСравнение по массе балок прямоугольного и двутаврового сечений
ϕ_1.0 := T1*0/(G*Ip_с) = 0
Δl_max := Δl_2.x2*10^4 = -36.0111
ϕ_1.x1 := T1*x1/(G*Ip_с) = -0.0137201
# а) балка прямоугольного сечения
A_тр := A*|Δl_max|/Δl = 0.001625
a_тр := sqrt(A_тр) = 0.0403113
# 2 участок
y := -h/2
τ := 6*Qm/(b*h^3)*(h^2/4 - y^2) = 0
# Ответ: а = 0.032м или 32мм
ϕ_2.0 := ϕ_1.x1 + T2*0/(G*Ip_с) = -0.0137201
ϕ_2.x2 := ϕ_1.x1 + T2*x2/(G*Ip_с) = -0.0625026
y := -h/4
τ := 6*Qm/(b*h^3)*(h^2/4 - y^2) = 1828125
# 3 участок
ϕ_3.0 := ϕ_2.x2 + T3*0/(G*Ip_с) = -0.0625026
y := 0
τ := 6*Qm/(b*h^3)*(h^2/4 - y^2) = 2437500
ϕ_3.x3 := ϕ_2.x2 + T3*x3/(G*Ip_с) = -0.0731738
# 4 участок(если есть)
y := h/4
τ := 6*Qm/(b*h^3)*(h^2/4 - y^2) = 1828125
ϕ_4.0 := ϕ_3.x3 + T3*0/(G*Ip_с) = -0.0731738
y := h/2
τ := 6*Qm/(b*h^3)*(h^2/4 - y^2) = 0
ϕ_4.x4 := ϕ_3.x3 + T3*x4/(G*Ip_с) = -0.0731738  # б) балка двутаврового сечения
S_1 := 0
S_7 := 0
Ф := |Tm|/(G*Ip_с) = 0.0121956
S_2 := b_ст*t_ст*(h_ст - t_ст)/2 = 0.000310061
# Если Ф больше Фд(1.2*10^2)
S_3 := S_2
S_5 := S_2
S_6 := S_2
Ip_тр := Ip_с*Ф/Фд = 8.33333e-5
S_4 := Sz_д = 0.000423
d_тр := nthroot(Ip_тр/0.1, 4) = 0.169904
τ_1 := Qm*S_1/(b_ст*Iz_д) = 0
τ_7 := Qm*S_7/(b_ст*Iz_д) = 0
# Ответ: dтр = 0.145м или 145мм
τ_2 := Qm*S_2/(b_ст*Iz_д) = 519406
τ_6 := Qm*S_6/(b_ст*Iz_д) = 519406
τ_3 := Qm*S_3/(s_ст*Iz_д) = 10041851
τ_5 := Qm*S_5/(s_ст*Iz_д) = 10041851
τ_4 := Qm*S_4/(s_ст*Iz_д) = 13699552
# Проверка на прочность по касательным напряжениям балок
# прямоугольного и двутаврового сечений
|τ_max| ≤ τд
# Прямоугольник | 1.190186*10^7 | 100*10^6
# Двутавр | 3.532609*10^7 | 100*10^6
# Построение эпюр углов поворота у' и
# прогибов y для двутавровой балки
# Ввод значений начального модуля продольного упругости E, осевого момента Iz
E := 2*10^8  # кН/м^2
I_z := 13380*10^-8  # м^4
x := 0, 0.5 .. 7
# Ввод координат границ участков и силоввых факторов, входящих в уравнение учатков
# Силовые факторы на левой границе 1 участка
M_i := 0
F_i := -4.64
q_i := -15
# Силовые факторы на левой границе 2 участка
M_j := 50
F_j := 30
q_j := 15
# компенсирующая нагрузка на 2 участке
q_I := 15
# левая граница 2 участка
a_j := 3
# Силовые факторы на левой границей 3 участка
M_k := 0
F_k := 0
q_k := 0
# компенсирующая нагрузка на 3 участке
q_J := 0
# левая граница 3 участка
a_k := a_j + 4
# Силовые факторы на левой границей 4 участка
M_m := 0
F_m := 0
q_m := 0
# левая граница 3 участка
a_m := a_k + 0
# компенсирующая нагрузка на 4 участке
q_N := 0
a_1(x) := 1/2*M_i*x^2 + 1/6*F_i*x^3 + 1/24*q_i*x^4
a_2(x) := 1/2*M_j*(x - a_j)^2 + 1/6*F_j*(x - a_j)^3 + 1/24*q_j*(x - a_j)^4 + 1/24*q_I*(x - a_j)^4
a_3(x) := 1/2*M_k*(x - a_k)^2 + 1/6*F_k*(x - a_k)^3 + 1/24*q_k*(x - a_k)^4 + 1/24*q_J*(x - a_k)^4
a_4(x) := 1/2*M_m*(x - a_m)^2 + 1/6*F_m*(x - a_m)^3 + 1/24*q_m*(x - a_m)^4 + 1/24*q_N*(x - a_m)^4
z := 7
θ_0 := -(a_1(z) + a_2(z) + a_3(z) + a_4(z))/(E*I_z*z)  # z
# Начальные параметры
y_0 := 0
θ_0 = 0.00387507
y(x) :=
    (E*I_z*y_0 + E*I_z*θ_0*x + a_1(x))/(E*I_z) if x ≤ a_j
    (E*I_z*y_0 + E*I_z*θ_0*x + a_1(x) + a_2(x))/(E*I_z) if a_j < x ≤ a_k
    (E*I_z*y_0 + E*I_z*θ_0*x + a_1(x) + a_2(x) + a_3(x))/(E*I_z) if a_k < x ≤ a_m
    (E*I_z*y_0 + E*I_z*θ_0*x + a_1(x) + a_2(x) + a_3(x) + a_4(x))/(E*I_z) if x > a_m
θ(x) := d/dx(y(x))
θ(x) = [0.00387507; 0.00384172; 0.00369495; 0.0033647; 0.0027809; 0.00187348; 0.000572381; -9.47532e-5; -0.000875303; -0.0016992; -0.00249638; -0.00319677; -0.00373031; -0.00402693; -0.00401656]
y(x) = [0; 0.00193246; 0.00382282; 0.00559683; 0.00714526; 0.0083238; 0.00895313; 0.00907872; 0.00883947; 0.00819619; 0.00714473; 0.00571595; 0.00397576; 0.00202512; 0]
x = [0; 0.5; 1; 1.5; 2; 2.5; 3; 3.5; 4; 4.5; 5; 5.5; 6; 6.5; 7]
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