# РГР 2
# 3 задача
σд := 160*10^6
τ := 85*10^6
α := 0.8
x1 := 2
x2 := 3
x3 := 1
x4 := 2
σ := 170*10^6  # 2 задача
τд := 100*10^6
# 1 задача
T1 := 10*10^3
T2 := 70*10^3
T3 := 50*10^3
T4 := -10*10^3
Tm := T2
Qm := -29.5*10^3
Mm := -59*10^3
E := 2*10^11
G := 8*10^10
N1 := 60*10^3
N2 := 40*10^3
N3 := -10*10^3
N4 := -20*10^3
Nm := N1
E := 2*10^11
# а)
W := |Tm|/τ = 0.000823529
Фд := 1.2*10^-2
# а)
A := |Nm|/σ = 0.000352941
x1 := 2
x2 := 1
x3 := 3
x4 := 2
# а)
Wz_тр := |Mm|/σд = 0.00036875
a_тр := sqrt(A) = 0.0187867
a := 0.019
d := nthroot(W*16/π, 3) = 0.161269
d := 0.165
b := nthroot(3*Wz_тр/2, 3) = 0.082087
b := 0.085
A := a^2 = 0.000361
Wp_с := π*d^3/16 = 0.000882027
h := 2*b = 0.17
Aп := b*h = 0.01445
# б)
σ := |Nm|/(A*10^6) = 166.205
170
# б)
d_н := nthroot(W*16/(π*(1 - α^4)), 3) = 0.192236
Wz := b*h^2/6 = 0.000409417
# в)
# Δl(x,i)=Δl(x,i-1)+(N(x,i)*xi)/(E*A)
d_н := 0.195
# двутавр 30
h_ст := 300*10^-3
b_ст := 135*10^-3
s_ст := 6.5*10^-3
t_ст := 10.2*10^-3
# 1 участок
d_в := α*d_н = 0.156
Δl_1.0 := N1*0/(E*A) = 0
Aд := 46.5*10^-4
Iz_д := 7080*10^-8
Wz_д := 472*10^-6
Sz_д := 268*10^-6
Wp_к := 0.2*d_н^3*(1 - α^4) = 0.000875548
Δl_1.x1 := N1*x1/(E*A) = 0.00166205
# Сравнение по массе балок прямоугольного и
# двутаврового поперечных сечений
# 2 участок
# в)
Э := d^2/(d_н^2 - d_в^2) = 1.98882
Э := Aп/Aд = 3.10753
Δl_2.0 := Δl_1.x1 + N2*0/(E*A) = 0.00166205
# Вывод: поскольку коэффициент экономичности больше единицы, следовательно стержень кольцевого поперечного сечения в 2 раз экономичнее, чем стержень сплошного сечения
# поскольку коэффициент экономичности больше единицы,
# следовательно, балка двутаврового поперечного сечения в 3,39 раза экономичнее,
# чем балка прямоугольного сечения.
Δl_2.x2 := Δl_1.x1 + N2*x2/(E*A) = 0.00221607
# г)
Ip_с := π*d^4/32 = 7.27672e-5
# 3 участок
Iz := b*h^3/12 = 3.48004e-5
Δl_3.0 := Δl_2.x2 + N3*0/(E*A) = 0.00221607
Ip_к := π*d_н^4/32*(1 - α^4) = 8.38078e-5
# Определение нормальных напряжений по высоте опасного
# сечения балки прямоугольного и двутаврового сечений
Δl_3.x3 := Δl_2.x2 + N3*x3/(E*A) = 0.00180055
τmax_с := Tm/Wp_с = 79362679  # прямоугольник
# 4 участок(если есть)
σ_max := |Mm|/(Wz*10^6) = 144.107
τmax_к := Tm/Wp_к = 79949888
Δl_4.0 := Δl_3.x3 + N4*0/(E*A) = 0.00180055
двутавр
Δl_4.x4 := Δl_3.x3 + N4*x4/(E*A) = 0.00124654  # д)  # ϕ(x,i)=ϕ(x,i-1)+(T(x,i)*xi)/(G*Ip)
σ_д.max := |Mm|/(Wz_д*10^6) = 125
Δl := x1 + x2 + x3 + x4 = 8  # 1 участок
# Определение касательных напряжений по высоте
# опасного сечения балки прямоугольного и
# двутаврового сеченийСравнение по массе балок прямоугольного и двутаврового сечений
ϕ_1.0 := T1*0/(G*Ip_с) = 0
Δl_max := Δl_2.x2*10^4 = 22.1607
ϕ_1.x1 := T1*x1/(G*Ip_с) = 0.00343561
# а) балка прямоугольного сечения
A_тр := A*|Δl_max|/Δl = 0.001
a_тр := sqrt(A_тр) = 0.0316228
# 2 участок
y := -h/2
τ := 6*Qm/(b*h^3)*(h^2/4 - y^2) = 0
# Ответ: а = 0.04м или 40мм
ϕ_2.0 := ϕ_1.x1 + T2*0/(G*Ip_с) = 0.00343561
ϕ_2.x2 := ϕ_1.x1 + T2*x2/(G*Ip_с) = 0.0154603
y := -h/4
τ := 6*Qm/(b*h^3)*(h^2/4 - y^2) = -2296713
# 3 участок
ϕ_3.0 := ϕ_2.x2 + T3*0/(G*Ip_с) = 0.0154603
y := 0
τ := 6*Qm/(b*h^3)*(h^2/4 - y^2) = -3062284
ϕ_3.x3 := ϕ_2.x2 + T3*x3/(G*Ip_с) = 0.0412274
# 4 участок(если есть)
y := h/4
τ := 6*Qm/(b*h^3)*(h^2/4 - y^2) = -2296713
ϕ_4.0 := ϕ_3.x3 + T4*0/(G*Ip_с) = 0.0412274
y := h/2
τ := 6*Qm/(b*h^3)*(h^2/4 - y^2) = 0
ϕ_4.x4 := ϕ_3.x3 + T4*x4/(G*Ip_с) = 0.0377918  # б) балка двутаврового сечения
S_1 := 0
S_7 := 0
Ф := |Tm|/(G*Ip_с) = 0.0120246
S_2 := b_ст*t_ст*(h_ст - t_ст)/2 = 0.000199527
# Если Ф больше Фд(1.2*10^2)
S_3 := S_2
S_5 := S_2
S_6 := S_2
Ip_тр := Ip_с*Ф/Фд = 7.29167e-5
S_4 := Sz_д = 0.000268
d_тр := nthroot(Ip_тр/0.1, 4) = 0.164326
τ_1 := Qm*S_1/(b_ст*Iz_д) = 0
τ_7 := Qm*S_7/(b_ст*Iz_д) = 0
# Ответ: dтр = 0.145м или 145мм
τ_2 := Qm*S_2/(b_ст*Iz_д) = -615825
τ_6 := Qm*S_6/(b_ст*Iz_д) = -615825
τ_3 := Qm*S_3/(s_ст*Iz_д) = -12790212
τ_5 := Qm*S_5/(s_ст*Iz_д) = -12790212
τ_4 := Qm*S_4/(s_ст*Iz_д) = -17179487
# Проверка на прочность по касательным напряжениям балок
# прямоугольного и двутаврового сечений
|τ_max| ≤ τд
# Прямоугольник | 3.0623*10^6 | 100*10^6
# Двутавр | 17.179*10^6 | 100*10^6
# Построение эпюр углов поворота у' и
# прогибов y для двутавровой балки
# Ввод значений начального модуля продольного упругости E, осевого момента Iz
E := 2*10^8  # кН/м^2
I_z := 7080*10^-8  # м^4
x := 0, 0.5 .. 6
# Ввод координат границ участков и силоввых факторов, входящих в уравнение учатков
# Силовые факторы на левой границе 1 участка
M_i := 0
F_i := -29.5
q_i := 0
# Силовые факторы на левой границе 2 участка
M_j := 0
F_j := 50
q_j := 0
# компенсирующая нагрузка на 2 участке
q_I := 0
# левая граница 2 участка
a_j := 2
# Силовые факторы на левой границей 3 участка
M_k := 0
F_k := -20
q_k := -6
# компенсирующая нагрузка на 3 участке
q_J := 0
# левая граница 3 участка
a_k := a_j + 3
# Силовые факторы на левой границей 4 участка
M_m := 0
F_m := 0
q_m := 0
# левая граница 3 участка
a_m := a_k + 0
# компенсирующая нагрузка на 4 участке
q_N := 0
a_1(x) := 1/2*M_i*x^2 + 1/6*F_i*x^3 + 1/24*q_i*x^4
a_2(x) := 1/2*M_j*(x - a_j)^2 + 1/6*F_j*(x - a_j)^3 + 1/24*q_j*(x - a_j)^4 + 1/24*q_I*(x - a_j)^4
a_3(x) := 1/2*M_k*(x - a_k)^2 + 1/6*F_k*(x - a_k)^3 + 1/24*q_k*(x - a_k)^4 + 1/24*q_J*(x - a_k)^4
a_4(x) := 1/2*M_m*(x - a_m)^2 + 1/6*F_m*(x - a_m)^3 + 1/24*q_m*(x - a_m)^4 + 1/24*q_N*(x - a_m)^4
z := 6
θ_0 := -(a_1(z) + a_2(z) + a_3(z) + a_4(z))/(E*I_z*z)  # z
# Начальные параметры
y_0 := 0
θ_0 = 0.00626471
y(x) :=
    (E*I_z*y_0 + E*I_z*θ_0*x + a_1(x))/(E*I_z) if x ≤ a_j
    (E*I_z*y_0 + E*I_z*θ_0*x + a_1(x) + a_2(x))/(E*I_z) if a_j < x ≤ a_k
    (E*I_z*y_0 + E*I_z*θ_0*x + a_1(x) + a_2(x) + a_3(x))/(E*I_z) if a_k < x ≤ a_m
    (E*I_z*y_0 + E*I_z*θ_0*x + a_1(x) + a_2(x) + a_3(x) + a_4(x))/(E*I_z) if x > a_m
θ(x) := d/dx(y(x))
x = [0; 0.5; 1; 1.5; 2; 2.5; 3; 3.5; 4; 4.5; 5; 5.5; 6]
θ(x) = [0.00626471; 0.0060043; 0.00522305; 0.00392096; 0.00209805; 0.00019568; -0.00134475; -0.00252325; -0.00333981; -0.00379443; -0.00388712; -0.00380326; -0.00376354]
y(x) = [0; 0.00308895; 0.00591749; 0.00822519; 0.00975165; 0.01031; 0.0100077; 0.00902557; 0.00754473; 0.00574609; 0.00381062; 0.00188876; 0]
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