τ := 25
T := [10; 15; 25]
Δτ := 0.5
α := [A, B, C, D; -1, 2, 1, 0; 1, -2, -1, 0; 0, -1, 1, -1]  # error: Эта переменная неопределена.
p := [A, B, C, D; 1, 0, 0, 0; 0, 2, 1, 0; 0, 1, 0, 1]  # error: Эта переменная неопределена.
c0 := [0.3; 0; 0; 0.4]
k0 := [2*10^15; 3*10^15; 2.5*10^15]
E := [85.13*10^3; 85.93*10^3; 84.58*10^3]
G := 180
i := 0 .. 2
# w1=K0*CA
# w2=K1*CB^2*CC
# w3= K2*CB*CD
#
# A=-w1+w2
# B=2w1-2w2-w3
# C=w1-w2+w3
# D=-w3
n := τ/Δτ = 50
R := 8.31
T := 25 + 273
k[i] := k0[i]*exp(-E[i]/(R*T))
k = [2.35168; 2.5537; 3.67067]
D(t, c) := [
    -k[0]*c[0] + k[1]*c[1]^2*c[2];
    2*k[0]*c[0] - 2*k[1]*c[1]^2*c[2] - k[2]*c[1]*c[3];
    k[0]*c[0] - 2*k[1]*c[1]^2*c[2] + k[2]*c[1]*c[3];
    -k[2]*c[1]*c[3]
]
U := Rkadapt(c0, 0, τ, n, D)
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U = [
    0, 0.3, 0, 0, 0.4;
    0.5, 0.101695, 0.277429, 0.305308, 0.280819;
    1, 0.0531941, 0.263034, 0.428721, 0.169422;
    1.5, 0.0369895, 0.23357, 0.471308, 0.107549;
    2, 0.0290291, 0.2134, 0.484962, 0.0714577;
    2.5, 0.024322, 0.200283, 0.485756, 0.0489271;
    3, 0.0212668, 0.191632, 0.479943, 0.0341657;
    3.5, 0.0191572, 0.185857, 0.470462, 0.0241713;
    4, 0.0176266, 0.181997, 0.458863, 0.0172505;
    4.5, 0.0164662, 0.17945, 0.446036, 0.0123829
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]
V := 13.5*180 = 2430
